Simulations: Version=197
  DataStore
  Experiment ExpWI
    Factors Fac
      Permutation
        Factor Pop
          Specification=[SowingRule].Script.Population = 15.45, 27.0375, 38.625, 50.2125, 61.8
        Factor Date
          Specification=[SowingRule].Script.SowDate = 15-may, 20-may,25-may, 30-may,4-jun, 9-jun,14-jun
        Factor Res (disabled): Specification=[SurfaceOrganicMatter]
    Simulation Wisconsin
      Weather: FileName=/Users/stw52/Downloads/aars_iem.met
      Clock: Start=2015-01-01; End=2024-11-19
      Summary
      SoilArbitrator
      Zone Wisconsin Full: Area=1; Slope=2; AspectAngle=0; Altitude=50
        SurfaceOrganicMatter: InitialResidueName=Cereal Rye; InitialResidueType=wheat; InitialResidueMass=6000; InitialStandingFraction=1; InitialCPR=0; InitialCNR=30
        Fertiliser
        Report: EventNames=[Soybean].Harvesting
          VariableNames:
            [Clock].Today
            [Clock].Today.Year
            [Soybean].Grain.Wt*10 as soy_kg_ha
        MicroClimate: a_interception=0; b_interception=1; c_interception=0; d_interception=0; SoilHeatFluxFraction=0.4; MinimumHeightDiffForNewLayer=0; NightInterceptionFraction=0.5; ReferenceHeight=2
        Plant Soybean
          Cultivar Musgrave 1
            Command:
              [Phenology].Vegetative.Target.FixedValue = 340
              [Phenology].EarlyFlowering.Target.FixedValue = 120
              [Phenology].EarlyGrainFilling.Target.FractionofGrainfilling.FixedValue = 0.3
              [Phenology].LateGrainFilling.Target.EntireGrainfillPeriod.FixedValue = 632
              [Phenology].VegetativePhotoperiodModifier.XYPairs.X = 13.84, 18.77
              [Phenology].ReproductivePhotoperiodModifier.XYPairs.X = 13.84, 18.77
        Soil Plano Lab Data Med: SoilType=0; Region=Pierce; State=Wisconsin; Country=US; ApsoilNumber=221; Latitude=44.64; Longitude=-92.453; YearOfSampling=2015; Comments=0
          DataSource:
            Original data by http://websoilsurvey.sc.egov.usda.gov/App/HomePage.htm
            Profile developed by Integrated Cropping Systems Lab, Department of Agronomy, ISU
          Physical
            Thickness  ParticleSizeSand  ParticleSizeSilt  ParticleSizeClay  Rocks  BD    AirDry  LL15   DUL    SAT    KS
            150        3.9               71.7              24.4              0      1.34  0.0575  0.115  0.327  0.435  171
            50         3.9               71.7              24.4              0      1.34  0.0575  0.115  0.327  0.435  171
            180        3.4               73.6              23                0      1.42  0.112   0.14   0.354  0.44   126
            130        3.8               77                19.2              0      1.42  0.114   0.114  0.319  0.428  97.2
            150        3.6               70.6              25.8              0      1.42  0.148   0.148  0.344  0.413  124
            280        3.2               65.9              30.9              0      1.42  0.174   0.174  0.362  0.418  68.4
            180        3.5               68.4              28.1              0      1.45  0.2     0.2    0.391  0.452  197
            380        12.6              64.6              22.8              0      1.6   0.148   0.148  0.306  0.38   67.1
            130        50.4              35.1              14.5              0      1.5   0.113   0.113  0.236  0.354  83.5
            150        62.4              24.6              13                0      1.5   0.098   0.098  0.218  0.372  284
            120        72.4              20.7              6.9               0      1.5   0.074   0.074  0.168  0.371  685
            310        72.9              22.2              4.9               0      1.5   0.065   0.065  0.154  0.387  616
            300        72.4              23.1              4.5               0      1.5   0.072   0.072  0.162  0.364  578
            Rocks source: Calculated (layer 1, 2, 3, 4, 5, 6)
            SoilCrop maizeSoil
              LL=[0.115, 0.115, 0.14, 0.114, 0.148, 0.174, 0.2, 0.148, 0.113, 0.098, 0.074, 0.065, 0.072]
              KL=[0.08, 0.069, 0.064, 0.057, 0.049, 0.035, 0.06, 0.06, 0.06, 0.06, 0.06, 0.06, 0.06]
              XF=[1, 1, 1, 1, 1, 1, 1, 1, 1, 1, 1, 1, 1]
              KL, XF source: Calculated (layer 7, 8, 9, 10, 11, 12, 13)
            SoilCrop soybeanSoil
              LL=[0.115, 0.115, 0.14, 0.114, 0.148, 0.174, 0.2, 0.148, 0.113, 0.098, 0.074, 0.065, 0.072]
              KL=[0.06, 0.049, 0.04, 0.032, 0.026, 0.022, 0.01, 0.06, 0.06, 0.06, 0.06, 0.06, 0.06]
              XF=[1, 1, 1, 1, 1, 1, 1, 1, 1, 1, 1, 1, 1]
              KL source: Calculated (layer 8, 9, 10, 11, 12, 13)
              XF source: Calculated (layer 7, 8, 9, 10, 11, 12, 13)
            SoilCrop wheatSoil
              LL=[0.115, 0.115, 0.14, 0.114, 0.148, 0.174, 0.2, 0.148, 0.113, 0.098, 0.074, 0.065, 0.072]
              KL=[0.06, 0.049, 0.04, 0.032, 0.026, 0.022, 0.01, 0.06, 0.06, 0.06, 0.06, 0.06, 0.06]
              XF=[1, 1, 1, 1, 1, 1, 1, 1, 1, 1, 1, 1, 1]
              KL source: Calculated (layer 1, 8, 9, 10, 11, 12, 13)
              XF source: Calculated
          WaterBalance SoilWater: SummerDate=1-jun; SummerU=7; SummerCona=3; WinterDate=1-nov; WinterU=7.275; WinterCona=3.575; DiffusConst=84; DiffusSlope=35.4; Salb=0.17; CN2Bare=73; CNRed=20; CNCov=0.8; PSIDul=-100
            Thickness=[150, 50, 180, 130, 150, 280, 180, 380, 130, 150, 120, 310, 300]
            SWCON=[0.45, 0.45, 0.45, 0.45, 0.45, 0.45, 0.45, 0.45, 0.45, 0.45, 0.45, 0.45, 0.45]
          Organic: FOMCNRatio=40; CarbonUnits=Total
            Thickness  Carbon  SoilCNRatio  FBiom  FInert  FOM
            150        2.5     12           0.04   0.8     150
            50         2.5     12           0.032  0.81    122
            180        2.32    12           0.027  0.82    100.5
            130        0.36    12           0.022  0.82    82
            150        0.26    12           0.018  0.83    67.4
            280        0.26    12           0.015  0.84    55.2
            180        0.26    12           0.012  0.85    45.2
            380        0.26    12           0.009  0.86    37
            130        0.18    12           0.08   0.87    30
            150        0.18    12           0.08   0.87    25
            120        0.18    12           0.08   0.87    20
            310        0.18    12           0.08   0.87    15
            300        0.18    12           0.08   0.87    10
          Chemical: PHUnits=Water
            Thickness  PH   CEC
            150        6.6  9.502
            50         6.5  9.748
            180        6    9.825
            130        6    9.281
            150        6    9.032
            280        6    8.816
            180        7.6  8.17
            380        7.6  8.17
            130        7.6  8.17
            150        7.6  8.18
            120        7.6  8.17
            310        7.6  8.17
            300        7.6  8.17
            CEC source: Calculated (layer 1, 2, 3, 4, 5, 6, 7)
          Nutrient
          Solute NO3: InitialValues=[0, 0, 0, 0, 0, 0, 0, 0, 0, 0, 0, 0, 0]; InitialValuesUnits=ppm; WaterTableConcentration=0; D0=0; Exco=[1, 1, 1, 1, 1, 1]; FIP=[1, 1, 1, 1, 1, 1]; DepthConstant=0; MaxDepthSoluteAccessible=0; RunoffEffectivenessAtMovingSolute=0; MaxEffectiveRunoff=0
            Thickness=[150, 50, 180, 130, 150, 280, 180, 380, 130, 150, 120, 310, 300]
          Solute NH4: same as ExpWI.Wisconsin.Wisconsin Full.Plano Lab Data Med.NO3
          Solute Urea: InitialValues=[0, 0, 0, 0, 0, 0, 0, 0, 0, 0, 0, 0, 0]; InitialValuesUnits=kg/ha; WaterTableConcentration=0; D0=0; Exco=[1, 1, 1, 1, 1, 1]; FIP=[1, 1, 1, 1, 1, 1]; DepthConstant=0; MaxDepthSoluteAccessible=0; RunoffEffectivenessAtMovingSolute=0; MaxEffectiveRunoff=0
            Thickness=[150, 50, 180, 130, 150, 280, 180, 380, 130, 150, 120, 310, 300]
          Water: FilledFromTop=true
            Thickness=[150, 50, 180, 130, 150, 280, 180, 380, 130, 150, 120, 310, 300]
            InitialValues=[0.327, 0.327, 0.354, 0.319, 0.344, 0.362, 0.391, 0.306, 0.236, 0.218, 0.168, 0.154, 0.162]
          SoilTemperature Temperature
        Manager SowingRule
          Crop = [Soybean]
          SowDate = 1-jun
          CultivarName = Generic_MG1
          SowingDepth = 50
          RowSpacing = 760
          Population = 61.8
```csharp
using APSIM.Shared.Utilities;
using Models.Utilities;
using Models.Soils;
using Models.PMF;
using Models.Core;
using System;
using System.Linq;

namespace Models
{
    [Serializable]
    public class Script : Model
    {
        [Link] Clock Clock;
        [Link] Fertiliser Fertiliser;
        [Link] Summary Summary;
        [Link] Soil Soil;
        
        [Description("Crop")]
        public IPlant Crop { get; set; }

        [Description("Sowing date (d-mmm)")]
        public string SowDate { get; set; }

        [Display(Type = DisplayType.CultivarName)]
        [Description("Cultivar to be sown")]
        public string CultivarName { get; set; }

        [Description("Sowing depth (mm)")]
        public double SowingDepth { get; set; }

        [Description("Row spacing (mm)")]
        public double RowSpacing { get; set; }

        [Description("Plant population (/m2)")]
        public double Population { get; set; }

        [EventSubscribe("DoManagement")]
        private void OnDoManagement(object sender, EventArgs e)
        {
            if (DateUtilities.WithinDates(SowDate, Clock.Today, SowDate))
            {
                Crop.Sow(population: Population, cultivar: CultivarName, depth: SowingDepth, rowSpacing: RowSpacing);    
            }
        }
    }
}
```
        Manager Harvesting
          Crop = [Soybean]
```csharp
using APSIM.Shared.Utilities;
using Models.Utilities;
using Models.Soils;
using Models.PMF;
using Models.Core;
using System;
using System.Linq;

namespace Models
{
    [Serializable] 
    public class Script : Model
    {
        [Description("Crop")]
        public IPlant Crop { get; set; }
        
        [EventSubscribe("DoManagement")]
        private void OnDoManagement(object sender, EventArgs e)
        {
            if (Crop.IsReadyForHarvesting)
            {
                Crop.Harvest();
                Crop.EndCrop();
            }
        }
    }
}
```
        Manager Reset on sowing
          ResetWater = True
          ResetNutrients = True
          ResetSOM = True
```csharp
using Models.Soils.Nutrients;
using APSIM.Shared.Utilities;
using Models.Surface;
using Models.Utilities;
using Models.Soils.Nutrients;
using Models.Soils;
using Models.PMF;
using Models.Core;
using System;
using System.Linq;
using Models.Interfaces;

namespace Models
{
    [Serializable]
    public class Script : Model
    {
        [Link] private Plant Wheat;
        [Link] private ISoilWater SoilWater;
        [Link] private Nutrient nutrient;
        [Link] private SurfaceOrganicMatter SOM;
        [Link] private Summary Summary;

        [Description("Reset Water?")]
        public bool ResetWater {get;set;}

        [Description("Reset Soil Nutrients?")]
        public bool ResetNutrients {get;set;}

        [Description("Reset Surface Organic Matter?")]
        public bool ResetSOM {get;set;}

        [EventSubscribe("Sowing")]
        private void OnSowing(object sender, EventArgs e)
        {
            if (ResetWater)
            {
                Summary.WriteMessage(this, "Reset Water", MessageType.Diagnostic);
                SoilWater.Reset();
            }
            if (ResetNutrients)
            {
                Summary.WriteMessage(this, "Reset Nutrients", MessageType.Diagnostic);
                nutrient.Reset();
            }
            if (ResetSOM)
            {
                Summary.WriteMessage(this, "Reset Surface OM", MessageType.Diagnostic);
                SOM.Reset();
            }
        }
    }
}
```
      Zone Wisconsin 75: Area=1; Slope=2; AspectAngle=0; Altitude=50
        SurfaceOrganicMatter: InitialResidueName=Wheat; InitialResidueType=wheat; InitialResidueMass=6000; InitialStandingFraction=1; InitialCPR=0; InitialCNR=30
        Fertiliser
        Report: EventNames=[Soybean].Harvesting
          VariableNames:
            [Clock].Today
            [Clock].Today.Year
            [Soybean].Grain.Wt*10 as soy_kg_ha
        MicroClimate: a_interception=0; b_interception=1; c_interception=0; d_interception=0; SoilHeatFluxFraction=0.4; MinimumHeightDiffForNewLayer=0; NightInterceptionFraction=0.5; ReferenceHeight=2
        Plant Soybean: same as ExpWI.Wisconsin.Wisconsin Full.Soybean
        Soil Plano Lab Data Med: SoilType=0; Region=Pierce; State=Wisconsin; Country=US; ApsoilNumber=221; Latitude=44.64; Longitude=-92.453; YearOfSampling=2015; Comments=0
          DataSource:
            Original data by http://websoilsurvey.sc.egov.usda.gov/App/HomePage.htm
            Profile developed by Integrated Cropping Systems Lab, Department of Agronomy, ISU
          Physical: same as ExpWI.Wisconsin.Wisconsin Full.Plano Lab Data Med.Physical
          WaterBalance SoilWater: same as ExpWI.Wisconsin.Wisconsin Full.Plano Lab Data Med.SoilWater
          Organic: same as ExpWI.Wisconsin.Wisconsin Full.Plano Lab Data Med.Organic
          Chemical: same as ExpWI.Wisconsin.Wisconsin Full.Plano Lab Data Med.Chemical
          Nutrient
          Solute NO3: same as ExpWI.Wisconsin.Wisconsin Full.Plano Lab Data Med.NO3
          Solute NH4: same as ExpWI.Wisconsin.Wisconsin Full.Plano Lab Data Med.NO3
          Solute Urea: same as ExpWI.Wisconsin.Wisconsin Full.Plano Lab Data Med.Urea
          Water: FilledFromTop=false
            Thickness=[150, 50, 180, 130, 150, 280, 180, 380, 130, 150, 120, 310, 300]
            InitialValues=[0.274212, 0.274212, 0.300714, 0.267955, 0.295196, 0.315188, 0.343441, 0.266658, 0.205373, 0.18812, 0.144594, 0.131839, 0.13959]
          SoilTemperature Temperature
        Manager SowingRule: same as ExpWI.Wisconsin.Wisconsin Full.SowingRule
        Manager Harvesting: same as ExpWI.Wisconsin.Wisconsin Full.Harvesting
        Manager Reset on sowing: same as ExpWI.Wisconsin.Wisconsin Full.Reset on sowing
      Zone Wisconsin 50: Area=1; Slope=2; AspectAngle=0; Altitude=50
        SurfaceOrganicMatter: InitialResidueName=Wheat; InitialResidueType=wheat; InitialResidueMass=6000; InitialStandingFraction=1; InitialCPR=0; InitialCNR=30
        Fertiliser
        Report: EventNames=[Soybean].Harvesting
          VariableNames:
            [Clock].Today
            [Clock].Today.Year
            [Soybean].Grain.Wt*10 as soy_kg_ha
        MicroClimate: a_interception=0; b_interception=1; c_interception=0; d_interception=0; SoilHeatFluxFraction=0.4; MinimumHeightDiffForNewLayer=0; NightInterceptionFraction=0.5; ReferenceHeight=2
        Plant Soybean: same as ExpWI.Wisconsin.Wisconsin Full.Soybean
        Soil Plano Lab Data Med: SoilType=0; Region=Pierce; State=Wisconsin; Country=US; ApsoilNumber=221; Latitude=44.64; Longitude=-92.453; YearOfSampling=2015; Comments=0
          DataSource:
            Original data by http://websoilsurvey.sc.egov.usda.gov/App/HomePage.htm
            Profile developed by Integrated Cropping Systems Lab, Department of Agronomy, ISU
          Physical: same as ExpWI.Wisconsin.Wisconsin Full.Plano Lab Data Med.Physical
          WaterBalance SoilWater: same as ExpWI.Wisconsin.Wisconsin Full.Plano Lab Data Med.SoilWater
          Organic: same as ExpWI.Wisconsin.Wisconsin Full.Plano Lab Data Med.Organic
          Chemical: same as ExpWI.Wisconsin.Wisconsin Full.Plano Lab Data Med.Chemical
          Nutrient
          Solute NO3: same as ExpWI.Wisconsin.Wisconsin Full.Plano Lab Data Med.NO3
          Solute NH4: same as ExpWI.Wisconsin.Wisconsin Full.Plano Lab Data Med.NO3
          Solute Urea: same as ExpWI.Wisconsin.Wisconsin Full.Plano Lab Data Med.Urea
          Water: FilledFromTop=true
            Thickness=[150, 50, 180, 130, 150, 280, 180, 380, 130, 150, 120, 310, 300]
            InitialValues=[0.221, 0.221, 0.247, 0.217, 0.246, 0.268, 0.3, 0.227, 0.175, 0.158, 0.121, 0.11, 0.117]
          SoilTemperature Temperature
        Manager SowingRule: same as ExpWI.Wisconsin.Wisconsin Full.SowingRule
        Manager Harvesting: same as ExpWI.Wisconsin.Wisconsin Full.Harvesting
        Manager Reset on sowing: same as ExpWI.Wisconsin.Wisconsin Full.Reset on sowing
      Zone Wisconsin 25: Area=1; Slope=2; AspectAngle=0; Altitude=50
        SurfaceOrganicMatter: InitialResidueName=Wheat; InitialResidueType=wheat; InitialResidueMass=6000; InitialStandingFraction=1; InitialCPR=0; InitialCNR=30
        Fertiliser
        Report: EventNames=[Soybean].Harvesting
          VariableNames:
            [Clock].Today
            [Clock].Today.Year
            [Soybean].Grain.Wt*10 as soy_kg_ha
        MicroClimate: a_interception=0; b_interception=1; c_interception=0; d_interception=0; SoilHeatFluxFraction=0.4; MinimumHeightDiffForNewLayer=0; NightInterceptionFraction=0.5; ReferenceHeight=2
        Plant Soybean: same as ExpWI.Wisconsin.Wisconsin Full.Soybean
        Soil Plano Lab Data Med: SoilType=0; Region=Pierce; State=Wisconsin; Country=US; ApsoilNumber=221; Latitude=44.64; Longitude=-92.453; YearOfSampling=2015; Comments=0
          DataSource:
            Original data by http://websoilsurvey.sc.egov.usda.gov/App/HomePage.htm
            Profile developed by Integrated Cropping Systems Lab, Department of Agronomy, ISU
          Physical: same as ExpWI.Wisconsin.Wisconsin Full.Plano Lab Data Med.Physical
          WaterBalance SoilWater: same as ExpWI.Wisconsin.Wisconsin Full.Plano Lab Data Med.SoilWater
          Organic: same as ExpWI.Wisconsin.Wisconsin Full.Plano Lab Data Med.Organic
          Chemical: same as ExpWI.Wisconsin.Wisconsin Full.Plano Lab Data Med.Chemical
          Nutrient
          Solute NO3: same as ExpWI.Wisconsin.Wisconsin Full.Plano Lab Data Med.NO3
          Solute NH4: same as ExpWI.Wisconsin.Wisconsin Full.Plano Lab Data Med.NO3
          Solute Urea: same as ExpWI.Wisconsin.Wisconsin Full.Plano Lab Data Med.Urea
          Water: FilledFromTop=false
            Thickness=[150, 50, 180, 130, 150, 280, 180, 380, 130, 150, 120, 310, 300]
            InitialValues=[0.168, 0.168, 0.193, 0.165, 0.197, 0.221, 0.248, 0.188, 0.144, 0.218, 0.168, 0.154, 0.162]
          SoilTemperature Temperature
        Manager SowingRule: same as ExpWI.Wisconsin.Wisconsin Full.SowingRule
        Manager Harvesting: same as ExpWI.Wisconsin.Wisconsin Full.Harvesting
        Manager Reset on sowing: same as ExpWI.Wisconsin.Wisconsin Full.Reset on sowing
  Experiment ExpNY
    Factors Fac
      Permutation
        Factor Pop
          Specification=[SowingRule].Script.Population = 15.45, 27.0375, 38.625, 50.2125, 61.8
        Factor Date
          Specification=[SowingRule].Script.SowDate = 15-may, 20-may,25-may, 30-may,4-jun, 9-jun,14-jun
    Simulation New York
      Weather: FileName=/Users/stw52/Downloads/mus_iem.met
      Clock: Start=2015-01-01; End=2024-11-19
      Summary
      SoilArbitrator
      Zone New York Full: Area=1; Slope=3; AspectAngle=0; Altitude=50
        SurfaceOrganicMatter: InitialResidueName=Wheat; InitialResidueType=wheat; InitialResidueMass=6000; InitialStandingFraction=1; InitialCPR=0; InitialCNR=30
        Fertiliser
        Report: EventNames=[Soybean].Harvesting
          VariableNames:
            [Clock].Today
            [Clock].Today.Year
            [Soybean].Grain.Wt*10 as soy_kg_ha
        MicroClimate: a_interception=0; b_interception=1; c_interception=0; d_interception=0; SoilHeatFluxFraction=0.4; MinimumHeightDiffForNewLayer=0; NightInterceptionFraction=0.5; ReferenceHeight=2
        Plant Soybean
          Cultivar Musgrave 1
            Command:
              [Phenology].Vegetative.Target.FixedValue = 348
              [Phenology].EarlyFlowering.Target.FixedValue = 120
              [Phenology].EarlyGrainFilling.Target.FractionofGrainfilling.FixedValue = 0.2
              [Phenology].LateGrainFilling.Target.EntireGrainfillPeriod.FixedValue = 300
              [Phenology].VegetativePhotoperiodModifier.XYPairs.X = 13.59, 17.61
              [Phenology].ReproductivePhotoperiodModifier.XYPairs.X = 13.59, 17.61
              [Leaf].Photosynthesis.RUE.FixedValue = 2
        Soil Lima Lab Data Med: ASCOrder=NA; ASCSubOrder=NA; SoilType=Lima Silt Loam; Site=Musgrave; NearestTown=Aurora; Region=Northeast United States; State=New York; Country=United States of America; NaturalVegetation=NA; ApsoilNumber=9999; Latitude=42.625; Longitude=-76.625; LocationAccuracy=+- 250 m; YearOfSampling=1985; DataSource=Soil Lab Data; Comments=Data filled from Soil Lab Data from USDA soil survey
          Water: Thickness=[150, 100, 50, 160, 400, 180, 960]; InitialValues=[0.28, 0.28, 0.279, 0.29, 0.252, 0.272, 0.272]; FilledFromTop=true
          Physical
            Thickness  ParticleSizeSand  ParticleSizeSilt  ParticleSizeClay  Rocks  BD    AirDry  LL15   DUL    SAT    KS
            150        41.4              41.2              17.4              10     1.38  0.06    0.12   0.28   0.408  864
            100        41.4              41.2              17.4              10     1.38  0.096   0.12   0.28   0.408  864
            50         41.8              38.7              19.5              10     1.46  0.132   0.132  0.279  0.372  864
            160        42.1              34                23.9              10     1.55  0.157   0.157  0.29   0.38   864
            400        38.8              47.6              13.6              15     1.55  0.11    0.11   0.252  0.369  432
            180        38.6              48                13.4              0      1.73  0.155   0.155  0.272  0.325  432
            960        38.6              48                13.4              0      1.73  0.155   0.155  0.272  0.325  432
            SoilCrop WheatSoil: LL=[0.12, 0.12, 0.132, 0.157, 0.11, 0.155, 0.155]; KL=[0.06, 0.06, 0.055, 0.048, 0.039, 0.029, 0.029]; XF=[1, 1, 1, 1, 0.959, 0, 0]
            SoilCrop MaizeSoil: same as ExpNY.New York.New York Full.Lima Lab Data Med.Physical.WheatSoil
            SoilCrop SoybeanSoil: LL=[0.12, 0.12, 0.132, 0.157, 0.11, 0.155, 0.155]; KL=[0.06, 0.06, 0.055, 0.048, 0.039, 0.029, 0.029]; XF=[1, 1, 1, 1, 1, 0, 0]
          WaterBalance SoilWater: SummerDate=1-jun; SummerU=6; SummerCona=4; WinterDate=1-nov; WinterU=6; WinterCona=4; DiffusConst=88; DiffusSlope=35.4; Salb=0.13; CN2Bare=73; CNRed=20; CNCov=0; DischargeWidth=5; CatchmentArea=10; PSIDul=-336.6; Thickness=[150, 80, 70, 110, 230, 220, 960]; SWCON=[0.457, 0.464, 0.47, 0.481, 0.451, 0.469, 0.469]
          Organic: FOMCNRatio=40; CarbonUnits=Total
            Thickness  Carbon  SoilCNRatio  FBiom  FInert  FOM
            150        1.78    8            0.04   0.193   100
            80         1.78    8            0.031  0.395   70
            70         0.87    8            0.014  0.667   60
            110        0.87    8            0.01   0.832   0
            230        0.87    8            0.01   0.99    0
            220        0.87    8            0.01   0.99    0
          Chemical: PHUnits=Water
            Thickness  PH    CEC
            150        6.23  16.7285
            150        6.3   11.66375
            150        6.33  10.6885
            150        6.38  10.1688
            200        6.45  8.95183
            200        6.55  8.52125
            200        6.61  8.3885
            200        6.63  8.3345
            300        6.66  8.26925
            300        6.68  8.1905
            CEC source: Calculated
          Nutrient
          Solute NO3: Thickness=[150, 150, 150, 150, 200, 200, 200, 200, 300, 300]; InitialValues=[0, 0, 0, 0, 0, 0, 0, 0, 0, 0]; InitialValuesUnits=ppm; WaterTableConcentration=0; D0=0; DepthConstant=0; MaxDepthSoluteAccessible=0; RunoffEffectivenessAtMovingSolute=0; MaxEffectiveRunoff=0
          Solute NH4: same as ExpNY.New York.New York Full.Lima Lab Data Med.NO3
          Solute Urea: Thickness=[150, 150, 150, 150, 200, 200, 200, 200, 300, 300]; InitialValues=[0, 0, 0, 0, 0, 0, 0, 0, 0, 0]; InitialValuesUnits=kg/ha; WaterTableConcentration=0; D0=0; DepthConstant=0; MaxDepthSoluteAccessible=0; RunoffEffectivenessAtMovingSolute=0; MaxEffectiveRunoff=0
          SoilTemperature CERESSoilTemperature
          CERESSoilTemperature Temperature
        Manager Harvesting: same as ExpWI.Wisconsin.Wisconsin Full.Harvesting
        Manager Reset on sowing: same as ExpWI.Wisconsin.Wisconsin Full.Reset on sowing
        Manager SowingRule
          Crop = [Soybean]
          SowDate = jun-1
          CultivarName = Generic_MG1
          SowingDepth = 50
          RowSpacing = 760
          Population = 61.8
          script: same as in ExpWI.Wisconsin.Wisconsin Full.SowingRule
      Zone New York 75: Area=1; Slope=3; AspectAngle=0; Altitude=50
        SurfaceOrganicMatter: InitialResidueName=Wheat; InitialResidueType=wheat; InitialResidueMass=6000; InitialStandingFraction=1; InitialCPR=0; InitialCNR=30
        Fertiliser
        Report: EventNames=[Soybean].Harvesting
          VariableNames:
            [Clock].Today
            [Clock].Today.Year
            [Soybean].Grain.Wt*10 as soy_kg_ha
        MicroClimate: a_interception=0; b_interception=1; c_interception=0; d_interception=0; SoilHeatFluxFraction=0.4; MinimumHeightDiffForNewLayer=0; NightInterceptionFraction=0.5; ReferenceHeight=2
        Plant Soybean: same as ExpNY.New York.New York Full.Soybean
        Soil Lima Lab Data Med: ASCOrder=NA; ASCSubOrder=NA; SoilType=Lima Silt Loam; Site=Musgrave; NearestTown=Aurora; Region=Northeast United States; State=New York; Country=United States of America; NaturalVegetation=NA; ApsoilNumber=9999; Latitude=42.625; Longitude=-76.625; LocationAccuracy=+- 250 m; YearOfSampling=1985; DataSource=Soil Lab Data; Comments=Data filled from Soil Lab Data from USDA soil survey
          Water: Thickness=[150, 100, 50, 160, 400, 180, 960]; InitialValues=[0.24, 0.24, 0.242, 0.257, 0.216, 0.247, 0.247]; FilledFromTop=false
          Physical: same as ExpNY.New York.New York Full.Lima Lab Data Med.Physical
          WaterBalance SoilWater: same as ExpNY.New York.New York Full.Lima Lab Data Med.SoilWater
          Organic: same as ExpNY.New York.New York Full.Lima Lab Data Med.Organic
          Chemical: same as ExpNY.New York.New York Full.Lima Lab Data Med.Chemical
          Nutrient
          Solute NO3: same as ExpNY.New York.New York Full.Lima Lab Data Med.NO3
          Solute NH4: same as ExpNY.New York.New York Full.Lima Lab Data Med.NO3
          Solute Urea: same as ExpNY.New York.New York Full.Lima Lab Data Med.Urea
          SoilTemperature CERESSoilTemperature
          CERESSoilTemperature Temperature
        Manager Harvesting: same as ExpWI.Wisconsin.Wisconsin Full.Harvesting
        Manager Reset on sowing: same as ExpWI.Wisconsin.Wisconsin Full.Reset on sowing
        Manager SowingRule: same as ExpWI.Wisconsin.Wisconsin Full.SowingRule
      Zone New York 50: Area=1; Slope=3; AspectAngle=0; Altitude=50
        SurfaceOrganicMatter: InitialResidueName=Wheat; InitialResidueType=wheat; InitialResidueMass=6000; InitialStandingFraction=1; InitialCPR=0; InitialCNR=30
        Fertiliser
        Report: EventNames=[Soybean].Harvesting
          VariableNames:
            [Clock].Today
            [Clock].Today.Year
            [Soybean].Grain.Wt*10 as soy_kg_ha
        MicroClimate: a_interception=0; b_interception=1; c_interception=0; d_interception=0; SoilHeatFluxFraction=0.4; MinimumHeightDiffForNewLayer=0; NightInterceptionFraction=0.5; ReferenceHeight=2
        Plant Soybean: same as ExpNY.New York.New York Full.Soybean
        Soil Lima Lab Data Med: ASCOrder=NA; ASCSubOrder=NA; SoilType=Lima Silt Loam; Site=Musgrave; NearestTown=Aurora; Region=Northeast United States; State=New York; Country=United States of America; NaturalVegetation=NA; ApsoilNumber=9999; Latitude=42.625; Longitude=-76.625; LocationAccuracy=+- 250 m; YearOfSampling=1985; DataSource=Soil Lab Data; Comments=Data filled from Soil Lab Data from USDA soil survey
          Water: Thickness=[150, 100, 50, 160, 400, 180, 960]; InitialValues=[0.2, 0.2, 0.2055, 0.2235, 0.181, 0.2135, 0.2135]; FilledFromTop=false
          Physical: same as ExpNY.New York.New York Full.Lima Lab Data Med.Physical
          WaterBalance SoilWater: same as ExpNY.New York.New York Full.Lima Lab Data Med.SoilWater
          Organic: same as ExpNY.New York.New York Full.Lima Lab Data Med.Organic
          Chemical: same as ExpNY.New York.New York Full.Lima Lab Data Med.Chemical
          Nutrient
          Solute NO3: same as ExpNY.New York.New York Full.Lima Lab Data Med.NO3
          Solute NH4: same as ExpNY.New York.New York Full.Lima Lab Data Med.NO3
          Solute Urea: same as ExpNY.New York.New York Full.Lima Lab Data Med.Urea
          SoilTemperature CERESSoilTemperature
          CERESSoilTemperature Temperature
        Manager Harvesting: same as ExpWI.Wisconsin.Wisconsin Full.Harvesting
        Manager Reset on sowing: same as ExpWI.Wisconsin.Wisconsin Full.Reset on sowing
        Manager SowingRule: same as ExpWI.Wisconsin.Wisconsin Full.SowingRule
      Zone New York 25: Area=1; Slope=3; AspectAngle=0; Altitude=50
        SurfaceOrganicMatter: InitialResidueName=Wheat; InitialResidueType=wheat; InitialResidueMass=6000; InitialStandingFraction=1; InitialCPR=0; InitialCNR=30
        Fertiliser
        Report: EventNames=[Soybean].Harvesting
          VariableNames:
            [Clock].Today
            [Clock].Today.Year
            [Soybean].Grain.Wt*10 as soy_kg_ha
        MicroClimate: a_interception=0; b_interception=1; c_interception=0; d_interception=0; SoilHeatFluxFraction=0.4; MinimumHeightDiffForNewLayer=0; NightInterceptionFraction=0.5; ReferenceHeight=2
        Plant Soybean: same as ExpNY.New York.New York Full.Soybean
        Soil Lima Lab Data Med: ASCOrder=NA; ASCSubOrder=NA; SoilType=Lima Silt Loam; Site=Musgrave; NearestTown=Aurora; Region=Northeast United States; State=New York; Country=United States of America; NaturalVegetation=NA; ApsoilNumber=9999; Latitude=42.625; Longitude=-76.625; LocationAccuracy=+- 250 m; YearOfSampling=1985; DataSource=Soil Lab Data; Comments=Data filled from Soil Lab Data from USDA soil survey
          Water: Thickness=[150, 100, 50, 160, 400, 180, 960]; InitialValues=[0.16, 0.16, 0.16875, 0.19025, 0.1455, 0.18425, 0.18425]; FilledFromTop=false
          Physical: same as ExpNY.New York.New York Full.Lima Lab Data Med.Physical
          WaterBalance SoilWater: same as ExpNY.New York.New York Full.Lima Lab Data Med.SoilWater
          Organic: same as ExpNY.New York.New York Full.Lima Lab Data Med.Organic
          Chemical: same as ExpNY.New York.New York Full.Lima Lab Data Med.Chemical
          Nutrient
          Solute NO3: same as ExpNY.New York.New York Full.Lima Lab Data Med.NO3
          Solute NH4: same as ExpNY.New York.New York Full.Lima Lab Data Med.NO3
          Solute Urea: same as ExpNY.New York.New York Full.Lima Lab Data Med.Urea
          SoilTemperature CERESSoilTemperature
          CERESSoilTemperature Temperature
        Manager Harvesting: same as ExpWI.Wisconsin.Wisconsin Full.Harvesting
        Manager Reset on sowing: same as ExpWI.Wisconsin.Wisconsin Full.Reset on sowing
        Manager SowingRule: same as ExpWI.Wisconsin.Wisconsin Full.SowingRule
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