Simulations: Version=197
  DataStore
  Simulation 2007 Variety Trial
    Clock: Start=2007-01-01; End=2007-12-31
    Weather: FileName=/Users/stw52/Downloads/mus_iem.met
    Summary
    SoilArbitrator
    MicroClimate: a_interception=0; b_interception=1; c_interception=0; d_interception=0; SoilHeatFluxFraction=0.4; MinimumHeightDiffForNewLayer=0; NightInterceptionFraction=0.5; ReferenceHeight=2
    Zone Maturity Group I: Area=1; Slope=0; AspectAngle=0; Altitude=50
      Report
        VariableNames:
          [Clock].Today
          [Soybean].Phenology.Stage
          [Soybean].Phenology.CurrentStageName
          [Soybean].AboveGround.Wt
          [Soybean].AboveGround.N
          ([Soybean].Grain.Total.Wt*10)/67.19 as Yield
          [Soybean].LAI
        EventNames:
          [Soybean].Harvesting
          [Clock].EndOfDay
      Fertiliser
      SurfaceOrganicMatter: InitialResidueName=maize; InitialResidueType=maize; InitialResidueMass=100; InitialStandingFraction=0; InitialCPR=0; InitialCNR=55
      Plant Soybean
      Manager Fertilise at sowing (disabled)
        Crop = [Soybean]
        FertiliserType = NO3N
        Amount = 10
```csharp
using Models.Soils;
using System;
using System.Linq;
using Models.Core;
using Models.PMF;
namespace Models
{
    [Serializable]
    public class Script : Model
    {
        [Link] Clock Clock;
        [Link] Fertiliser Fertiliser;
        
        [Description("Crop to be fertilised")]
        public IPlant Crop { get; set; }

        [Description("Type of fertiliser to apply? ")] 
        [Display(Type = DisplayType.FertiliserType)]public string FertiliserType { get; set; }
    
        [Description("Amount of fertiliser to be applied (kg/ha)")]
        public double Amount { get; set; }
        
        [EventSubscribe("Sowing")]
        private void OnSowing(object sender, EventArgs e)
        {
            Model crop = sender as Model;
            if (Crop != null && crop.Name.ToLower() == (Crop as IModel).Name.ToLower())
                Fertiliser.Apply(amount: Amount, type: FertiliserType);
        }
    }
}
```
      Manager Sow on a fixed date
        Crop = [Soybean]
        SowDate = 14-may
        CultivarName = Generic_MG1
        SowingDepth = 50
        RowSpacing = 177.8
        Population = 49.4
```csharp
using APSIM.Shared.Utilities;
using Models.Utilities;
using Models.Soils;
using Models.PMF;
using Models.Core;
using System;
using System.Linq;

namespace Models
{
    [Serializable]
    public class Script : Model
    {
        [Link] Clock Clock;
        [Link] Fertiliser Fertiliser;
        [Link] Summary Summary;
        [Link] Soil Soil;
        
        [Description("Crop")]
        public IPlant Crop { get; set; }

        [Description("Sowing date (d-mmm)")]
        public string SowDate { get; set; }

        [Display(Type = DisplayType.CultivarName)]
        [Description("Cultivar to be sown")]
        public string CultivarName { get; set; }

        [Description("Sowing depth (mm)")]
        public double SowingDepth { get; set; }

        [Description("Row spacing (mm)")]
        public double RowSpacing { get; set; }

        [Description("Plant population (/m2)")]
        public double Population { get; set; }

        [EventSubscribe("DoManagement")]
        private void OnDoManagement(object sender, EventArgs e)
        {
            if (DateUtilities.WithinDates(SowDate, Clock.Today, SowDate))
            {
                Crop.Sow(population: Population, cultivar: CultivarName, depth: SowingDepth, rowSpacing: RowSpacing);    
            }
        }
    }
}
```
      Manager HarvestSoy
        Crop = [Soybean]
        Date = 21-sep
```csharp
using APSIM.Shared.Utilities;
using Models.Utilities;
using Models.Soils;
using Models.PMF;
using Models.Core;
using System;

namespace Models;

[Serializable] 
public class Script : Model
{
    [Link] IClock Clock;
    
    [Separator("Harvesting script that forces harvesting")]
    [Description("Crop")]
    public IPlant Crop { get; set; }
    
    [Description("Date to force harvesting by if crop is not ready (d-mmm)")]
    public string Date { get; set; }
    
    [EventSubscribe("DoManagement")]
    private void OnDoManagement(object sender, EventArgs e)
    {
        if (Crop.IsReadyForHarvesting || 
            (DateUtilities.DatesAreEqual(Date, Clock.Today) && Crop.IsAlive))
        {
            Crop.Harvest();
            Crop.EndCrop();
        }
    }
}
```
      Soil Musgrave Soil WSS (disabled): ASCOrder=NA; ASCSubOrder=NA; SoilType=Lima Silt Loam; Site=Musgrave; NearestTown=Aurora; Region=Northeast United States; State=New York; Country=United States of America; NaturalVegetation=NA; ApsoilNumber=9999; Latitude=42.625; Longitude=-76.625; LocationAccuracy=+- 250 m; YearOfSampling=2019; DataSource=Web Soil Survey; Comments=Data filled in from Web Soil Survey of OCS field for 2024
        Water: Thickness=[150, 150, 150, 150, 200, 200, 200, 200, 300, 300]; InitialValues=[0.25, 0.227, 0.2, 0.2, 0.16, 0.15, 0.15, 0.15, 0.15, 0.15]; FilledFromTop=true
        Physical
          Thickness  ParticleSizeSand  ParticleSizeSilt  ParticleSizeClay  Rocks  BD    AirDry  LL15   DUL    SAT    KS
          150        26                55                19                10     1.29  0.075   0.15   0.25   0.463  864
          150        31.1              48.5              20.4              10     1.33  0.114   0.127  0.227  0.448  864
          130        37                41                22                10     1.47  0.1     0.1    0.2    0.395  432
          160        37                41                22                10     1.47  0.1     0.1    0.2    0.395  432
          140        40                41.7              18.3              15     1.64  0.063   0.063  0.163  0.331  432
          160        41                42                17                15     1.7   0.05    0.05   0.15   0.308  432
          1100       41                42                17                30     1.7   0.05    0.05   0.15   0.308  432
          SoilCrop WheatSoil: LL=[0.15, 0.127, 0.1, 0.1, 0.063, 0.05, 0.05]; KL=[0.06, 0.06, 0.06, 0.055, 0.048, 0.039, 0.03]; XF=[1, 1, 1, 1, 0.959, 0.893, 0.857]
          SoilCrop MaizeSoil: same as 2007 Variety Trial.Maturity Group I.Musgrave Soil WSS.Physical.WheatSoil
          SoilCrop SoybeanSoil: LL=[0.15, 0.127, 0.1, 0.1, 0.063, 0.05, 0.05]; KL=[0.06, 0.06, 0.06, 0.055, 0.048, 0.039, 0.03]; XF=[1, 1, 1, 1, 1, 1, 1]
        WaterBalance SoilWater: SummerDate=1-may; SummerU=6; SummerCona=4.2; WinterDate=1-nov; WinterU=2; WinterCona=2; DiffusConst=67.97; DiffusSlope=34.12; Salb=0.13; CN2Bare=73; CNRed=20; CNCov=0; DischargeWidth=5; CatchmentArea=10; PSIDul=-100; Thickness=[150, 150, 150, 150, 200, 200, 200, 200, 300, 300]
          SWCON=[0.457, 0.464, 0.47, 0.481, 0.451, 0.469, 0.479, 0.48, 0.418, 0.419]
        Organic: FOMCNRatio=40; CarbonUnits=Total
          Thickness  Carbon  SoilCNRatio  FBiom  FInert  FOM
          150        4.406   8            0.04   0.193   0
          150        1.837   8            0.031  0.395   0
          150        1.038   8            0.014  0.667   0
          150        0.807   8            0.01   0.832   0
          200        0.647   8            0.01   0.99    0
          200        0.549   8            0.01   0.99    0
          200        0.49    8            0.01   0.99    0
          200        0.466   8            0.01   0.99    0
          300        0.437   8            0.01   0.99    0
          300        0.402   8            0.01   0.99    0
        Chemical: PHUnits=Water
          Thickness  PH    CEC
          150        6.23  16.7285
          150        6.3   11.66375
          150        6.33  10.6885
          150        6.38  10.1688
          200        6.45  8.95183
          200        6.55  8.52125
          200        6.61  8.3885
          200        6.63  8.3345
          300        6.66  8.26925
          300        6.68  8.1905
          CEC source: Calculated
        Nutrient
        Solute NO3: Thickness=[150, 150, 150, 150, 200, 200, 200, 200, 300, 300]; InitialValues=[0, 0, 0, 0, 0, 0, 0, 0, 0, 0]; InitialValuesUnits=ppm; WaterTableConcentration=0; D0=0; DepthConstant=0; MaxDepthSoluteAccessible=0; RunoffEffectivenessAtMovingSolute=0; MaxEffectiveRunoff=0
        Solute NH4: same as 2007 Variety Trial.Maturity Group I.Musgrave Soil WSS.NO3
        Solute Urea: Thickness=[150, 150, 150, 150, 200, 200, 200, 200, 300, 300]; InitialValues=[0, 0, 0, 0, 0, 0, 0, 0, 0, 0]; InitialValuesUnits=kg/ha; WaterTableConcentration=0; D0=0; DepthConstant=0; MaxDepthSoluteAccessible=0; RunoffEffectivenessAtMovingSolute=0; MaxEffectiveRunoff=0
        SoilTemperature CERESSoilTemperature
        CERESSoilTemperature Temperature
      Manager Harvesting (disabled)
        Crop = [Soybean]
```csharp
using APSIM.Shared.Utilities;
using Models.Utilities;
using Models.Soils;
using Models.PMF;
using Models.Core;
using System;
using System.Linq;

namespace Models
{
    [Serializable] 
    public class Script : Model
    {
        [Description("Crop")]
        public IPlant Crop { get; set; }
        
        [EventSubscribe("DoManagement")]
        private void OnDoManagement(object sender, EventArgs e)
        {
            if (Crop.IsReadyForHarvesting)
            {
                Crop.Harvest();
                Crop.EndCrop();
            }
        }
    }
}
```
      Soil Lima Lab Data: ASCOrder=NA; ASCSubOrder=NA; SoilType=Lima Silt Loam; Site=Musgrave; NearestTown=Aurora; Region=Northeast United States; State=New York; Country=United States of America; NaturalVegetation=NA; ApsoilNumber=9999; Latitude=42.625; Longitude=-76.625; LocationAccuracy=+- 250 m; YearOfSampling=1985; DataSource=Soil Lab Data; Comments=Data filled from Soil Lab Data from USDA soil survey
        Water: Thickness=[150, 100, 50, 160, 400, 180]; InitialValues=[0.283, 0.284, 0.277, 0.276, 0.251, 0.231]; FilledFromTop=true
        Physical
          Thickness  ParticleSizeSand  ParticleSizeSilt  ParticleSizeClay  Rocks  BD    AirDry  LL15   DUL    SAT    KS
          150        41.4              41.2              17.4              10     1.38  0.061   0.122  0.283  0.403  207
          100        41.4              41.2              17.4              10     1.38  0.061   0.122  0.284  0.403  207
          50         41.8              38.7              19.5              10     1.46  0.102   0.128  0.277  0.389  136
          160        42.1              34                23.9              10     1.55  0.142   0.142  0.276  0.377  79
          400        38.8              47.6              13.6              15     1.55  0.108   0.108  0.251  0.361  130
          180        38.6              48                13.4              15     1.73  0.111   0.111  0.231  0.323  61
          SoilCrop WheatSoil: LL=[0.122, 0.122, 0.128, 0.142, 0.108, 0.111]; KL=[0.06, 0.06, 0.055, 0.048, 0.039, 0.029]; XF=[1, 1, 1, 1, 0.959, 0]
          SoilCrop MaizeSoil: LL=[0.122, 0.122, 0.128, 0.142, 0.108, 0.111]; KL=[0.06, 0.06, 0.055, 0.048, 0.039, 0.029]; XF=[1, 1, 1, 1, 0.959, 0.893]
          SoilCrop SoybeanSoil: LL=[0.122, 0.122, 0.128, 0.142, 0.108, 0.111]; KL=[0.06, 0.06, 0.055, 0.048, 0.039, 0.029]; XF=[1, 1, 1, 1, 1, 0]
        WaterBalance SoilWater: SummerDate=1-jun; SummerU=9; SummerCona=4; WinterDate=1-nov; WinterU=6; WinterCona=4; DiffusConst=88; DiffusSlope=35.4; Salb=0.13; CN2Bare=73; CNRed=20; CNCov=0; DischargeWidth=5; CatchmentArea=10; PSIDul=-336.6; Thickness=[150, 80, 70, 110, 230, 220]; SWCON=[0.457, 0.464, 0.47, 0.481, 0.451, 0.469]
        Organic: FOMCNRatio=40; CarbonUnits=Total
          Thickness  Carbon  SoilCNRatio  FBiom  FInert  FOM
          150        1.78    8            0.04   0.193   100
          80         1.78    8            0.031  0.395   70
          70         0.87    8            0.014  0.667   60
          110        0.87    8            0.01   0.832   40
          230        0.87    8            0.01   0.99    20
          220        0.87    8            0.01   0.99    10
        Chemical: PHUnits=Water
          Thickness  PH    CEC
          150        6.23  16.7285
          150        6.3   11.66375
          150        6.33  10.6885
          150        6.38  10.1688
          200        6.45  8.95183
          200        6.55  8.52125
          200        6.61  8.3885
          200        6.63  8.3345
          300        6.66  8.26925
          300        6.68  8.1905
          CEC source: Calculated
        Nutrient
        Solute NO3: Thickness=[150, 150, 150, 150, 200, 200, 200, 200, 300, 300]; InitialValues=[0, 0, 0, 0, 0, 0, 0, 0, 0, 0]; InitialValuesUnits=ppm; WaterTableConcentration=0; D0=0; DepthConstant=0; MaxDepthSoluteAccessible=0; RunoffEffectivenessAtMovingSolute=0; MaxEffectiveRunoff=0
        Solute NH4: same as 2007 Variety Trial.Maturity Group I.Lima Lab Data.NO3
        Solute Urea: Thickness=[150, 150, 150, 150, 200, 200, 200, 200, 300, 300]; InitialValues=[0, 0, 0, 0, 0, 0, 0, 0, 0, 0]; InitialValuesUnits=kg/ha; WaterTableConcentration=0; D0=0; DepthConstant=0; MaxDepthSoluteAccessible=0; RunoffEffectivenessAtMovingSolute=0; MaxEffectiveRunoff=0
        SoilTemperature CERESSoilTemperature
        CERESSoilTemperature Temperature
    Zone Maturity Group II: Area=1; Slope=0; AspectAngle=0; Altitude=50
      Report
        VariableNames:
          [Clock].Today
          [Soybean].Phenology.Stage
          [Soybean].Phenology.CurrentStageName
          [Soybean].AboveGround.Wt
          [Soybean].AboveGround.N
          ([Soybean].Grain.Total.Wt*10)/67.19 as Yield
          [Soybean].LAI
        EventNames:
          [Soybean].Harvesting
          [Clock].EndOfDay
      Fertiliser
      SurfaceOrganicMatter: InitialResidueName=maize; InitialResidueType=maize; InitialResidueMass=100; InitialStandingFraction=0; InitialCPR=0; InitialCNR=55
      Plant Soybean
        Cultivar test_cultivar
          Command:
            [Phenology].Vegetative.Target.FixedValue = 329
            [Phenology].EarlyFlowering.Target.FixedValue = 150
            [Phenology].EarlyGrainFilling.Target.FractionofGrainfilling.FixedValue = 0.3
            [Phenology].LateGrainFilling.Target.EntireGrainfillPeriod.FixedValue = 580
            [Phenology].VegetativePhotoperiodModifier.XYPairs.X = 14.25, 18.93
            [Phenology].ReproductivePhotoperiodModifier.XYPairs.X = 14.25, 18.93
            //[Leaf].Photosynthesis.RUE.FixedValue = 1.5
      Manager Fertilise at sowing (disabled): same as 2007 Variety Trial.Maturity Group I.Fertilise at sowing
      Manager Sow on a fixed date
        Crop = [Soybean]
        SowDate = 14-may
        CultivarName = Generic_MG2
        SowingDepth = 50
        RowSpacing = 177.8
        Population = 49.4
        script: same as in 2007 Variety Trial.Maturity Group I.Sow on a fixed date
      Manager HarvestSoy: same as 2007 Variety Trial.Maturity Group I.HarvestSoy
      Soil Musgrave Soil WSS (disabled): same as 2007 Variety Trial.Maturity Group I.Musgrave Soil WSS
      Manager Harvesting (disabled): same as 2007 Variety Trial.Maturity Group I.Harvesting
      Soil Lima Lab Data: same as 2007 Variety Trial.Maturity Group I.Lima Lab Data
  Simulation 2008 Variety Trial
    Clock: Start=2008-01-01; End=2008-12-31
    Weather: FileName=/Users/stw52/Downloads/mus_iem.met
    Summary
    SoilArbitrator
    MicroClimate: a_interception=0; b_interception=1; c_interception=0; d_interception=0; SoilHeatFluxFraction=0.4; MinimumHeightDiffForNewLayer=0; NightInterceptionFraction=0.5; ReferenceHeight=2
    Zone Maturity Group I: Area=1; Slope=0; AspectAngle=0; Altitude=50
      Report: EventNames=[Soybean].Harvesting
        VariableNames:
          [Clock].Today
          [Soybean].Phenology.Stage
          [Soybean].Phenology.CurrentStageName
          [Soybean].AboveGround.Wt
          [Soybean].AboveGround.N
          ([Soybean].Grain.Total.Wt*10)/67.19 as Yield
          [Soybean].LAI
      Fertiliser
      SurfaceOrganicMatter: InitialResidueName=maize; InitialResidueType=maize; InitialResidueMass=100; InitialStandingFraction=0; InitialCPR=0; InitialCNR=55
      Plant Soybean
      Manager Fertilise at sowing (disabled): same as 2007 Variety Trial.Maturity Group I.Fertilise at sowing
      Manager Sow on a fixed date
        Crop = [Soybean]
        SowDate = 9-may
        CultivarName = Generic_MG1
        SowingDepth = 50
        RowSpacing = 177.8
        Population = 49.4
        script: same as in 2007 Variety Trial.Maturity Group I.Sow on a fixed date
      Manager HarvestSoy
        Crop = [Soybean]
        Date = 25-sep
        script: same as in 2007 Variety Trial.Maturity Group I.HarvestSoy
      Soil Musgrave Soil WSS (disabled): same as 2007 Variety Trial.Maturity Group I.Musgrave Soil WSS
      Manager Harvesting (disabled): same as 2007 Variety Trial.Maturity Group I.Harvesting
      Soil Lima Lab Data: same as 2007 Variety Trial.Maturity Group I.Lima Lab Data
    Zone Maturity Group II: Area=1; Slope=0; AspectAngle=0; Altitude=50
      Report: EventNames=[Soybean].Harvesting
        VariableNames:
          [Clock].Today
          [Soybean].Phenology.Stage
          [Soybean].Phenology.CurrentStageName
          [Soybean].AboveGround.Wt
          [Soybean].AboveGround.N
          ([Soybean].Grain.Total.Wt*10)/67.19 as Yield
          [Soybean].LAI
      Fertiliser
      SurfaceOrganicMatter: InitialResidueName=maize; InitialResidueType=maize; InitialResidueMass=100; InitialStandingFraction=0; InitialCPR=0; InitialCNR=55
      Plant Soybean
        Cultivar
          Command:
            [Phenology].Vegetative.Target.FixedValue = 340
            [Phenology].EarlyFlowering.Target.FixedValue = 120
            [Phenology].EarlyGrainFilling.Target.FractionofGrainfilling.FixedValue = 0.411
            [Phenology].LateGrainFilling.Target.EntireGrainfillPeriod.FixedValue = 600
            [Phenology].VegetativePhotoperiodModifier.XYPairs.X = 13.84, 18.77
            [Phenology].ReproductivePhotoperiodModifier.XYPairs.X = 13.84, 18.77
      Manager Fertilise at sowing (disabled): same as 2007 Variety Trial.Maturity Group I.Fertilise at sowing
      Manager Sow on a fixed date
        Crop = [Soybean]
        SowDate = 9-may
        CultivarName = Generic_MG2
        SowingDepth = 50
        RowSpacing = 177.8
        Population = 49.4
        script: same as in 2007 Variety Trial.Maturity Group I.Sow on a fixed date
      Manager HarvestSoy
        Crop = [Soybean]
        Date = 6-oct
        script: same as in 2007 Variety Trial.Maturity Group I.HarvestSoy
      Soil Musgrave Soil WSS (disabled): same as 2007 Variety Trial.Maturity Group I.Musgrave Soil WSS
      Manager Harvesting (disabled): same as 2007 Variety Trial.Maturity Group I.Harvesting
      Soil Lima Lab Data: same as 2007 Variety Trial.Maturity Group I.Lima Lab Data
  Simulation 2009 Variety Trial
    Clock: Start=2009-01-01; End=2009-12-31
    Weather: FileName=/Users/stw52/Downloads/mus_iem.met
    Summary
    SoilArbitrator
    MicroClimate: a_interception=0; b_interception=1; c_interception=0; d_interception=0; SoilHeatFluxFraction=0.4; MinimumHeightDiffForNewLayer=0; NightInterceptionFraction=0.5; ReferenceHeight=2
    Zone Maturity Group I: Area=1; Slope=0; AspectAngle=0; Altitude=50
      Report: EventNames=[Soybean].Harvesting
        VariableNames:
          [Clock].Today
          [Soybean].Phenology.Stage
          [Soybean].Phenology.CurrentStageName
          [Soybean].AboveGround.Wt
          [Soybean].AboveGround.N
          ([Soybean].Grain.Total.Wt*10)/67.19 as Yield
          [Soybean].LAI
      Fertiliser
      SurfaceOrganicMatter: InitialResidueName=maize; InitialResidueType=maize; InitialResidueMass=100; InitialStandingFraction=0; InitialCPR=0; InitialCNR=55
      Plant Soybean
      Manager Fertilise at sowing (disabled): same as 2007 Variety Trial.Maturity Group I.Fertilise at sowing
      Manager Sow on a fixed date
        Crop = [Soybean]
        SowDate = 11-may
        CultivarName = Generic_MG1
        SowingDepth = 50
        RowSpacing = 177.8
        Population = 49.4
        script: same as in 2007 Variety Trial.Maturity Group I.Sow on a fixed date
      Manager HarvestSoy: same as 2008 Variety Trial.Maturity Group I.HarvestSoy
      Soil Musgrave Soil WSS (disabled): same as 2007 Variety Trial.Maturity Group I.Musgrave Soil WSS
      Manager Harvesting (disabled): same as 2007 Variety Trial.Maturity Group I.Harvesting
      Soil Lima Lab Data: same as 2007 Variety Trial.Maturity Group I.Lima Lab Data
    Zone Maturity Group II: Area=1; Slope=0; AspectAngle=0; Altitude=50
      Report: EventNames=[Soybean].Harvesting
        VariableNames:
          [Clock].Today
          [Soybean].Phenology.Stage
          [Soybean].Phenology.CurrentStageName
          [Soybean].AboveGround.Wt
          [Soybean].AboveGround.N
          ([Soybean].Grain.Total.Wt*10)/67.19 as Yield
          [Soybean].LAI
      Fertiliser
      SurfaceOrganicMatter: InitialResidueName=maize; InitialResidueType=maize; InitialResidueMass=100; InitialStandingFraction=0; InitialCPR=0; InitialCNR=55
      Plant Soybean: same as 2008 Variety Trial.Maturity Group II.Soybean
      Manager Fertilise at sowing (disabled): same as 2007 Variety Trial.Maturity Group I.Fertilise at sowing
      Manager Sow on a fixed date
        Crop = [Soybean]
        SowDate = 11-may
        CultivarName = Generic_MG2
        SowingDepth = 50
        RowSpacing = 177.8
        Population = 49.4
        script: same as in 2007 Variety Trial.Maturity Group I.Sow on a fixed date
      Manager HarvestSoy: same as 2008 Variety Trial.Maturity Group I.HarvestSoy
      Soil Musgrave Soil WSS (disabled): same as 2007 Variety Trial.Maturity Group I.Musgrave Soil WSS
      Manager Harvesting (disabled): same as 2007 Variety Trial.Maturity Group I.Harvesting
      Soil Lima Lab Data: same as 2007 Variety Trial.Maturity Group I.Lima Lab Data
  Simulation 2010 Variety Trial
    Clock: Start=2010-01-01; End=2010-12-31
    Weather: FileName=/Users/stw52/Downloads/mus_iem.met
    Summary
    SoilArbitrator
    MicroClimate: a_interception=0; b_interception=1; c_interception=0; d_interception=0; SoilHeatFluxFraction=0.4; MinimumHeightDiffForNewLayer=0; NightInterceptionFraction=0.5; ReferenceHeight=2
    Zone Maturity Group I: Area=1; Slope=0; AspectAngle=0; Altitude=50
      Report: EventNames=[Soybean].Harvesting
        VariableNames:
          [Clock].Today
          [Soybean].Phenology.Stage
          [Soybean].Phenology.CurrentStageName
          [Soybean].AboveGround.Wt
          [Soybean].AboveGround.N
          ([Soybean].Grain.Total.Wt*10)/67.19 as Yield
          [Soybean].LAI
      Fertiliser
      SurfaceOrganicMatter: InitialResidueName=maize; InitialResidueType=maize; InitialResidueMass=100; InitialStandingFraction=0; InitialCPR=0; InitialCNR=55
      Plant Soybean
      Manager Fertilise at sowing (disabled): same as 2007 Variety Trial.Maturity Group I.Fertilise at sowing
      Manager Sow on a fixed date
        Crop = [Soybean]
        SowDate = 7-may
        CultivarName = Generic_MG1
        SowingDepth = 50
        RowSpacing = 177.8
        Population = 49.4
        script: same as in 2007 Variety Trial.Maturity Group I.Sow on a fixed date
      Manager HarvestSoy
        Crop = [Soybean]
        Date = 20-sep
        script: same as in 2007 Variety Trial.Maturity Group I.HarvestSoy
      Soil Musgrave Soil WSS (disabled): same as 2007 Variety Trial.Maturity Group I.Musgrave Soil WSS
      Manager Harvesting (disabled): same as 2007 Variety Trial.Maturity Group I.Harvesting
      Soil Lima Lab Data: same as 2007 Variety Trial.Maturity Group I.Lima Lab Data
    Zone Maturity Group II: Area=1; Slope=0; AspectAngle=0; Altitude=50
      Report: EventNames=[Soybean].Harvesting
        VariableNames:
          [Clock].Today
          [Soybean].Phenology.Stage
          [Soybean].Phenology.CurrentStageName
          [Soybean].AboveGround.Wt
          [Soybean].AboveGround.N
          ([Soybean].Grain.Total.Wt*10)/67.19 as Yield
          [Soybean].LAI
      Fertiliser
      SurfaceOrganicMatter: InitialResidueName=maize; InitialResidueType=maize; InitialResidueMass=100; InitialStandingFraction=0; InitialCPR=0; InitialCNR=55
      Plant Soybean
        Cultivar
          Command:
            [Phenology].Vegetative.Target.FixedValue = 348
            [Phenology].EarlyFlowering.Target.FixedValue = 120
            [Phenology].EarlyGrainFilling.Target.FractionofGrainfilling.FixedValue = 0.2
            [Phenology].LateGrainFilling.Target.EntireGrainfillPeriod.FixedValue = 300
            [Phenology].VegetativePhotoperiodModifier.XYPairs.X = 13.59, 17.61
            [Phenology].ReproductivePhotoperiodModifier.XYPairs.X = 13.59, 17.61
            [Leaf].Photosynthesis.RUE.FixedValue = 2
      Manager Fertilise at sowing (disabled): same as 2007 Variety Trial.Maturity Group I.Fertilise at sowing
      Manager Sow on a fixed date
        Crop = [Soybean]
        SowDate = 7-may
        CultivarName = Generic_MG2
        SowingDepth = 50
        RowSpacing = 177.8
        Population = 49.4
        script: same as in 2007 Variety Trial.Maturity Group I.Sow on a fixed date
      Manager HarvestSoy
        Crop = [Soybean]
        Date = 8-oct
        script: same as in 2007 Variety Trial.Maturity Group I.HarvestSoy
      Soil Musgrave Soil WSS (disabled): same as 2007 Variety Trial.Maturity Group I.Musgrave Soil WSS
      Manager Harvesting (disabled): same as 2007 Variety Trial.Maturity Group I.Harvesting
      Soil Lima Lab Data: same as 2007 Variety Trial.Maturity Group I.Lima Lab Data
  Simulation 2011 Variety Trial
    Clock: Start=2011-01-01; End=2011-12-31
    Weather: FileName=/Users/stw52/Downloads/mus_iem.met
    Summary
    SoilArbitrator
    MicroClimate: a_interception=0; b_interception=1; c_interception=0; d_interception=0; SoilHeatFluxFraction=0.4; MinimumHeightDiffForNewLayer=0; NightInterceptionFraction=0.5; ReferenceHeight=2
    Zone Maturity Group I: Area=1; Slope=0; AspectAngle=0; Altitude=50
      Report: EventNames=[Soybean].Harvesting
        VariableNames:
          [Clock].Today
          [Soybean].Phenology.Stage
          [Soybean].Phenology.CurrentStageName
          [Soybean].AboveGround.Wt
          [Soybean].AboveGround.N
          ([Soybean].Grain.Total.Wt*10)/67.19 as Yield
          [Soybean].LAI
      Fertiliser
      SurfaceOrganicMatter: InitialResidueName=maize; InitialResidueType=maize; InitialResidueMass=100; InitialStandingFraction=0; InitialCPR=0; InitialCNR=55
      Plant Soybean
      Manager Fertilise at sowing (disabled): same as 2007 Variety Trial.Maturity Group I.Fertilise at sowing
      Manager Sow on a fixed date
        Crop = [Soybean]
        SowDate = 13-may
        CultivarName = Generic_MG1
        SowingDepth = 50
        RowSpacing = 177.8
        Population = 49.4
        script: same as in 2007 Variety Trial.Maturity Group I.Sow on a fixed date
      Manager HarvestSoy
        Crop = [Soybean]
        Date = 26-sep
        script: same as in 2007 Variety Trial.Maturity Group I.HarvestSoy
      Soil Musgrave Soil WSS (disabled): same as 2007 Variety Trial.Maturity Group I.Musgrave Soil WSS
      Manager Harvesting (disabled): same as 2007 Variety Trial.Maturity Group I.Harvesting
      Soil Lima Lab Data: same as 2007 Variety Trial.Maturity Group I.Lima Lab Data
    Zone Maturity Group II: Area=1; Slope=0; AspectAngle=0; Altitude=50
      Report: EventNames=[Soybean].Harvesting
        VariableNames:
          [Clock].Today
          [Soybean].Phenology.Stage
          [Soybean].Phenology.CurrentStageName
          [Soybean].AboveGround.Wt
          [Soybean].AboveGround.N
          ([Soybean].Grain.Total.Wt*10)/67.19 as Yield
          [Soybean].LAI
      Fertiliser
      SurfaceOrganicMatter: InitialResidueName=maize; InitialResidueType=maize; InitialResidueMass=100; InitialStandingFraction=0; InitialCPR=0; InitialCNR=55
      Plant Soybean: same as 2008 Variety Trial.Maturity Group II.Soybean
      Manager Fertilise at sowing (disabled): same as 2007 Variety Trial.Maturity Group I.Fertilise at sowing
      Manager Sow on a fixed date
        Crop = [Soybean]
        SowDate = 13-may
        CultivarName = Generic_MG2
        SowingDepth = 50
        RowSpacing = 177.8
        Population = 49.4
        script: same as in 2007 Variety Trial.Maturity Group I.Sow on a fixed date
      Manager HarvestSoy
        Crop = [Soybean]
        Date = 27-sep
        script: same as in 2007 Variety Trial.Maturity Group I.HarvestSoy
      Soil Musgrave Soil WSS (disabled): same as 2007 Variety Trial.Maturity Group I.Musgrave Soil WSS
      Manager Harvesting (disabled): same as 2007 Variety Trial.Maturity Group I.Harvesting
      Soil Lima Lab Data: same as 2007 Variety Trial.Maturity Group I.Lima Lab Data
  Simulation 2012 Variety Trial
    Clock: Start=2012-01-01; End=2012-12-31
    Weather: FileName=/Users/stw52/Downloads/mus_iem.met
    Summary
    SoilArbitrator
    MicroClimate: a_interception=0; b_interception=1; c_interception=0; d_interception=0; SoilHeatFluxFraction=0.4; MinimumHeightDiffForNewLayer=0; NightInterceptionFraction=0.5; ReferenceHeight=2
    Zone Maturity Group I: Area=1; Slope=0; AspectAngle=0; Altitude=50
      Report: EventNames=[Soybean].Harvesting
        VariableNames:
          [Clock].Today
          [Soybean].Phenology.Stage
          [Soybean].Phenology.CurrentStageName
          [Soybean].AboveGround.Wt
          [Soybean].AboveGround.N
          ([Soybean].Grain.Total.Wt*10)/67.19 as Yield
          [Soybean].LAI
      Fertiliser
      SurfaceOrganicMatter: InitialResidueName=maize; InitialResidueType=maize; InitialResidueMass=100; InitialStandingFraction=0; InitialCPR=0; InitialCNR=55
      Plant Soybean
      Manager Fertilise at sowing (disabled): same as 2007 Variety Trial.Maturity Group I.Fertilise at sowing
      Manager Sow on a fixed date: same as 2007 Variety Trial.Maturity Group I.Sow on a fixed date
      Manager HarvestSoy
        Crop = [Soybean]
        Date = 13-sep
        script: same as in 2007 Variety Trial.Maturity Group I.HarvestSoy
      Soil Musgrave Soil WSS (disabled): same as 2007 Variety Trial.Maturity Group I.Musgrave Soil WSS
      Manager Harvesting (disabled): same as 2007 Variety Trial.Maturity Group I.Harvesting
      Soil Lima Lab Data: same as 2007 Variety Trial.Maturity Group I.Lima Lab Data
    Zone Maturity Group II: Area=1; Slope=0; AspectAngle=0; Altitude=50
      Report: EventNames=[Soybean].Harvesting
        VariableNames:
          [Clock].Today
          [Soybean].Phenology.Stage
          [Soybean].Phenology.CurrentStageName
          [Soybean].AboveGround.Wt
          [Soybean].AboveGround.N
          ([Soybean].Grain.Total.Wt*10)/67.19 as Yield
          [Soybean].LAI
      Fertiliser
      SurfaceOrganicMatter: InitialResidueName=maize; InitialResidueType=maize; InitialResidueMass=100; InitialStandingFraction=0; InitialCPR=0; InitialCNR=55
      Plant Soybean: same as 2008 Variety Trial.Maturity Group II.Soybean
      Manager Fertilise at sowing (disabled): same as 2007 Variety Trial.Maturity Group I.Fertilise at sowing
      Manager Sow on a fixed date: same as 2007 Variety Trial.Maturity Group II.Sow on a fixed date
      Manager HarvestSoy: same as 2008 Variety Trial.Maturity Group I.HarvestSoy
      Soil Musgrave Soil WSS (disabled): same as 2007 Variety Trial.Maturity Group I.Musgrave Soil WSS
      Manager Harvesting (disabled): same as 2007 Variety Trial.Maturity Group I.Harvesting
      Soil Lima Lab Data: same as 2007 Variety Trial.Maturity Group I.Lima Lab Data
  Simulation 2013 Variety Trial
    Clock: Start=2013-01-01; End=2013-12-31
    Weather: FileName=/Users/stw52/Downloads/mus_iem.met
    Summary
    SoilArbitrator
    MicroClimate: a_interception=0; b_interception=1; c_interception=0; d_interception=0; SoilHeatFluxFraction=0.4; MinimumHeightDiffForNewLayer=0; NightInterceptionFraction=0.5; ReferenceHeight=2
    Zone Maturity Group I: Area=1; Slope=0; AspectAngle=0; Altitude=50
      Report: EventNames=[Soybean].Harvesting
        VariableNames:
          [Clock].Today
          [Soybean].Phenology.Stage
          [Soybean].Phenology.CurrentStageName
          [Soybean].AboveGround.Wt
          [Soybean].AboveGround.N
          ([Soybean].Grain.Total.Wt*10)/67.19 as Yield
          [Soybean].LAI
      Fertiliser
      SurfaceOrganicMatter: InitialResidueName=maize; InitialResidueType=maize; InitialResidueMass=100; InitialStandingFraction=0; InitialCPR=0; InitialCNR=55
      Plant Soybean
      Manager Fertilise at sowing (disabled): same as 2007 Variety Trial.Maturity Group I.Fertilise at sowing
      Manager Sow on a fixed date: same as 2007 Variety Trial.Maturity Group I.Sow on a fixed date
      Manager HarvestSoy: same as 2011 Variety Trial.Maturity Group I.HarvestSoy
      Soil Musgrave Soil WSS (disabled): same as 2007 Variety Trial.Maturity Group I.Musgrave Soil WSS
      Manager Harvesting (disabled): same as 2007 Variety Trial.Maturity Group I.Harvesting
      Soil Lima Lab Data: same as 2007 Variety Trial.Maturity Group I.Lima Lab Data
    Zone Maturity Group II: Area=1; Slope=0; AspectAngle=0; Altitude=50
      Report: EventNames=[Soybean].Harvesting
        VariableNames:
          [Clock].Today
          [Soybean].Phenology.Stage
          [Soybean].Phenology.CurrentStageName
          [Soybean].AboveGround.Wt
          [Soybean].AboveGround.N
          ([Soybean].Grain.Total.Wt*10)/67.19 as Yield
          [Soybean].LAI
      Fertiliser
      SurfaceOrganicMatter: InitialResidueName=maize; InitialResidueType=maize; InitialResidueMass=100; InitialStandingFraction=0; InitialCPR=0; InitialCNR=55
      Plant Soybean: same as 2008 Variety Trial.Maturity Group II.Soybean
      Manager Fertilise at sowing (disabled): same as 2007 Variety Trial.Maturity Group I.Fertilise at sowing
      Manager Sow on a fixed date: same as 2007 Variety Trial.Maturity Group II.Sow on a fixed date
      Manager HarvestSoy
        Crop = [Soybean]
        Date = 2-oct
        script: same as in 2007 Variety Trial.Maturity Group I.HarvestSoy
      Soil Musgrave Soil WSS (disabled): same as 2007 Variety Trial.Maturity Group I.Musgrave Soil WSS
      Manager Harvesting (disabled): same as 2007 Variety Trial.Maturity Group I.Harvesting
      Soil Lima Lab Data: same as 2007 Variety Trial.Maturity Group I.Lima Lab Data
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