Simulations: Version=197
  DataStore
  Folder New York Simulations
    Simulation NY 2013
      Weather: FileName=/Users/stw52/Downloads/apsim_musgrave.met
      Clock: Start=2012-01-01; End=2013-11-19
      Summary
      SoilArbitrator
      Zone NY NT 2013: Area=1; Slope=2; AspectAngle=0; Altitude=50
        SurfaceOrganicMatter: InitialResidueName=Wheat; InitialResidueType=wheat; InitialResidueMass=0; InitialStandingFraction=1; InitialCPR=0; InitialCNR=30
        Fertiliser
        Report: EventNames=[Clock].EndOfDay
          VariableNames:
            [Clock].Today
            //===== Daily Values
            [Wheat].AboveGround.Wt*10 as rye_bm_kg_ha
            [Soybean].Grain.Wt*10 as soy_kg_ha
            sum([Soil].Water.MM - [Soil].Physical.DULmm) as SoilWaterDeficit
        MicroClimate: a_interception=0; b_interception=1; c_interception=0; d_interception=0; SoilHeatFluxFraction=0.4; MinimumHeightDiffForNewLayer=0; NightInterceptionFraction=0.5; ReferenceHeight=2
        Plant Wheat
          Cultivar CerealRye
            Command:
              [Phenology].Phyllochron.BasePhyllochron.FixedValue = 90
              [Leaf].CohortParameters.MaxArea.AreaLargestLeaves.FixedValue = 4000
              [Phenology].CAMP.FLNparams.MinLN = 7
              [Phenology].CAMP.FLNparams.PpLN = 2
              [Phenology].CAMP.FLNparams.VrnLN = 2
              [Phenology].CAMP.FLNparams.VxPLN = 2
              [Phenology].HeadEmergenceLongDayBase.FixedValue = 110
              [Phenology].HeadEmergencePpSensitivity.FixedValue = 0
              [Phenology].CAMP.EnvData.VrnTreatTemp = 4.4
              [Phenology].CAMP.EnvData.VrnTreatDuration = 60
              //[Leaf].Photosynthesis.RUE.FixedValue = 1.75
        Plant Soybean
        Operations
          2012-09-10  [SurfaceOrganicMatter].Incorporate(fraction: 1, depth: 150)
          2012-09-11  [Fertiliser].Apply(amount: 122, type: UreaN)
          2012-09-12  [Wheat].Sow(cultivar: CerealRye, population: 547, depth: 35, rowSpacing: 190)
          2013-06-18  [Wheat].EndCrop()
          2013-06-19  [Soybean].Sow(cultivar: Generic_MG1, population: 74, depth: 50, rowSpacing: 760)
          2013-10-17  [Soybean].Harvest
          2013-10-18  [Soybean].EndCrop
        Manager Harvest
          Crop = [Soybean]
```csharp
using APSIM.Shared.Utilities;
using Models.Utilities;
using Models.Soils;
using Models.PMF;
using Models.Core;
using System;
using System.Linq;

namespace Models
{
    [Serializable] 
    public class Script : Model
    {
        [Description("Crop")]
        public IPlant Crop { get; set; }
        
        [EventSubscribe("DoManagement")]
        private void OnDoManagement(object sender, EventArgs e)
        {
            if (Crop.IsReadyForHarvesting)
            {
                Crop.Harvest();
                Crop.EndCrop();
            }
        }
    }
}
```
        Soil Musgrave Soil WSS: ASCOrder=NA; ASCSubOrder=NA; SoilType=Lima Silt Loam; Site=Musgrave; NearestTown=Aurora; Region=Northeast United States; State=New York; Country=United States of America; NaturalVegetation=NA; ApsoilNumber=9999; Latitude=42.625; Longitude=-76.625; LocationAccuracy=+- 250 m; YearOfSampling=2019; DataSource=Web Soil Survey; Comments=Data filled in from Web Soil Survey of OCS field for 2024
          Water: Thickness=[150, 150, 150, 150, 200, 200, 200, 200, 300, 300]; FilledFromTop=true
            InitialValues=[0.25, 0.227, 0.2, 0.2, 0.15975, 0.15, 0.15, 0.15, 0.15, 0.15]
          Physical
            Thickness  ParticleSizeSand  ParticleSizeSilt  ParticleSizeClay  Rocks  BD    AirDry  LL15   DUL    SAT    KS
            150        26                55                19                0      1.29  0.075   0.15   0.25   0.463  864
            150        31.1              48.5              20.4              0      1.33  0.114   0.127  0.227  0.448  864
            150        37                41                22                0      1.47  0.1     0.1    0.2    0.395  432
            150        37                41                22                0      1.47  0.1     0.1    0.2    0.395  432
            150        40                41.7              18.3              0      1.64  0.063   0.063  0.163  0.331  432
            150        41                42                17                0      1.7   0.05    0.05   0.15   0.308  432
            1100       41                42                17                0      1.7   0.05    0.05   0.15   0.308  432
            Rocks source: Calculated (layer 2, 3, 4, 5, 6, 7)
            SoilCrop WheatSoil: LL=[0.15, 0.127, 0.1, 0.1, 0.063, 0.05, 0.05]; KL=[0.06, 0.06, 0.06, 0.055, 0.048, 0.039, 0.03]; XF=[1, 1, 1, 1, 0.959, 0, 0]
            SoilCrop MaizeSoil: LL=[0.15, 0.127, 0.1, 0.1, 0.063, 0.05, 0.05]; KL=[0.06, 0.06, 0.06, 0.055, 0.048, 0.039, 0.03]; XF=[1, 1, 1, 1, 0.959, 0.893, 0.857]
            SoilCrop SoybeanSoil: LL=[0.15, 0.127, 0.1, 0.1, 0.063, 0.05, 0.05]; KL=[0.06, 0.06, 0.06, 0.055, 0.048, 0.039, 0.03]; XF=[1, 1, 1, 1, 0.959, 0, 0]
          WaterBalance SoilWater: SummerDate=1-may; SummerU=6; SummerCona=4.2; WinterDate=1-nov; WinterU=6; WinterCona=2.2; DiffusConst=88; DiffusSlope=35.4; Salb=0.16; CN2Bare=73; CNRed=20; CNCov=0; DischargeWidth=5; CatchmentArea=10; PSIDul=-337; Thickness=[150, 150, 150, 150, 150, 150, 300, 200, 300, 300]
            SWCON=[0.513, 0.544, 0.551, 0.551, 0.572, 0.582, 0.582, 0.582, 0.582, 0.582]
          Organic: FOMCNRatio=40; CarbonUnits=Total
            Thickness  Carbon  SoilCNRatio  FBiom   FInert  FOM
            150        4.406   12           0.04    0.8     150
            150        1.837   12           0.0327  0.8     122.8
            150        1.038   12           0.0268  0.82    100.5
            150        0.807   12           0.0219  0.82    82.32
            200        0.647   12           0.018   0.83    67.4
            200        0.549   12           0.015   0.84    55.18
            200        0.49    12           0.012   0.85    45.18
            200        0.466   12           0.01    0.86    37
            300        0.437   12           0.008   0.87    30.3
            300        0.402   12           0.007   0.88    24.8
          Chemical: PHUnits=Water
            Thickness  PH    CEC
            150        6.23  16.7285
            150        6.3   11.66375
            150        6.33  10.6885
            150        6.38  10.16875
            200        6.45  8.951825
            200        6.55  8.52125
            200        6.61  8.3885
            200        6.63  8.3345
            300        6.66  8.26925
            300        6.68  8.1905
            CEC source: Calculated
          Nutrient
          Solute NO3: Thickness=[150, 150, 150, 150, 200, 200, 200, 200, 300, 300]; InitialValuesUnits=ppm; WaterTableConcentration=0; D0=0; DepthConstant=0; MaxDepthSoluteAccessible=0; RunoffEffectivenessAtMovingSolute=0; MaxEffectiveRunoff=0
            InitialValues=[0.5, 0.495, 0.49, 0.485, 0.48, 0.476, 0.471, 0.466, 0.462, 0.457]
          Solute NH4: Thickness=[150, 150, 150, 150, 200, 200, 200, 200, 300, 300]; InitialValuesUnits=ppm; WaterTableConcentration=0; D0=0; DepthConstant=0; MaxDepthSoluteAccessible=0; RunoffEffectivenessAtMovingSolute=0; MaxEffectiveRunoff=0
            InitialValues=[0.05, 0.0495, 0.049, 0.0485, 0.048, 0.0475, 0.047, 0.0465, 0.046, 0.045]
          Solute Urea: Thickness=[150, 150, 150, 150, 200, 200, 200, 200, 300, 300]; InitialValues=[0, 0, 0, 0, 0, 0, 0, 0, 0, 0]; InitialValuesUnits=kg/ha; WaterTableConcentration=0; D0=0; DepthConstant=0; MaxDepthSoluteAccessible=0; RunoffEffectivenessAtMovingSolute=0; MaxEffectiveRunoff=0
          SoilTemperature CERESSoilTemperature
          CERESSoilTemperature Temperature
        Soil Lima Lab Data: ASCOrder=NA; ASCSubOrder=NA; SoilType=Lima Silt Loam; Site=Musgrave; NearestTown=Aurora; Region=Northeast United States; State=New York; Country=United States of America; NaturalVegetation=NA; ApsoilNumber=9999; Latitude=42.625; Longitude=-76.625; LocationAccuracy=+- 250 m; YearOfSampling=1985; DataSource=Soil Lab Data; Comments=Data filled from Soil Lab Data from USDA soil survey
          Water: Thickness=[150, 100, 50, 160, 400, 180]; InitialValues=[0.283, 0.284, 0.277, 0.276, 0.251, 0.231]; FilledFromTop=true
          Physical
            Thickness  ParticleSizeSand  ParticleSizeSilt  ParticleSizeClay  Rocks  BD    AirDry  LL15   DUL    SAT    KS
            150        41.4              41.2              17.4              10     1.38  0.061   0.122  0.283  0.403  207
            100        41.4              41.2              17.4              10     1.38  0.061   0.122  0.284  0.403  207
            50         41.8              38.7              19.5              10     1.46  0.102   0.128  0.277  0.389  136
            160        42.1              34                23.9              10     1.55  0.142   0.142  0.276  0.377  79
            400        38.8              47.6              13.6              15     1.55  0.108   0.108  0.251  0.361  130
            180        38.6              48                13.4              15     1.73  0.111   0.111  0.231  0.323  61
            SoilCrop WheatSoil: LL=[0.122, 0.122, 0.128, 0.142, 0.108, 0.111]; KL=[0.06, 0.06, 0.055, 0.048, 0.039, 0.029]; XF=[1, 1, 1, 1, 0.959, 0]
            SoilCrop MaizeSoil: LL=[0.122, 0.122, 0.128, 0.142, 0.108, 0.111]; KL=[0.06, 0.06, 0.055, 0.048, 0.039, 0.029]; XF=[1, 1, 1, 1, 0.959, 0.893]
            SoilCrop SoybeanSoil: LL=[0.122, 0.122, 0.128, 0.142, 0.108, 0.111]; KL=[0.06, 0.06, 0.055, 0.048, 0.039, 0.029]; XF=[1, 1, 1, 1, 1, 0]
          WaterBalance SoilWater: SummerDate=1-jun; SummerU=6; SummerCona=4; WinterDate=1-nov; WinterU=6; WinterCona=4; DiffusConst=88; DiffusSlope=35.4; Salb=0.13; CN2Bare=73; CNRed=20; CNCov=0; DischargeWidth=5; CatchmentArea=10; PSIDul=-336.6; Thickness=[150, 80, 70, 110, 230, 220]; SWCON=[0.457, 0.464, 0.47, 0.481, 0.451, 0.469]
          Organic: FOMCNRatio=40; CarbonUnits=Total
            Thickness  Carbon  SoilCNRatio  FBiom  FInert  FOM
            150        1.78    8            0.04   0.193   100
            80         1.78    8            0.031  0.395   70
            70         0.87    8            0.014  0.667   60
            110        0.87    8            0.01   0.832   40
            230        0.87    8            0.01   0.99    20
            220        0.87    8            0.01   0.99    10
          Chemical: PHUnits=Water
            Thickness  PH    CEC
            150        6.23  16.7285
            150        6.3   11.66375
            150        6.33  10.6885
            150        6.38  10.1688
            200        6.45  8.95183
            200        6.55  8.52125
            200        6.61  8.3885
            200        6.63  8.3345
            300        6.66  8.26925
            300        6.68  8.1905
            CEC source: Calculated
          Nutrient
          Solute NO3: Thickness=[150, 150, 150, 150, 200, 200, 200, 200, 300, 300]; InitialValues=[0, 0, 0, 0, 0, 0, 0, 0, 0, 0]; InitialValuesUnits=ppm; WaterTableConcentration=0; D0=0; DepthConstant=0; MaxDepthSoluteAccessible=0; RunoffEffectivenessAtMovingSolute=0; MaxEffectiveRunoff=0
          Solute NH4: same as New York Simulations.NY 2013.NY NT 2013.Lima Lab Data.NO3
          Solute Urea: same as New York Simulations.NY 2013.NY NT 2013.Musgrave Soil WSS.Urea
          SoilTemperature CERESSoilTemperature
          CERESSoilTemperature Temperature
      Zone NY Till 2013: Area=1; Slope=2; AspectAngle=0; Altitude=50
        SurfaceOrganicMatter: InitialResidueName=Wheat; InitialResidueType=wheat; InitialResidueMass=0; InitialStandingFraction=1; InitialCPR=0; InitialCNR=30
        Fertiliser
        Report: EventNames=[Clock].EndOfDay
          VariableNames:
            [Clock].Today
            //===== Daily Values
            [Wheat].AboveGround.Wt*10 as rye_bm_kg_ha
            [Soybean].Grain.Wt*10 as soy_kg_ha
            sum([Soil].Water.MM - [Soil].Physical.DULmm) as SoilWaterDeficit
        MicroClimate: a_interception=0; b_interception=1; c_interception=0; d_interception=0; SoilHeatFluxFraction=0.4; MinimumHeightDiffForNewLayer=0; NightInterceptionFraction=0.5; ReferenceHeight=2
        Plant Wheat
          Cultivar CerealRye
            Command:
              [Phenology].Phyllochron.BasePhyllochron.FixedValue = 90
              [Leaf].CohortParameters.MaxArea.AreaLargestLeaves.FixedValue = 4000
              [Phenology].CAMP.FLNparams.MinLN = 7
              [Phenology].CAMP.FLNparams.PpLN = 2
              [Phenology].CAMP.FLNparams.VrnLN = 5
              [Phenology].CAMP.FLNparams.VxPLN = 2
              [Phenology].HeadEmergenceLongDayBase.FixedValue = 110
              [Phenology].HeadEmergencePpSensitivity.FixedValue = 0
              [Phenology].CAMP.EnvData.VrnTreatTemp = 4.4
              [Phenology].CAMP.EnvData.VrnTreatDuration = 60
              [Phenology].Vernalising.Target = 26
        Plant Soybean
          Cultivar Musgrave 1
            Command:
              [Phenology].Vegetative.Target.FixedValue = 340
              [Phenology].EarlyFlowering.Target.FixedValue = 120
              [Phenology].EarlyGrainFilling.Target.FractionofGrainfilling.FixedValue = 0.3
              [Phenology].LateGrainFilling.Target.EntireGrainfillPeriod.FixedValue = 632
              [Phenology].VegetativePhotoperiodModifier.XYPairs.X = 13.84, 19
              [Phenology].ReproductivePhotoperiodModifier.XYPairs.X = 13.84, 19
        Operations
          2013-06-07  [SurfaceOrganicMatter].Incorporate(fraction: 1, depth: 150)
          2013-06-19  [Soybean].Sow(cultivar: Generic_MG1, population: 74, depth: 50, rowSpacing: 760)
          2013-10-17  [Soybean].Harvest
          2013-10-18  [Soybean].EndCrop
        Soil Musgrave Soil WSS: same as New York Simulations.NY 2013.NY NT 2013.Musgrave Soil WSS
        Soil Lima Lab Data: same as New York Simulations.NY 2013.NY NT 2013.Lima Lab Data
    Simulation NY 2014
      Weather: FileName=musgrave_apsim_weather.csv
        ConstantsFile=/Users/stw52/Library/CloudStorage/Box-Box/TOTO OREI/Yield Gap Soy NT vs Till/NY-WI Rye Soy YGA Sam/Data/Weather data/APSIM Ready Weather Files and Constant Files/Musgrave/musgrave_constants.txt
      Clock: Start=2013-01-01; End=2014-12-19
      Summary
      SoilArbitrator
      Zone NY NT 2014: Area=1; Slope=2; AspectAngle=0; Altitude=50
        SurfaceOrganicMatter: InitialResidueName=Wheat; InitialResidueType=wheat; InitialResidueMass=0; InitialStandingFraction=1; InitialCPR=0; InitialCNR=30
        Fertiliser
        Report: EventNames=[Clock].EndOfDay
          VariableNames:
            [Clock].Today
            //===== Daily Values
            [Wheat].AboveGround.Wt*10 as rye_bm_kg_ha
            [Soybean].Grain.Wt*10 as soy_kg_ha
            sum([Soil].Water.MM - [Soil].Physical.DULmm) as SoilWaterDeficit
            [Soil].Water.Volumetric as vwc
            [Soil].Water.Potential as pot
        MicroClimate: a_interception=0; b_interception=1; c_interception=0; d_interception=0; SoilHeatFluxFraction=0.4; MinimumHeightDiffForNewLayer=0; NightInterceptionFraction=0.5; ReferenceHeight=2
        Soil Musgrave Soil WSS: ASCOrder=NA; ASCSubOrder=NA; SoilType=Lima Silt Loam; Site=Musgrave; NearestTown=Aurora; Region=Northeast United States; State=New York; Country=United States of America; NaturalVegetation=NA; ApsoilNumber=9999; Latitude=42.625; Longitude=-76.625; LocationAccuracy=+- 250 m; YearOfSampling=2019; DataSource=Web Soil Survey; Comments=Data filled in from Web Soil Survey of OCS field for 2024
          Water: Thickness=[150, 150, 150, 150, 200, 200, 200, 200, 300, 300]; InitialValues=[0.25, 0.227, 0.2, 0.2, 0.16, 0.15, 0.15, 0.15, 0.15, 0.15]; FilledFromTop=true
          Physical
            Thickness  ParticleSizeSand  ParticleSizeSilt  ParticleSizeClay  Rocks  BD    AirDry  LL15   DUL    SAT    KS
            150        26                55                19                0      1.29  0.075   0.15   0.25   0.463  864
            150        31.1              48.5              20.4              0      1.33  0.114   0.127  0.227  0.448  864
            150        37                41                22                0      1.47  0.1     0.1    0.2    0.395  432
            150        37                41                22                0      1.47  0.1     0.1    0.2    0.395  432
            150        40                41.7              18.3              0      1.64  0.063   0.063  0.163  0.331  432
            150        41                42                17                0      1.7   0.05    0.05   0.15   0.308  432
            1100       41                42                17                0      1.7   0.05    0.05   0.15   0.308  432
            Rocks source: Calculated
            SoilCrop WheatSoil: LL=[0.15, 0.127, 0.1, 0.1, 0.063, 0.05, 0.05]; KL=[0.06, 0.06, 0.06, 0.055, 0.048, 0.039, 0.03]; XF=[1, 1, 1, 1, 0.959, 0, 0]
            SoilCrop MaizeSoil: LL=[0.15, 0.127, 0.1, 0.1, 0.063, 0.05, 0.05]; KL=[0.06, 0.06, 0.06, 0.055, 0.048, 0.039, 0.03]; XF=[1, 1, 1, 1, 0.959, 0, 0]
            SoilCrop SoybeanSoil: LL=[0.15, 0.127, 0.1, 0.1, 0.063, 0.05, 0.05]; KL=[0.06, 0.06, 0.06, 0.055, 0.048, 0.039, 0.03]; XF=[1, 1, 1, 1, 0.959, 0, 0]
          WaterBalance SoilWater: SummerDate=1-may; SummerU=6; SummerCona=4.2; WinterDate=1-nov; WinterU=2; WinterCona=2; DiffusConst=67.97; DiffusSlope=34.12; Salb=0.13; CN2Bare=73; CNRed=20; CNCov=0; DischargeWidth=5; CatchmentArea=10; PSIDul=-100; Thickness=[150, 150, 150, 150, 200, 200, 200, 200, 300, 300]
            SWCON=[0.457, 0.464, 0.47, 0.481, 0.451, 0.469, 0.479, 0.48, 0.418, 0.419]
          Organic: FOMCNRatio=40; CarbonUnits=Total
            Thickness  Carbon  SoilCNRatio  FBiom  FInert  FOM
            150        4.406   8            0.04   0.193   0
            150        1.837   8            0.031  0.395   0
            150        1.038   8            0.014  0.667   0
            150        0.807   8            0.01   0.832   0
            200        0.647   8            0.01   0.99    0
            200        0.549   8            0.01   0.99    0
            200        0.49    8            0.01   0.99    0
            200        0.466   8            0.01   0.99    0
            300        0.437   8            0.01   0.99    0
            300        0.402   8            0.01   0.99    0
          Chemical: same as New York Simulations.NY 2013.NY NT 2013.Lima Lab Data.Chemical
          Nutrient
          Solute NO3: same as New York Simulations.NY 2013.NY NT 2013.Lima Lab Data.NO3
          Solute NH4: same as New York Simulations.NY 2013.NY NT 2013.Lima Lab Data.NO3
          Solute Urea: same as New York Simulations.NY 2013.NY NT 2013.Musgrave Soil WSS.Urea
          SoilTemperature CERESSoilTemperature
        Plant Wheat
          Cultivar CerealRye
            Command:
              [Phenology].Phyllochron.BasePhyllochron.FixedValue = 90
              [Leaf].CohortParameters.MaxArea.AreaLargestLeaves.FixedValue = 4000
              [Phenology].CAMP.FLNparams.MinLN = 7
              [Phenology].CAMP.FLNparams.PpLN = 2
              [Phenology].CAMP.FLNparams.VrnLN = 2
              [Phenology].CAMP.FLNparams.VxPLN = 2
              [Phenology].HeadEmergenceLongDayBase.FixedValue = 110
              [Phenology].HeadEmergencePpSensitivity.FixedValue = 0
              [Phenology].CAMP.EnvData.VrnTreatTemp = 4.4
              [Phenology].CAMP.EnvData.VrnTreatDuration = 60
        Manager Simple Rotation
          Crops = Wheat, Soybean
```csharp
using Models.Soils;
using System.Collections.Generic;
using APSIM.Shared.Utilities;
using Models.PMF;
using Models.Interfaces;
using Models.Core;
using System;

namespace Models;

[Serializable]
public class Script : Model
{
    [Link] IClock Clock;
    [Link] ISummary Summary;
    
    [Description("Rotation Sequence (comma separated crop names)")]
    public string[] Crops { get; set; }
    
    // Repeating cycle of input crops. Don't loop on this, loop on Crops
    private IEnumerable<string> cropsEnum()
    {
        var counter = 0;
        while (true)
        {
            yield return Crops[counter];
            ++counter;
            if (counter >= Crops.Length)
                counter = 0;
        }
    }
    
    private IEnumerator<string> cropCycle;
    
    [Description("Next crop to sow in the simple rotation.")]
    public string NextCrop { get => cropCycle.Current; }
    
    [EventSubscribe("StartOfSimulation")]
    private void Init(object sender, EventArgs e)
    {
        // TODO: Error if Crops is empty.
        cropCycle = cropsEnum().GetEnumerator();
        // Set to first value.
        cropCycle.MoveNext();
    }

    [EventSubscribe("PlantEnding")]
    private void OnEndCrop(object sender, EventArgs e)
    {
        if ((sender as Model).Name.ToLower() != NextCrop.ToLower())
        	return;
        var oldCrop = NextCrop;
        cropCycle.MoveNext();
        var newCrop = NextCrop;
        Summary.WriteMessage(this, $"Rotation finished with {oldCrop}, next up: {newCrop}.", MessageType.Information);
    }
}
```
        Manager EndWheat
          Crop = [Wheat]
          Date = 15-jun
```csharp
using APSIM.Shared.Utilities;
using Models.Utilities;
using Models.Soils;
using Models.PMF;
using Models.Core;
using System;

namespace Models;

[Serializable]
public class Script : Model
{
    [Link] IClock Clock;
    [Separator("End a crop without harvesting. Grain will go to the surface.")]
    [Description("Crop")]
    public IPlant Crop { get; set; }
    
    [Description("Date to end crop on (d-mmm)")]
    public string Date { get; set; }
    
    [EventSubscribe("DoManagement")]
    private void OnDoManagement(object sender, EventArgs e)
    {
        if (DateUtilities.DatesAreEqual(Date, Clock.Today) && Crop.IsAlive)
        {
            Crop.EndCrop();
        }
    }
}
```
        Manager SowWheat
          Rotations = [Simple Rotation]
          Crop = [Wheat]
          SowDate = 7-sep
          CultivarName = CerealRye
          SowingDepth = 25
          RowSpacing = 190
          Population = 547
```csharp
using APSIM.Core;
using System;
using Models.Core;
using Models.PMF;
using Models.Soils;
using Models.Utilities;
using APSIM.Shared.Utilities;

namespace Models;

[Serializable]
public class Script : Model, ILocatorDependency
{
        [Link] private Clock Clock;
        [Link] private Fertiliser Fertiliser;
        [Link] private Summary Summary;
        [Link] private Soil Soil;
        [NonSerialized]
        private ILocator locator;
    
    [Description("Simple Rotation Manager")]
    public Manager Rotations { get; set; }
    
    [Separator("Sowing Info")]
    
    [Description("Crop")]
    public IPlant Crop { get; set; }

    [Description("Sowing date (d-mmm)")]
    public string SowDate { get; set; }

    [Display(Type = DisplayType.CultivarName)]
    [Description("Cultivar to be sown")]
    public string CultivarName { get; set; }

    [Description("Sowing depth (mm)")]
    public double SowingDepth { get; set; }

    [Description("Row spacing (mm)")]
    public double RowSpacing { get; set; }

    [Description("Plant population (/m2)")]
    public double Population { get; set; }

        public void SetLocator(ILocator locator) => this.locator = locator;

    [EventSubscribe("DoManagement")]
    private void OnDoManagement(object sender, EventArgs e)
    {
        if (DateUtilities.DatesEqual(SowDate, Clock.Today))
        {
            var thisCrop = Crop.Name.ToLower();
            var nextCrop = (string)Rotations?locator.GetObject("Script.NextCrop")?.Value;
            // Rotations could be null. If so, just proceed with sowing.
            if (thisCrop == (nextCrop?.ToLower() ?? thisCrop))
                Crop.Sow(population: Population,
                         cultivar: CultivarName,
                         depth: SowingDepth,
                         rowSpacing: RowSpacing);    
        }
    }
}
```
        Manager Fertilise
          Crop = [Wheat]
          FertiliserType = UreaN
          Amount = 122
```csharp
using Models.Soils;
using System;
using Models.Core;
using Models.PMF;
namespace Models
{
    [Serializable]
    public class Script : Model
    {
        [Link] Clock Clock;
        [Link] Fertiliser Fertiliser;
        
        [Description("Crop to be fertilised")]
        public IPlant Crop { get; set; }

        [Description("Type of fertiliser to apply? ")] 
        [Display(Type = DisplayType.FertiliserType)]public string FertiliserType { get; set; }
    
        [Description("Amount of fertiliser to be applied (kg/ha)")]
        public double Amount { get; set; }
        
        [EventSubscribe("Sowing")]
        private void OnSowing(object sender, EventArgs e)
        {
            Model crop = sender as Model;
            if (Crop != null && crop.Name.ToLower() == (Crop as IModel).Name.ToLower())
                Fertiliser.Apply(amount: Amount, type: FertiliserType);
        }
    }
}
```
        Manager HarvestSoy
          Crop = [Soybean]
          Date = 3-Nov
```csharp
using APSIM.Shared.Utilities;
using Models.Utilities;
using Models.Soils;
using Models.PMF;
using Models.Core;
using System;

namespace Models;

[Serializable] 
public class Script : Model
{
    [Link] IClock Clock;
    
    [Separator("Harvesting script that forces harvesting")]
    [Description("Crop")]
    public IPlant Crop { get; set; }
    
    [Description("Date to force harvesting by if crop is not ready (d-mmm)")]
    public string Date { get; set; }
    
    [EventSubscribe("DoManagement")]
    private void OnDoManagement(object sender, EventArgs e)
    {
        if (Crop.IsReadyForHarvesting || 
            (DateUtilities.DatesAreEqual(Date, Clock.Today) && Crop.IsAlive))
        {
            Crop.Harvest();
            Crop.EndCrop();
        }
    }
}
```
        Plant Soybean
        Operations
          2013-09-05  [SurfaceOrganicMatter].Incorporate(fraction: 1, depth: 150)
          2013-09-06  [Fertiliser].Apply(amount: 122, type: UreaN)
          2013-09-07  [Wheat].Sow(cultivar: CerealRye, population: 547, depth: 25, rowSpacing: 190)
          2014-06-15  [Wheat].EndCrop
          2014-06-16  [Soybean].Sow(cultivar: Generic_MG1, population: 53, depth: 50, rowSpacing: 760)
          2014-11-30  [Soybean].Harvest
          2014-12-01  [Soybean].EndCrop
        Soil Lima Lab Data: same as New York Simulations.NY 2013.NY NT 2013.Lima Lab Data
      Zone NY Till 2014: Area=1; Slope=2; AspectAngle=0; Altitude=50
        SurfaceOrganicMatter: InitialResidueName=Wheat; InitialResidueType=wheat; InitialResidueMass=0; InitialStandingFraction=1; InitialCPR=0; InitialCNR=30
        Fertiliser
        Report: same as New York Simulations.NY 2014.NY NT 2014.Report
        MicroClimate: a_interception=0; b_interception=1; c_interception=0; d_interception=0; SoilHeatFluxFraction=0.4; MinimumHeightDiffForNewLayer=0; NightInterceptionFraction=0.5; ReferenceHeight=2
        Soil Musgrave Soil WSS: ASCOrder=NA; ASCSubOrder=NA; SoilType=Lima Silt Loam; Site=Musgrave; NearestTown=Aurora; Region=Northeast United States; State=New York; Country=United States of America; NaturalVegetation=NA; ApsoilNumber=9999; Latitude=42.625; Longitude=-76.625; LocationAccuracy=+- 250 m; YearOfSampling=2019; DataSource=Web Soil Survey; Comments=Data filled in from Web Soil Survey of OCS field for 2024
          Water: Thickness=[150, 150, 150, 150, 200, 200, 200, 200, 300, 300]; InitialValues=[0.25, 0.227, 0.2, 0.2, 0.16, 0.15, 0.15, 0.15, 0.15, 0.15]; FilledFromTop=true
          Physical
            Thickness  ParticleSizeSand  ParticleSizeSilt  ParticleSizeClay  Rocks  BD    AirDry  LL15   DUL    SAT    KS
            150        26                55                19                0      1.29  0.075   0.15   0.25   0.463  864
            150        31.1              48.5              20.4              0      1.33  0.114   0.127  0.227  0.448  864
            150        37                41                22                0      1.47  0.1     0.1    0.2    0.395  432
            150        37                41                22                0      1.47  0.1     0.1    0.2    0.395  432
            150        40                41.7              18.3              0      1.64  0.063   0.063  0.163  0.331  432
            150        41                42                17                0      1.7   0.05    0.05   0.15   0.308  432
            1100       41                42                17                0      1.7   0.05    0.05   0.15   0.308  432
            Rocks source: Calculated
            SoilCrop WheatSoil: LL=[0.15, 0.127, 0.1, 0.1, 0.063, 0.05, 0.05]; KL=[0.06, 0.06, 0.06, 0.055, 0.048, 0.039, 0.03]; XF=[1, 1, 1, 1, 0.959, 0, 0]
            SoilCrop MaizeSoil: same as New York Simulations.NY 2013.NY NT 2013.Musgrave Soil WSS.Physical.MaizeSoil
            SoilCrop SoybeanSoil: LL=[0.15, 0.127, 0.1, 0.1, 0.063, 0.05, 0.05]; KL=[0.06, 0.06, 0.06, 0.055, 0.048, 0.039, 0.03]; XF=[1, 1, 1, 1, 0.959, 0, 0]
          WaterBalance SoilWater: same as New York Simulations.NY 2014.NY NT 2014.Musgrave Soil WSS.SoilWater
          Organic: same as New York Simulations.NY 2014.NY NT 2014.Musgrave Soil WSS.Organic
          Chemical: same as New York Simulations.NY 2013.NY NT 2013.Lima Lab Data.Chemical
          Nutrient
          Solute NO3: same as New York Simulations.NY 2013.NY NT 2013.Lima Lab Data.NO3
          Solute NH4: same as New York Simulations.NY 2013.NY NT 2013.Lima Lab Data.NO3
          Solute Urea: same as New York Simulations.NY 2013.NY NT 2013.Musgrave Soil WSS.Urea
          SoilTemperature CERESSoilTemperature
        Plant Wheat
          Cultivar CerealRye
            Command:
              [Phenology].Phyllochron.BasePhyllochron.FixedValue = 90
              [Leaf].CohortParameters.MaxArea.AreaLargestLeaves.FixedValue = 4000
              [Phenology].CAMP.FLNparams.MinLN = 7
              [Phenology].CAMP.FLNparams.PpLN = 2
              [Phenology].CAMP.FLNparams.VrnLN = 5
              [Phenology].CAMP.FLNparams.VxPLN = 2
              [Phenology].HeadEmergenceLongDayBase.FixedValue = 110
              [Phenology].HeadEmergencePpSensitivity.FixedValue = 0
              [Phenology].CAMP.EnvData.VrnTreatTemp = 4.4
              [Phenology].CAMP.EnvData.VrnTreatDuration = 60
              [Leaf].Photosynthesis.RUE.FixedValue = 1.24
              [Phenology].Vernalising.Target = 26
        Manager Simple Rotation: same as New York Simulations.NY 2014.NY NT 2014.Simple Rotation
        Manager EndWheat: same as New York Simulations.NY 2014.NY NT 2014.EndWheat
        Manager SowWheat: same as New York Simulations.NY 2014.NY NT 2014.SowWheat
        Manager Fertilise: same as New York Simulations.NY 2014.NY NT 2014.Fertilise
        Manager HarvestSoy: same as New York Simulations.NY 2014.NY NT 2014.HarvestSoy
        Plant Soybean
        Operations
          2013-09-05  [SurfaceOrganicMatter].Incorporate(fraction: 1, depth: 150)
          2013-09-06  [Fertiliser].Apply(amount: 122, type: UreaN)
          2014-05-30  [SurfaceOrganicMatter].Incorporate(fraction:1, depth:150)
          2014-06-16  [Soybean].Sow(cultivar: Generic_MG1, population: 53, depth: 50, rowSpacing: 760)
          2014-11-30  [Soybean].Harvest
          2014-12-01  [Soybean].EndCrop
        Soil Lima Lab Data: same as New York Simulations.NY 2013.NY NT 2013.Lima Lab Data
    Simulation NY 2015
      Weather: FileName=/Users/stw52/Downloads/daymet_musgrave_apsimx_leap.met
      Clock: Start=2014-01-01; End=2015-11-19
      Summary
      SoilArbitrator
      Zone NY NT 2015: Area=1; Slope=2; AspectAngle=0; Altitude=50
        SurfaceOrganicMatter: InitialResidueName=Wheat; InitialResidueType=wheat; InitialResidueMass=0; InitialStandingFraction=1; InitialCPR=0; InitialCNR=30
        Fertiliser
        Report: EventNames=[Clock].EndOfDay
          VariableNames:
            [Clock].Today
            //===== Daily Values
            [Wheat].AboveGround.Wt*10 as rye_bm_kg_ha
            [Soybean].Grain.Wt*10 as soy_kg_ha
            sum([Soil].Water.MM - [Soil].Physical.DULmm) as SoilWaterDeficit
            [Soybean].LAI as lai
        MicroClimate: a_interception=0; b_interception=1; c_interception=0; d_interception=0; SoilHeatFluxFraction=0.4; MinimumHeightDiffForNewLayer=0; NightInterceptionFraction=0.5; ReferenceHeight=2
        Soil Musgrave Soil WSS (disabled): ASCOrder=NA; ASCSubOrder=NA; SoilType=Lima Silt Loam; Site=Musgrave; NearestTown=Aurora; Region=Northeast United States; State=New York; Country=United States of America; NaturalVegetation=NA; ApsoilNumber=9999; Latitude=42.625; Longitude=-76.625; LocationAccuracy=+- 250 m; YearOfSampling=2019; DataSource=Web Soil Survey; Comments=Data filled in from Web Soil Survey of OCS field for 2024
          Water: Thickness=[150, 150, 150, 150, 200, 200, 200, 200, 300, 300]; InitialValues=[0.25, 0.227, 0.2, 0.2, 0.16, 0.15, 0.15, 0.15, 0.15, 0.15]; FilledFromTop=true
          Physical
            Thickness  ParticleSizeSand  ParticleSizeSilt  ParticleSizeClay  Rocks  BD    AirDry  LL15   DUL    SAT    KS
            150        26                55                19                0      1.29  0.075   0.15   0.25   0.463  864
            150        31.1              48.5              20.4              0      1.33  0.114   0.127  0.227  0.448  864
            150        37                41                22                0      1.47  0.1     0.1    0.2    0.395  432
            150        37                41                22                0      1.47  0.1     0.1    0.2    0.395  432
            150        40                41.7              18.3              0      1.64  0.063   0.063  0.163  0.331  432
            150        41                42                17                0      1.7   0.05    0.05   0.15   0.308  432
            1100       41                42                17                0      1.7   0.05    0.05   0.15   0.308  432
            Rocks source: Calculated
            SoilCrop WheatSoil: LL=[0.15, 0.127, 0.1, 0.1, 0.063, 0.05, 0.05]; KL=[0.06, 0.06, 0.06, 0.055, 0.048, 0.039, 0.03]; XF=[1, 1, 1, 1, 0.959, 0, 0]
            SoilCrop MaizeSoil: LL=[0.15, 0.127, 0.1, 0.1, 0.063, 0.05, 0.05]; KL=[0.06, 0.06, 0.06, 0.055, 0.048, 0.039, 0.03]; XF=[1, 1, 1, 1, 0.959, 0.893, 0.857]
            SoilCrop SoybeanSoil: LL=[0.15, 0.127, 0.1, 0.1, 0.063, 0.05, 0.05]; KL=[0.06, 0.06, 0.06, 0.055, 0.048, 0.039, 0.03]; XF=[1, 1, 1, 1, 0.959, 0, 0]
          WaterBalance SoilWater: SummerDate=1-may; SummerU=6; SummerCona=4.2; WinterDate=1-nov; WinterU=6; WinterCona=2; DiffusConst=67.97; DiffusSlope=34.12; Salb=0.13; CN2Bare=73; CNRed=20; CNCov=0; DischargeWidth=5; CatchmentArea=10; PSIDul=-100; Thickness=[150, 150, 150, 150, 200, 200, 200, 200, 300, 300]
            SWCON=[0.457, 0.464, 0.47, 0.481, 0.451, 0.469, 0.479, 0.48, 0.418, 0.419]
          Organic: FOMCNRatio=40; CarbonUnits=Total
            Thickness  Carbon  SoilCNRatio  FBiom  FInert  FOM
            150        4.406   8            0.04   0.193   0
            150        1.837   8            0.031  0.395   0
            150        1.038   8            0.014  0.667   0
            150        0.807   8            0.01   0.832   0
            200        0.647   8            0.01   0.99    0
            200        0.549   8            0.01   0.99    0
            200        0.49    8            0.01   0.99    0
            200        0.466   8            0.01   0.99    0
            300        0.437   8            0.01   0.99    0
            300        0.402   8            0.01   0.99    0
          Chemical: PHUnits=Water
            Thickness  PH    CEC
            150        6.23  16.7285
            150        6.3   11.66375
            150        6.33  10.6885
            150        6.38  10.1688
            200        6.45  8.95183
            200        6.55  8.52125
            200        6.61  8.3885
            200        6.63  8.3345
            300        6.66  8.26925
            300        6.68  8.1905
            CEC source: Calculated
          Nutrient
          Solute NO3: Thickness=[150, 150, 150, 150, 200, 200, 200, 200, 300, 300]; InitialValues=[0, 0, 0, 0, 0, 0, 0, 0, 0, 0]; InitialValuesUnits=ppm; WaterTableConcentration=0; D0=0; DepthConstant=0; MaxDepthSoluteAccessible=0; RunoffEffectivenessAtMovingSolute=0; MaxEffectiveRunoff=0
          Solute NH4: same as New York Simulations.NY 2015.NY NT 2015.Musgrave Soil WSS.NO3
          Solute Urea: Thickness=[150, 150, 150, 150, 200, 200, 200, 200, 300, 300]; InitialValues=[0, 0, 0, 0, 0, 0, 0, 0, 0, 0]; InitialValuesUnits=kg/ha; WaterTableConcentration=0; D0=0; DepthConstant=0; MaxDepthSoluteAccessible=0; RunoffEffectivenessAtMovingSolute=0; MaxEffectiveRunoff=0
          SoilTemperature CERESSoilTemperature
        Plant Wheat: same as New York Simulations.NY 2014.NY Till 2014.Wheat
        Manager Simple Rotation (disabled)
          Crops = Wheat, Soybean
          script: same as in New York Simulations.NY 2014.NY NT 2014.Simple Rotation
        Manager EndWheat (disabled)
          Crop = [Wheat]
          Date = 3-jun
          script: same as in New York Simulations.NY 2014.NY NT 2014.EndWheat
        Manager Fertilise (disabled)
          Crop = [Wheat]
          FertiliserType = UreaN
          Amount = 122
          script: same as in New York Simulations.NY 2014.NY NT 2014.Fertilise
        Manager SowSoy (disabled)
          Rotations = [Simple Rotation]
          Crop = [Soybean]
          SowDate = 4-jun
          CultivarName = Generic_MG2
          SowingDepth = 25
          RowSpacing = 760
          Population = 74
          script: same as in New York Simulations.NY 2014.NY NT 2014.SowWheat
        Manager HarvestSoy (disabled)
          Crop = [Soybean]
          Date = 12-oct
          script: same as in New York Simulations.NY 2014.NY NT 2014.HarvestSoy
        Plant Soybean
          Cultivar Musgrave 1
            Command:
              [Phenology].Vegetative.Target.FixedValue = 340
              [Phenology].EarlyFlowering.Target.FixedValue = 120
              [Phenology].EarlyGrainFilling.Target.FractionofGrainfilling.FixedValue = 0.3
              [Phenology].LateGrainFilling.Target.EntireGrainfillPeriod.FixedValue = 632
              [Phenology].VegetativePhotoperiodModifier.XYPairs.X = 13.84, 18.77
              [Phenology].ReproductivePhotoperiodModifier.XYPairs.X = 13.84, 18.77
        Operations
          2014-09-24  [SurfaceOrganicMatter].Incorporate(fraction: 1, depth: 150)
          2014-09-29  [Fertiliser].Apply(amount: 122, type: UreaN)
          2014-10-07  [Wheat].Sow(cultivar: CerealRye, population: 547, depth: 25, rowSpacing: 190)
          2015-06-03  [Wheat].EndCrop()
          2015-06-04  [Soybean].Sow(cultivar: Generic_MG2, population: 48.25, depth: 50, rowSpacing: 760)
          2015-10-12  [Soybean].Harvest
          2015-10-12  [Soybean].EndCrop
        Soil Lima Lab Data: same as New York Simulations.NY 2013.NY NT 2013.Lima Lab Data
      Zone NY Till 2015: Area=1; Slope=2; AspectAngle=0; Altitude=50
        SurfaceOrganicMatter: InitialResidueName=Wheat; InitialResidueType=wheat; InitialResidueMass=0; InitialStandingFraction=1; InitialCPR=0; InitialCNR=30
        Fertiliser
        Report: EventNames=[Clock].EndOfDay
          VariableNames:
            [Clock].Today
            //===== Daily Values
            [Wheat].AboveGround.Wt*10 as rye_bm_kg_ha
            [Soybean].Grain.Wt*10 as soy_kg_ha
            sum([Soil].Water.MM - [Soil].Physical.DULmm) as SoilWaterDeficit
            [Soybean].LAI as lai
        MicroClimate: a_interception=0; b_interception=1; c_interception=0; d_interception=0; SoilHeatFluxFraction=0.4; MinimumHeightDiffForNewLayer=0; NightInterceptionFraction=0.5; ReferenceHeight=2
        Soil Musgrave Soil WSS (disabled): ASCOrder=NA; ASCSubOrder=NA; SoilType=Lima Silt Loam; Site=Musgrave; NearestTown=Aurora; Region=Northeast United States; State=New York; Country=United States of America; NaturalVegetation=NA; ApsoilNumber=9999; Latitude=42.625; Longitude=-76.625; LocationAccuracy=+- 250 m; YearOfSampling=2019; DataSource=Web Soil Survey; Comments=Data filled in from Web Soil Survey of OCS field for 2024
          Water: Thickness=[150, 150, 150, 150, 200, 200, 200, 200, 300, 300]; InitialValues=[0.25, 0.227, 0.2, 0.2, 0.16, 0.15, 0.15, 0.15, 0.15, 0.15]; FilledFromTop=true
          Physical: same as New York Simulations.NY 2015.NY NT 2015.Musgrave Soil WSS.Physical
          WaterBalance SoilWater: SummerDate=1-may; SummerU=6; SummerCona=4.2; WinterDate=1-nov; WinterU=2; WinterCona=2; DiffusConst=67.97; DiffusSlope=34.12; Salb=0.13; CN2Bare=73; CNRed=20; CNCov=0; DischargeWidth=5; CatchmentArea=10; PSIDul=-100; Thickness=[150, 150, 150, 150, 200, 200, 200, 200, 300, 300]
            SWCON=[0.457, 0.464, 0.47, 0.481, 0.451, 0.469, 0.479, 0.48, 0.418, 0.419]
          Organic: same as New York Simulations.NY 2015.NY NT 2015.Musgrave Soil WSS.Organic
          Chemical: same as New York Simulations.NY 2015.NY NT 2015.Musgrave Soil WSS.Chemical
          Nutrient
          Solute NO3: same as New York Simulations.NY 2015.NY NT 2015.Musgrave Soil WSS.NO3
          Solute NH4: same as New York Simulations.NY 2015.NY NT 2015.Musgrave Soil WSS.NO3
          Solute Urea: same as New York Simulations.NY 2015.NY NT 2015.Musgrave Soil WSS.Urea
          SoilTemperature CERESSoilTemperature
        Plant Wheat: same as New York Simulations.NY 2014.NY Till 2014.Wheat
        Manager Simple Rotation (disabled): same as New York Simulations.NY 2015.NY NT 2015.Simple Rotation
        Manager EndWheat (disabled)
          Crop = [Wheat]
          Date = 26-may
          script: same as in New York Simulations.NY 2014.NY NT 2014.EndWheat
        Manager SowWheat (disabled)
          Rotations = [Simple Rotation]
          Crop = [Wheat]
          SowDate = 18-sep
          CultivarName = CerealRye
          SowingDepth = 25
          RowSpacing = 190
          Population = 547
          script: same as in New York Simulations.NY 2014.NY NT 2014.SowWheat
        Manager Fertilise (disabled): same as New York Simulations.NY 2015.NY NT 2015.Fertilise
        Manager SowSoy (disabled)
          Rotations = [Simple Rotation]
          Crop = [Soybean]
          SowDate = 31-may
          CultivarName = Generic_MG2
          SowingDepth = 25
          RowSpacing = 760
          Population = 74
          script: same as in New York Simulations.NY 2014.NY NT 2014.SowWheat
        Manager HarvestSoy (disabled)
          Crop = [Soybean]
          Date = 19-oct
          script: same as in New York Simulations.NY 2014.NY NT 2014.HarvestSoy
        Plant Soybean: same as New York Simulations.NY 2015.NY NT 2015.Soybean
        Operations
          2014-09-24  [SurfaceOrganicMatter].Incorporate(fraction: 1, depth: 150)
          2015-05-07  [SurfaceOrganicMatter].Incorporate(fraction: 1, depth: 150)
          2015-05-22  [SurfaceOrganicMatter].Incorporate(fraction: 1, depth: 150)
          2015-01-01  [SoilWater].Reset()
          2015-06-04  [Soybean].Sow(cultivar: Generic_MG2, population: 48.25, depth: 50, rowSpacing: 760)
          2015-10-12  [Soybean].Harvest
          2015-10-13  [Soybean].EndCrop
        Soil Lima Lab Data: same as New York Simulations.NY 2013.NY NT 2013.Lima Lab Data
    Simulation NY 2016
      Weather: FileName=/Users/stw52/Downloads/daymet_musgrave_apsimx_leap.met
      Clock: Start=2015-01-01; End=2016-11-19
      Summary
      SoilArbitrator
      Zone NY NT 2016: Area=1; Slope=3; AspectAngle=0; Altitude=50
        SurfaceOrganicMatter: InitialResidueName=Wheat; InitialResidueType=wheat; InitialResidueMass=0; InitialStandingFraction=1; InitialCPR=0; InitialCNR=30
        Fertiliser
        Report: EventNames=[Clock].EndOfDay
          VariableNames:
            [Clock].Today
            //===== Daily Values
            [Wheat].AboveGround.Wt*10 as rye_bm_kg_ha
            [Soybean].Grain.Wt*10 as soy_kg_ha
            sum([Soil].Water.MM - [Soil].Physical.DULmm) as SoilWaterDeficit
            sum([Soil].Water.MM[1:3] - [Soil].Physical.DULmm[1:3]) as swd
            [Soil].Water.Potential as pot
            [Soil].Water.Volumetric as vwc
            [Soybean].LAI as lai_soy
            [Soybean].CoverTotal as soy_cover
            [Soybean].AboveGround.Wt as soy_biomass
            [Soybean].Leaf.Transpiration as soy_transpiration
            [SoilWater].Es as soil_evap
        MicroClimate: a_interception=0; b_interception=1; c_interception=0; d_interception=0; SoilHeatFluxFraction=0.4; MinimumHeightDiffForNewLayer=0; NightInterceptionFraction=0.5; ReferenceHeight=2
        Plant Wheat: same as New York Simulations.NY 2014.NY Till 2014.Wheat
        Manager Simple Rotation (disabled): same as New York Simulations.NY 2015.NY NT 2015.Simple Rotation
        Manager EndWheat (disabled): same as New York Simulations.NY 2015.NY Till 2015.EndWheat
        Manager Fertilise (disabled): same as New York Simulations.NY 2015.NY NT 2015.Fertilise
        Manager SowSoy (disabled): same as New York Simulations.NY 2015.NY Till 2015.SowSoy
        Manager HarvestSoy (disabled): same as New York Simulations.NY 2015.NY Till 2015.HarvestSoy
        Plant Soybean
          Cultivar Musgrave 1
            Command:
              [Phenology].Vegetative.Target.FixedValue = 348
              [Phenology].EarlyFlowering.Target.FixedValue = 120
              [Phenology].EarlyGrainFilling.Target.FractionofGrainfilling.FixedValue = 0.2
              [Phenology].LateGrainFilling.Target.EntireGrainfillPeriod.FixedValue = 300
              [Phenology].VegetativePhotoperiodModifier.XYPairs.X = 13.59, 17.61
              [Phenology].ReproductivePhotoperiodModifier.XYPairs.X = 13.59, 17.61
              [Leaf].Photosynthesis.RUE.FixedValue = 2
        Operations
          2015-09-09  [SurfaceOrganicMatter].Incorporate(fraction: 1, depth: 150)
          2015-10-05  [Fertiliser].Apply(amount: 122, type: UreaN)
          2015-10-07  [Wheat].Sow(cultivar: CerealRye, population: 547, depth: 25, rowSpacing: 190)
          2016-05-26  [Wheat].EndCrop()
          2016-05-31  [Soybean].Sow(cultivar: Generic_MG2, population: 42.5, depth: 50, rowSpacing: 760)
          2016-10-19  [Soybean].Harvest
          2016-10-20  [Soybean].EndCrop
        Soil Rosetta Lima (disabled): ASCOrder=NA; ASCSubOrder=NA; SoilType=Lima Silt Loam; Site=Musgrave; NearestTown=Aurora; Region=Northeast United States; State=New York; Country=United States of America; NaturalVegetation=NA; ApsoilNumber=9999; Latitude=42.625; Longitude=-76.625; LocationAccuracy=+- 250 m; YearOfSampling=2019; DataSource=Web Soil Survey; Comments=Data filled in from Web Soil Survey of OCS field for 2024
          Water: Thickness=[230, 70, 110, 230, 1360]; InitialValues=[0.242, 0.227, 0.2, 0.193565, 0.151051]; FilledFromTop=true
          Physical
            Thickness  ParticleSizeSand  ParticleSizeSilt  ParticleSizeClay  Rocks  BD    AirDry  LL15   DUL    SAT    KS
            100        26                55                19                10     1.29  0.075   0.15   0.25   0.463  260
            130        31.1              48.5              20.4              10     1.33  0.114   0.127  0.227  0.448  260
            70         37                41                22                10     1.47  0.1     0.1    0.2    0.395  260
            110        37                41                22                10     1.47  0.1     0.1    0.2    0.395  260
            230        37                41                22                15     1.64  0.063   0.063  0.163  0.331  260
            1360       40                41.7              18.3              30     1.7   0.063   0.063  0.163  0.331  260
            SoilCrop WheatSoil: LL=[0.15, 0.127, 0.1, 0.1, 0.063, 0.063]; KL=[0.06, 0.06, 0.06, 0.055, 0.048, 0.048]; XF=[1, 1, 1, 1, 0.959, 0.959]
            SoilCrop MaizeSoil: LL=[0.15, 0.127, 0.1, 0.1, 0.063, 0.063]; KL=[0.06, 0.06, 0.06, 0.055, 0.048, 0.048]; XF=[1, 1, 1, 1, 0.959, 0.959]
            SoilCrop SoybeanSoil: LL=[0.15, 0.127, 0.1, 0.1, 0.063, 0.063]; KL=[0.06, 0.06, 0.06, 0.055, 0.048, 0.048]; XF=[1, 1, 1, 1, 0.959, 0.959]
          WaterBalance SoilWater: SummerDate=1-may; SummerU=6; SummerCona=4.2; WinterDate=1-nov; WinterU=2; WinterCona=2; DiffusConst=67.97; DiffusSlope=34.12; Salb=0.13; CN2Bare=73; CNRed=20; CNCov=0; DischargeWidth=5; CatchmentArea=10; PSIDul=-100; Thickness=[230, 70, 110, 230, 1360]; SWCON=[0.457, 0.464, 0.47, 0.481, 0.451]
          Organic: FOMCNRatio=40; CarbonUnits=Total
            Thickness  Carbon  SoilCNRatio  FBiom  FInert  FOM
            230        4.406   8            0.04   0.193   0
            70         1.837   8            0.031  0.395   0
            110        1.038   8            0.014  0.667   0
            230        0.807   8            0.01   0.832   0
            1360       0.647   8            0.01   0.99    0
          Chemical: PHUnits=Water
            Thickness  PH   CEC
            230        6.2  16.729
            70         6.3  11.664
            110        6.3  10.689
            230        6.4  10.169
            1360       6.5  8.952
            CEC source: Calculated
          Nutrient
          Solute NO3: Thickness=[150, 150, 150, 150, 200]; InitialValues=[0, 0, 0, 0, 0]; InitialValuesUnits=ppm; WaterTableConcentration=0; D0=0; DepthConstant=0; MaxDepthSoluteAccessible=0; RunoffEffectivenessAtMovingSolute=0; MaxEffectiveRunoff=0
          Solute NH4: Thickness=[230, 70, 110, 230, 1360]; InitialValues=[0, 0, 0, 0, 0]; InitialValuesUnits=ppm; WaterTableConcentration=0; D0=0; DepthConstant=0; MaxDepthSoluteAccessible=0; RunoffEffectivenessAtMovingSolute=0; MaxEffectiveRunoff=0
          Solute Urea: Thickness=[230, 70, 110, 230, 1360]; InitialValues=[0, 0, 0, 0, 0]; InitialValuesUnits=kg/ha; WaterTableConcentration=0; D0=0; DepthConstant=0; MaxDepthSoluteAccessible=0; RunoffEffectivenessAtMovingSolute=0; MaxEffectiveRunoff=0
          SoilTemperature CERESSoilTemperature
          CERESSoilTemperature Temperature
        Soil Musgrave Soil WSS (disabled): ASCOrder=NA; ASCSubOrder=NA; SoilType=Lima Silt Loam; Site=Musgrave; NearestTown=Aurora; Region=Northeast United States; State=New York; Country=United States of America; NaturalVegetation=NA; ApsoilNumber=9999; Latitude=42.625; Longitude=-76.625; LocationAccuracy=+- 250 m; YearOfSampling=2019; DataSource=Web Soil Survey; Comments=Data filled in from Web Soil Survey of OCS field for 2024
          Water: Thickness=[150, 150, 150, 150, 200, 200, 200, 200, 300, 300]; InitialValues=[0.25, 0.227, 0.2, 0.2, 0.16, 0.15, 0.15, 0.15, 0, 0]; FilledFromTop=true
          Physical
            Thickness  ParticleSizeSand  ParticleSizeSilt  ParticleSizeClay  Rocks  BD    AirDry  LL15   DUL    SAT    KS
            150        26                55                19                10     1.29  0.075   0.15   0.25   0.463  864
            150        31.1              48.5              20.4              10     1.33  0.114   0.127  0.227  0.448  864
            130        37                41                22                10     1.47  0.1     0.1    0.2    0.395  432
            160        37                41                22                10     1.47  0.1     0.1    0.2    0.395  432
            140        40                41.7              18.3              15     1.64  0.063   0.063  0.163  0.331  432
            160        41                42                17                15     1.7   0.05    0.05   0.15   0.308  432
            1100       41                42                17                30     1.7   0.05    0.05   0.15   0.308  432
            SoilCrop WheatSoil: LL=[0.15, 0.127, 0.1, 0.1, 0.063, 0.05, 0.05]; KL=[0.06, 0.06, 0.06, 0.055, 0.048, 0.039, 0.03]; XF=[1, 1, 1, 1, 0.959, 0, 0]
            SoilCrop MaizeSoil: LL=[0.15, 0.127, 0.1, 0.1, 0.063, 0.05, 0.05]; KL=[0.06, 0.06, 0.06, 0.055, 0.048, 0.039, 0.03]; XF=[1, 1, 1, 1, 0.959, 0, 0]
            SoilCrop SoybeanSoil: LL=[0.15, 0.127, 0.1, 0.1, 0.063, 0.05, 0.05]; KL=[0.06, 0.06, 0.06, 0.055, 0.048, 0.039, 0.03]; XF=[1, 1, 1, 1, 1, 0, 0]
          WaterBalance SoilWater: same as New York Simulations.NY 2015.NY Till 2015.Musgrave Soil WSS.SoilWater
          Organic: same as New York Simulations.NY 2015.NY NT 2015.Musgrave Soil WSS.Organic
          Chemical: same as New York Simulations.NY 2015.NY NT 2015.Musgrave Soil WSS.Chemical
          Nutrient
          Solute NO3: same as New York Simulations.NY 2015.NY NT 2015.Musgrave Soil WSS.NO3
          Solute NH4: same as New York Simulations.NY 2015.NY NT 2015.Musgrave Soil WSS.NO3
          Solute Urea: same as New York Simulations.NY 2015.NY NT 2015.Musgrave Soil WSS.Urea
          SoilTemperature CERESSoilTemperature
          CERESSoilTemperature Temperature
        Soil Lima SoilDB (disabled): ASCOrder=NA; ASCSubOrder=NA; SoilType=Lima Silt Loam; Site=Musgrave; NearestTown=Aurora; Region=Northeast United States; State=New York; Country=United States of America; NaturalVegetation=NA; ApsoilNumber=9999; Latitude=42.625; Longitude=-76.625; LocationAccuracy=+- 250 m; YearOfSampling=1985; DataSource=Soil Lab Data; Comments=Data filled from Soil Lab Data from USDA soil survey
          Water: Thickness=[150, 80, 70, 110, 230, 220]; InitialValues=[0.33, 0.33, 0.302, 0.287, 0.287, 0.24]; FilledFromTop=true
          Physical
            Thickness  ParticleSizeSand  ParticleSizeSilt  ParticleSizeClay  Rocks  BD    AirDry  LL15   DUL    SAT    KS
            150        26                55                19                10     1.38  0.065   0.13   0.33   0.43   265
            80         26                55                19                10     1.38  0.065   0.13   0.33   0.43   265
            70         37                41                22                10     1.46  0.11    0.138  0.302  0.412  160
            110        37                41                22                10     1.55  0.136   0.136  0.287  0.391  108
            230        37                41                22                15     1.55  0.136   0.136  0.287  0.391  108
            220        41                42                17                15     1.73  0.123   0.123  0.24   0.332  55
            1140       41                42                17                15     1.73  0.123   0.123  0.24   0.3    55
            SoilCrop WheatSoil: LL=[0.13, 0.13, 0.138, 0.136, 0.136, 0.123, 0.123]; KL=[0.06, 0.06, 0.06, 0.055, 0.048, 0.039, 0.06]; XF=[1, 1, 1, 1, 0.959, 0, 0]
              LL, KL source: Calculated (layer 7)
            SoilCrop MaizeSoil: LL=[0.13, 0.13, 0.138, 0.136, 0.136, 0.123, 0.123]; KL=[0.06, 0.06, 0.06, 0.055, 0.048, 0.039, 0.06]; XF=[1, 1, 1, 1, 0.959, 0.893, 0]
              LL, KL source: Calculated (layer 7)
            SoilCrop SoybeanSoil: LL=[0.13, 0.13, 0.138, 0.136, 0.136, 0.123, 0.123]; KL=[0.06, 0.06, 0.06, 0.055, 0.048, 0.039, 0.06]; XF=[1, 1, 1, 1, 1, 0, 0]
              LL, KL source: Calculated (layer 7)
          WaterBalance SoilWater: SummerDate=1-jun; SummerU=6; SummerCona=4.2; WinterDate=1-nov; WinterU=2; WinterCona=2; DiffusConst=88; DiffusSlope=35.4; Salb=0.13; CN2Bare=73; CNRed=20; CNCov=0; DischargeWidth=5; CatchmentArea=10; PSIDul=-100; Thickness=[150, 80, 70, 110, 230, 220]; SWCON=[0.457, 0.464, 0.47, 0.481, 0.451, 0.469]
          Organic: FOMCNRatio=40; CarbonUnits=Total
            Thickness  Carbon  SoilCNRatio  FBiom  FInert  FOM
            150        1.78    8            0.04   0.193   100
            80         1.78    8            0.031  0.395   70
            70         0.87    8            0.014  0.667   60
            110        0.87    8            0.01   0.832   40
            230        0.87    8            0.01   0.99    20
            220        0.87    8            0.01   0.99    10
          Chemical: same as New York Simulations.NY 2015.NY NT 2015.Musgrave Soil WSS.Chemical
          Nutrient
          Solute NO3: same as New York Simulations.NY 2015.NY NT 2015.Musgrave Soil WSS.NO3
          Solute NH4: same as New York Simulations.NY 2015.NY NT 2015.Musgrave Soil WSS.NO3
          Solute Urea: same as New York Simulations.NY 2015.NY NT 2015.Musgrave Soil WSS.Urea
          SoilTemperature CERESSoilTemperature
          CERESSoilTemperature Temperature
        Soil Lima Lab Data: ASCOrder=NA; ASCSubOrder=NA; SoilType=Lima Silt Loam; Site=Musgrave; NearestTown=Aurora; Region=Northeast United States; State=New York; Country=United States of America; NaturalVegetation=NA; ApsoilNumber=9999; Latitude=42.625; Longitude=-76.625; LocationAccuracy=+- 250 m; YearOfSampling=1985; DataSource=Soil Lab Data; Comments=Data filled from Soil Lab Data from USDA soil survey
          Water: Thickness=[150, 100, 50, 160, 400, 180]; InitialValues=[0.283, 0.284, 0.277, 0.276, 0.251, 0.231]; FilledFromTop=true
          Physical: same as New York Simulations.NY 2013.NY NT 2013.Lima Lab Data.Physical
          WaterBalance SoilWater: SummerDate=1-jun; SummerU=9; SummerCona=4; WinterDate=1-nov; WinterU=6; WinterCona=4; DiffusConst=88; DiffusSlope=35.4; Salb=0.13; CN2Bare=73; CNRed=20; CNCov=0; DischargeWidth=5; CatchmentArea=10; PSIDul=-336.6; Thickness=[150, 80, 70, 110, 230, 220]; SWCON=[0.457, 0.464, 0.47, 0.481, 0.451, 0.469]
          Organic: same as New York Simulations.NY 2013.NY NT 2013.Lima Lab Data.Organic
          Chemical: same as New York Simulations.NY 2013.NY NT 2013.Lima Lab Data.Chemical
          Nutrient
          Solute NO3: same as New York Simulations.NY 2013.NY NT 2013.Lima Lab Data.NO3
          Solute NH4: same as New York Simulations.NY 2013.NY NT 2013.Lima Lab Data.NO3
          Solute Urea: same as New York Simulations.NY 2013.NY NT 2013.Musgrave Soil WSS.Urea
          SoilTemperature CERESSoilTemperature
          CERESSoilTemperature Temperature
      Zone NY Till 2016: Area=1; Slope=3; AspectAngle=0; Altitude=50
        SurfaceOrganicMatter: InitialResidueName=Wheat; InitialResidueType=wheat; InitialResidueMass=0; InitialStandingFraction=1; InitialCPR=0; InitialCNR=30
        Fertiliser
        Report: same as New York Simulations.NY 2016.NY NT 2016.Report
        MicroClimate: a_interception=0; b_interception=1; c_interception=0; d_interception=0; SoilHeatFluxFraction=0.4; MinimumHeightDiffForNewLayer=0; NightInterceptionFraction=0.5; ReferenceHeight=2
        Soil Musgrave Soil WSS (disabled): ASCOrder=NA; ASCSubOrder=NA; SoilType=Lima Silt Loam; Site=Musgrave; NearestTown=Aurora; Region=Northeast United States; State=New York; Country=United States of America; NaturalVegetation=NA; ApsoilNumber=9999; Latitude=42.625; Longitude=-76.625; LocationAccuracy=+- 250 m; YearOfSampling=2019; DataSource=Web Soil Survey; Comments=Data filled in from Web Soil Survey of OCS field for 2024
          Water: Thickness=[150, 150, 150, 150, 200, 200, 200, 200, 300, 300]; InitialValues=[0.25, 0.227, 0.2, 0.2, 0.16, 0.15, 0.15, 0.15, 0.15, 0.15]; FilledFromTop=true
          Physical
            Thickness  ParticleSizeSand  ParticleSizeSilt  ParticleSizeClay  Rocks  BD    AirDry  LL15   DUL    SAT    KS
            150        26                55                19                10     1.29  0.075   0.15   0.25   0.463  864
            150        31.1              48.5              20.4              10     1.33  0.114   0.127  0.227  0.448  864
            130        37                41                22                10     1.47  0.1     0.1    0.2    0.395  432
            160        37                41                22                10     1.47  0.1     0.1    0.2    0.395  432
            140        40                41.7              18.3              15     1.64  0.063   0.063  0.163  0.331  432
            160        41                42                17                15     1.7   0.05    0.05   0.15   0.308  432
            1100       41                42                17                30     1.7   0.05    0.05   0.15   0.308  432
            SoilCrop WheatSoil: same as New York Simulations.NY 2015.NY NT 2015.Musgrave Soil WSS.Physical.MaizeSoil
            SoilCrop MaizeSoil: same as New York Simulations.NY 2015.NY NT 2015.Musgrave Soil WSS.Physical.MaizeSoil
            SoilCrop SoybeanSoil: LL=[0.15, 0.127, 0.1, 0.1, 0.063, 0.05, 0.05]; KL=[0.06, 0.06, 0.06, 0.055, 0.048, 0.039, 0.03]; XF=[1, 1, 1, 1, 1, 1, 1]
          WaterBalance SoilWater: same as New York Simulations.NY 2015.NY Till 2015.Musgrave Soil WSS.SoilWater
          Organic: same as New York Simulations.NY 2015.NY NT 2015.Musgrave Soil WSS.Organic
          Chemical: same as New York Simulations.NY 2015.NY NT 2015.Musgrave Soil WSS.Chemical
          Nutrient
          Solute NO3: same as New York Simulations.NY 2015.NY NT 2015.Musgrave Soil WSS.NO3
          Solute NH4: same as New York Simulations.NY 2015.NY NT 2015.Musgrave Soil WSS.NO3
          Solute Urea: same as New York Simulations.NY 2015.NY NT 2015.Musgrave Soil WSS.Urea
          SoilTemperature CERESSoilTemperature
        Plant Wheat: same as New York Simulations.NY 2014.NY Till 2014.Wheat
        Manager Simple Rotation (disabled): same as New York Simulations.NY 2015.NY NT 2015.Simple Rotation
        Manager EndWheat (disabled): same as New York Simulations.NY 2015.NY Till 2015.EndWheat
        Manager Fertilise (disabled): same as New York Simulations.NY 2015.NY NT 2015.Fertilise
        Manager SowSoy (disabled): same as New York Simulations.NY 2015.NY Till 2015.SowSoy
        Manager HarvestSoy (disabled): same as New York Simulations.NY 2015.NY Till 2015.HarvestSoy
        Plant Soybean: same as New York Simulations.NY 2016.NY NT 2016.Soybean
        Operations
          2016-04-22  [SurfaceOrganicMatter].Incorporate(fraction: 1, depth: 150)
          2016-05-31  [Soybean].Sow(cultivar: Generic_MG2, population: 73.5, depth: 50, rowSpacing: 760)
          2016-10-19  [Soybean].Harvest
          2016-10-20  [Soybean].EndCrop
        Soil Rosetta Lima (disabled): ASCOrder=NA; ASCSubOrder=NA; SoilType=Lima Silt Loam; Site=Musgrave; NearestTown=Aurora; Region=Northeast United States; State=New York; Country=United States of America; NaturalVegetation=NA; ApsoilNumber=9999; Latitude=42.625; Longitude=-76.625; LocationAccuracy=+- 250 m; YearOfSampling=2019; DataSource=Web Soil Survey; Comments=Data filled in from Web Soil Survey of OCS field for 2024
          Water: Thickness=[100, 130, 70, 110, 230, 1360]; InitialValues=[0.242, 0.242, 0.227, 0.2, 0.194, 0.151]; FilledFromTop=true
          Physical
            Thickness  ParticleSizeSand  ParticleSizeSilt  ParticleSizeClay  Rocks  BD    AirDry  LL15   DUL    SAT    KS
            100        26                55                19                10     1.29  0.065   0.13   0.33   0.43   264.9
            130        26                55                19                10     1.29  0.065   0.13   0.33   0.43   264.9
            70         37                41                22                10     1.38  0.11    0.138  0.302  0.412  160
            110        37                41                22                10     1.47  0.136   0.136  0.287  0.391  107.8
            230        37                41                22                15     1.47  0.136   0.136  0.287  0.391  107.8
            1360       41                42                17                30     1.7   0.123   0.123  0.241  0.33   55.4
            SoilCrop WheatSoil: LL=[0.13, 0.13, 0.136, 0.136, 0.136, 0.123]; KL=[0.06, 0.06, 0.06, 0.06, 0.055, 0.048]; XF=[1, 1, 1, 1, 1, 0]
            SoilCrop MaizeSoil: LL=[0.13, 0.13, 0.136, 0.136, 0.136, 0.123]; KL=[0.06, 0.06, 0.06, 0.06, 0.055, 0.048]; XF=[1, 1, 1, 1, 1, 0]
            SoilCrop SoybeanSoil: LL=[0.13, 0.13, 0.136, 0.136, 0.136, 0.123]; KL=[0.06, 0.06, 0.06, 0.06, 0.055, 0.048]; XF=[1, 1, 1, 1, 1, 0]
          WaterBalance SoilWater: SummerDate=1-jun; SummerU=6; SummerCona=3; WinterDate=1-nov; WinterU=2; WinterCona=3; DiffusConst=67.97; DiffusSlope=34.12; Salb=0.14; CN2Bare=73; CNRed=20; CNCov=0; DischargeWidth=5; CatchmentArea=10; PSIDul=-100; Thickness=[100, 130, 70, 110, 230, 1360]; SWCON=[0.45, 0.45, 0.45, 0.45, 0.45, 0.45]
          Organic: FOMCNRatio=40; CarbonUnits=Total
            Thickness  Carbon  SoilCNRatio  FBiom  FInert  FOM
            100        4.406   12           0.035  0.4     150
            130        4.406   12           0.035  0.4     150
            70         1.837   12           0.02   0.5     123
            110        1.038   12           0.014  0.7     123
            230        0.807   12           0.01   0.95    101
            1360       0.647   12           0.01   0.95    50
          Chemical: PHUnits=Water
            Thickness  PH   CEC
            100        7.8  16.729
            130        7.8  11.664
            70         7.8  10.689
            110        7.8  10.169
            230        8.4  8.952
            1360       8.4  8.9
            CEC source: Calculated (layer 1, 2, 3, 4, 5)
          Nutrient
          Solute NO3: Thickness=[100, 130, 70, 110, 230, 1360]; InitialValues=[0, 0, 0, 0, 0, 0]; InitialValuesUnits=ppm; WaterTableConcentration=0; D0=0; DepthConstant=0; MaxDepthSoluteAccessible=0; RunoffEffectivenessAtMovingSolute=0; MaxEffectiveRunoff=0
          Solute NH4: same as New York Simulations.NY 2016.NY Till 2016.Rosetta Lima.NO3
          Solute Urea: Thickness=[100, 130, 70, 110, 230, 1360]; InitialValues=[0, 0, 0, 0, 0, 0]; InitialValuesUnits=kg/ha; WaterTableConcentration=0; D0=0; DepthConstant=0; MaxDepthSoluteAccessible=0; RunoffEffectivenessAtMovingSolute=0; MaxEffectiveRunoff=0
          SoilTemperature CERESSoilTemperature
          CERESSoilTemperature Temperature
        Soil Lima SoilDB (disabled): ASCOrder=NA; ASCSubOrder=NA; SoilType=Lima Silt Loam; Site=Musgrave; NearestTown=Aurora; Region=Northeast United States; State=New York; Country=United States of America; NaturalVegetation=NA; ApsoilNumber=9999; Latitude=42.625; Longitude=-76.625; LocationAccuracy=+- 250 m; YearOfSampling=1985; DataSource=Soil Lab Data; Comments=Data filled from Soil Lab Data from USDA soil survey
          Water: Thickness=[150, 80, 70, 110, 230, 220, 180]; InitialValues=[0.33, 0.33, 0.302, 0.287, 0.287, 0.24, 0.24]; FilledFromTop=true
          Physical
            Thickness  ParticleSizeSand  ParticleSizeSilt  ParticleSizeClay  Rocks  BD    AirDry  LL15   DUL    SAT    KS
            150        26                55                19                10     1.38  0.065   0.13   0.33   0.43   265
            80         26                55                19                10     1.38  0.065   0.13   0.33   0.43   265
            70         37                41                22                10     1.46  0.11    0.138  0.302  0.412  160
            110        37                41                22                10     1.55  0.136   0.136  0.287  0.391  108
            230        37                41                22                15     1.55  0.136   0.136  0.287  0.391  108
            220        41                42                17                15     1.73  0.123   0.123  0.24   0.332  55
            1140       41                42                17                15     1.73  0.123   0.123  0.24   0.3    55
            SoilCrop WheatSoil: LL=[0.13, 0.13, 0.138, 0.136, 0.136, 0.123, 0.123]; KL=[0.06, 0.06, 0.055, 0.048, 0.039, 0.029, 0.01]; XF=[1, 1, 1, 1, 0.959, 0, 0]
              LL source: Calculated (layer 7)
            SoilCrop MaizeSoil: same as New York Simulations.NY 2016.NY Till 2016.Lima SoilDB.Physical.WheatSoil
            SoilCrop SoybeanSoil: LL=[0.13, 0.13, 0.138, 0.136, 0.136, 0.123, 0.123]; KL=[0.06, 0.06, 0.055, 0.048, 0.039, 0.029, 0.01]; XF=[1, 1, 1, 1, 1, 0, 0]
              LL source: Calculated (layer 7)
          WaterBalance SoilWater: same as New York Simulations.NY 2016.NY NT 2016.Lima SoilDB.SoilWater
          Organic: same as New York Simulations.NY 2016.NY NT 2016.Lima SoilDB.Organic
          Chemical: same as New York Simulations.NY 2015.NY NT 2015.Musgrave Soil WSS.Chemical
          Nutrient
          Solute NO3: same as New York Simulations.NY 2015.NY NT 2015.Musgrave Soil WSS.NO3
          Solute NH4: same as New York Simulations.NY 2015.NY NT 2015.Musgrave Soil WSS.NO3
          Solute Urea: same as New York Simulations.NY 2015.NY NT 2015.Musgrave Soil WSS.Urea
          SoilTemperature CERESSoilTemperature
          CERESSoilTemperature Temperature
        Soil Lima Lab Data: same as New York Simulations.NY 2016.NY NT 2016.Lima Lab Data
    Simulation NY 2018
      Weather: FileName=/Users/stw52/Downloads/daymet_musgrave_apsimx_leap.met
      Clock: Start=2017-01-01; End=2018-11-19
      Summary
      SoilArbitrator
      Zone NY NT 2018: Area=1; Slope=2; AspectAngle=0; Altitude=50
        SurfaceOrganicMatter: InitialResidueName=Wheat; InitialResidueType=wheat; InitialResidueMass=0; InitialStandingFraction=1; InitialCPR=0; InitialCNR=30
        Fertiliser
        Report: EventNames=[Clock].EndOfDay
          VariableNames:
            [Clock].Today
            //===== Daily Values
            [Wheat].AboveGround.Wt*10 as rye_bm_kg_ha
            [Soybean].Grain.Wt*10 as soy_kg_ha
            sum([Soil].Water.MM - [Soil].Physical.DULmm) as SoilWaterDeficit
        MicroClimate: a_interception=0; b_interception=1; c_interception=0; d_interception=0; SoilHeatFluxFraction=0.4; MinimumHeightDiffForNewLayer=0; NightInterceptionFraction=0.5; ReferenceHeight=2
        Soil Musgrave Soil WSS: same as New York Simulations.NY 2014.NY Till 2014.Musgrave Soil WSS
        Plant Wheat: same as New York Simulations.NY 2014.NY Till 2014.Wheat
        Manager Simple Rotation: same as New York Simulations.NY 2014.NY NT 2014.Simple Rotation
        Manager EndWheat
          Crop = [Wheat]
          Date = 30-may
          script: same as in New York Simulations.NY 2014.NY NT 2014.EndWheat
        Manager SowWheat
          Rotations = [Simple Rotation]
          Crop = [Wheat]
          SowDate = 15-sep
          CultivarName = CerealRye
          SowingDepth = 25
          RowSpacing = 190
          Population = 547
          script: same as in New York Simulations.NY 2014.NY NT 2014.SowWheat
        Manager Fertilise: same as New York Simulations.NY 2014.NY NT 2014.Fertilise
        Manager SowSoy
          Rotations = [Simple Rotation]
          Crop = [Soybean]
          SowDate = 6-jun
          CultivarName = Generic_MG2
          SowingDepth = 25
          RowSpacing = 760
          Population = 62
          script: same as in New York Simulations.NY 2014.NY NT 2014.SowWheat
        Manager HarvestSoy
          Crop = [Soybean]
          Date = 26-oct
          script: same as in New York Simulations.NY 2014.NY NT 2014.HarvestSoy
        Plant Soybean: same as New York Simulations.NY 2015.NY NT 2015.Soybean
        Operations
          2017-09-11  [SurfaceOrganicMatter].Incorporate(fraction: 1, depth: 150)
          2017-09-15  [Fertiliser].Apply(amount: 109, type: UreaN)
          2017-09-15  [Wheat].Sow(cultivar: CerealRye, population: 547, depth: 50, rowSpacing: 190)
          2018-06-05  [Wheat].EndCrop
          2018-06-06  [Soybean].Sow(cultivar: Generic_MG2, population: 64.2, depth: 25, rowSpacing: 760)
          2018-10-26  [Soybean].Harvest
          2018-10-27  [Soybean].EndCrop
        Soil Rosetta Lima: ASCOrder=NA; ASCSubOrder=NA; SoilType=Lima Silt Loam; Site=Musgrave; NearestTown=Aurora; Region=Northeast United States; State=New York; Country=United States of America; NaturalVegetation=NA; ApsoilNumber=9999; Latitude=42.625; Longitude=-76.625; LocationAccuracy=+- 250 m; YearOfSampling=2019; DataSource=Web Soil Survey; Comments=Data filled in from Web Soil Survey of OCS field for 2024
          Water: Thickness=[100, 130, 70, 110, 230, 1360]; InitialValues=[0.242, 0.242, 0.227, 0.2, 0.194, 0.151]; FilledFromTop=true
          Physical
            Thickness  ParticleSizeSand  ParticleSizeSilt  ParticleSizeClay  Rocks  BD    AirDry  LL15   DUL    SAT    KS
            100        26                55                19                10     1.29  0.065   0.13   0.33   0.43   264.9
            130        26                55                19                10     1.29  0.065   0.13   0.33   0.43   264.9
            70         37                41                22                10     1.38  0.11    0.138  0.302  0.412  160
            110        37                41                22                10     1.47  0.136   0.136  0.287  0.391  107.8
            230        37                41                22                15     1.47  0.136   0.136  0.287  0.391  107.8
            1360       41                42                17                30     1.7   0.123   0.123  0.241  0.33   55.4
            SoilCrop WheatSoil: LL=[0.13, 0.13, 0.136, 0.136, 0.136, 0.123]; KL=[0.06, 0.06, 0.06, 0.06, 0.055, 0.048]; XF=[1, 1, 1, 1, 1, 0]
            SoilCrop MaizeSoil: LL=[0.13, 0.13, 0.136, 0.136, 0.136, 0.123]; KL=[0.06, 0.06, 0.06, 0.06, 0.055, 0.048]; XF=[1, 1, 1, 1, 1, 0]
            SoilCrop SoybeanSoil: LL=[0.13, 0.13, 0.136, 0.136, 0.136, 0.123]; KL=[0.06, 0.06, 0.06, 0.06, 0.055, 0.048]; XF=[1, 1, 1, 1, 1, 0]
          WaterBalance SoilWater: SummerDate=1-jun; SummerU=6; SummerCona=3; WinterDate=1-nov; WinterU=2; WinterCona=3; DiffusConst=67.97; DiffusSlope=34.12; Salb=0.14; CN2Bare=73; CNRed=20; CNCov=0; DischargeWidth=5; CatchmentArea=10; PSIDul=-100; Thickness=[100, 130, 70, 110, 230, 1360]; SWCON=[0.45, 0.45, 0.45, 0.45, 0.45, 0.45]
          Organic: FOMCNRatio=40; CarbonUnits=Total
            Thickness  Carbon  SoilCNRatio  FBiom  FInert  FOM
            100        4.406   12           0.035  0.4     150
            130        4.406   12           0.035  0.4     150
            70         1.837   12           0.02   0.5     123
            110        1.038   12           0.014  0.7     123
            230        0.807   12           0.01   0.95    101
            1360       0.647   12           0.01   0.95    50
          Chemical: PHUnits=Water
            Thickness  PH   CEC
            100        7.8  16.729
            130        7.8  11.664
            70         7.8  10.689
            110        7.8  10.169
            230        8.4  8.952
            1360       8.4  8.9
            CEC source: Calculated (layer 1, 2, 3, 4, 5)
          Nutrient
          Solute NO3: Thickness=[100, 130, 70, 110, 230, 1360]; InitialValues=[0, 0, 0, 0, 0, 0]; InitialValuesUnits=ppm; WaterTableConcentration=0; D0=0; DepthConstant=0; MaxDepthSoluteAccessible=0; RunoffEffectivenessAtMovingSolute=0; MaxEffectiveRunoff=0
          Solute NH4: same as New York Simulations.NY 2018.NY NT 2018.Rosetta Lima.NO3
          Solute Urea: Thickness=[100, 130, 70, 110, 230, 1360]; InitialValues=[0, 0, 0, 0, 0, 0]; InitialValuesUnits=kg/ha; WaterTableConcentration=0; D0=0; DepthConstant=0; MaxDepthSoluteAccessible=0; RunoffEffectivenessAtMovingSolute=0; MaxEffectiveRunoff=0
          SoilTemperature CERESSoilTemperature
          CERESSoilTemperature Temperature
        Soil Lima Lab Data: same as New York Simulations.NY 2013.NY NT 2013.Lima Lab Data
      Zone NY Till 2018: Area=1; Slope=2; AspectAngle=0; Altitude=50
        SurfaceOrganicMatter: InitialResidueName=Wheat; InitialResidueType=wheat; InitialResidueMass=0; InitialStandingFraction=1; InitialCPR=0; InitialCNR=30
        Fertiliser
        Report: EventNames=[Clock].EndOfDay
          VariableNames:
            [Clock].Today
            //===== Daily Values
            [Wheat].AboveGround.Wt*10 as rye_bm_kg_ha
            [Soybean].Grain.Wt*10 as soy_kg_ha
            sum([Soil].Water.MM - [Soil].Physical.DULmm) as SoilWaterDeficit
        MicroClimate: a_interception=0; b_interception=1; c_interception=0; d_interception=0; SoilHeatFluxFraction=0.4; MinimumHeightDiffForNewLayer=0; NightInterceptionFraction=0.5; ReferenceHeight=2
        Soil Musgrave Soil WSS: same as New York Simulations.NY 2014.NY Till 2014.Musgrave Soil WSS
        Plant Wheat: same as New York Simulations.NY 2014.NY Till 2014.Wheat
        Manager Simple Rotation: same as New York Simulations.NY 2014.NY NT 2014.Simple Rotation
        Manager EndWheat: same as New York Simulations.NY 2018.NY NT 2018.EndWheat
        Manager SowWheat: same as New York Simulations.NY 2018.NY NT 2018.SowWheat
        Manager Fertilise: same as New York Simulations.NY 2014.NY NT 2014.Fertilise
        Manager SowSoy: same as New York Simulations.NY 2018.NY NT 2018.SowSoy
        Manager HarvestSoy: same as New York Simulations.NY 2018.NY NT 2018.HarvestSoy
        Plant Soybean: same as New York Simulations.NY 2015.NY NT 2015.Soybean
        Operations
          2017-09-11  [SurfaceOrganicMatter].Incorporate(fraction: 1, depth: 150)
          2017-09-14  [Fertiliser].Apply(amount: 109, type: UreaN)
          2017-09-15  [Wheat].Sow(cultivar: CerealRye, population: 547, depth: 50, rowSpacing: 190)
          2018-05-01  [Wheat].EndCrop
          2018-05-14  [SurfaceOrganicMatter].Incorporate(fraction: 1, depth: 150)
          2018-06-02  [SurfaceOrganicMatter].Incorporate(fraction: 0.2, depth: 100)
          2018-06-02  [SurfaceOrganicMatter].Reset()
          2018-06-06  [Soybean].Sow(cultivar: Generic_MG2, population: 64.2, depth: 25, rowSpacing: 760)
          2018-10-26  [Soybean].Harvest
          2018-10-27  [Soybean].EndCrop
        Soil Rosetta Lima: same as New York Simulations.NY 2018.NY NT 2018.Rosetta Lima
        Soil Lima Lab Data: same as New York Simulations.NY 2013.NY NT 2013.Lima Lab Data
    Simulation NY 2023
      Weather: FileName=/Users/stw52/Downloads/daymet_musgrave_apsimx_leap.met
      Clock: Start=2022-01-01; End=2023-11-19
      Summary
      SoilArbitrator
      Zone NY NT 2023: Area=1; Slope=2; AspectAngle=0; Altitude=50
        SurfaceOrganicMatter: InitialResidueName=Wheat; InitialResidueType=wheat; InitialResidueMass=0; InitialStandingFraction=1; InitialCPR=0; InitialCNR=30
        Fertiliser
        Report: EventNames=[Clock].EndOfDay
          VariableNames:
            [Clock].Today
            //===== Daily Values
            [Wheat].AboveGround.Wt*10 as rye_bm_kg_ha
            [Soybean].Grain.Wt*10 as soy_kg_ha
            sum([Soil].Water.MM - [Soil].Physical.DULmm) as SoilWaterDeficit
        MicroClimate: a_interception=0; b_interception=1; c_interception=0; d_interception=0; SoilHeatFluxFraction=0.4; MinimumHeightDiffForNewLayer=0; NightInterceptionFraction=0.5; ReferenceHeight=2
        Soil Musgrave Soil WSS (disabled): same as New York Simulations.NY 2015.NY Till 2015.Musgrave Soil WSS
        Plant Wheat: same as New York Simulations.NY 2014.NY Till 2014.Wheat
        Manager Simple Rotation (disabled): same as New York Simulations.NY 2015.NY NT 2015.Simple Rotation
        Manager EndWheat (disabled)
          Crop = [Wheat]
          Date = 30-may
          script: same as in New York Simulations.NY 2014.NY NT 2014.EndWheat
        Manager SowWheat (disabled)
          Rotations = [Simple Rotation]
          Crop = [Wheat]
          SowDate = 15-sep
          CultivarName = CerealRye
          SowingDepth = 25
          RowSpacing = 190
          Population = 547
          script: same as in New York Simulations.NY 2014.NY NT 2014.SowWheat
        Manager Fertilise (disabled): same as New York Simulations.NY 2015.NY NT 2015.Fertilise
        Manager SowSoy (disabled)
          Rotations = [Simple Rotation]
          Crop = [Soybean]
          SowDate = 6-jun
          CultivarName = Generic_MG2
          SowingDepth = 25
          RowSpacing = 760
          Population = 62
          script: same as in New York Simulations.NY 2014.NY NT 2014.SowWheat
        Manager HarvestSoy (disabled)
          Crop = [Soybean]
          Date = 26-oct
          script: same as in New York Simulations.NY 2014.NY NT 2014.HarvestSoy
        Plant Soybean: same as New York Simulations.NY 2015.NY NT 2015.Soybean
        Operations
          2022-09-11  [SurfaceOrganicMatter].Incorporate(fraction: 1, depth: 150)
          2022-09-15  [Fertiliser].Apply(amount: 109, type: UreaN)
          2022-09-15  [Wheat].Sow(cultivar: CerealRye, population: 121, depth: 20, rowSpacing: 190)
          2023-06-04  [Wheat].EndCrop
          2023-06-05  [Soybean].Sow(cultivar: Generic_MG2, population: 50.7, depth: 50, rowSpacing: 760)
          2023-11-19  [Soybean].Harvest
          2023-11-20  [Soybean].EndCrop
        Soil Rosetta Lima (disabled): same as New York Simulations.NY 2016.NY Till 2016.Rosetta Lima
        Soil Lima Lab Data: same as New York Simulations.NY 2013.NY NT 2013.Lima Lab Data
      Zone NY Till 2023: Area=1; Slope=2; AspectAngle=0; Altitude=50
        SurfaceOrganicMatter: InitialResidueName=Wheat; InitialResidueType=wheat; InitialResidueMass=0; InitialStandingFraction=1; InitialCPR=0; InitialCNR=30
        Fertiliser
        Report: EventNames=[Clock].EndOfDay
          VariableNames:
            [Clock].Today
            //===== Daily Values
            [Wheat].AboveGround.Wt*10 as rye_bm_kg_ha
            [Soybean].Grain.Wt*10 as soy_kg_ha
            sum([Soil].Water.MM - [Soil].Physical.DULmm) as SoilWaterDeficit
        MicroClimate: a_interception=0; b_interception=1; c_interception=0; d_interception=0; SoilHeatFluxFraction=0.4; MinimumHeightDiffForNewLayer=0; NightInterceptionFraction=0.5; ReferenceHeight=2
        Soil Musgrave Soil WSS (disabled): same as New York Simulations.NY 2015.NY Till 2015.Musgrave Soil WSS
        Plant Wheat: same as New York Simulations.NY 2014.NY Till 2014.Wheat
        Manager Simple Rotation (disabled): same as New York Simulations.NY 2015.NY NT 2015.Simple Rotation
        Manager EndWheat (disabled): same as New York Simulations.NY 2023.NY NT 2023.EndWheat
        Manager SowWheat (disabled): same as New York Simulations.NY 2023.NY NT 2023.SowWheat
        Manager Fertilise (disabled): same as New York Simulations.NY 2015.NY NT 2015.Fertilise
        Manager SowSoy (disabled): same as New York Simulations.NY 2023.NY NT 2023.SowSoy
        Manager HarvestSoy (disabled): same as New York Simulations.NY 2023.NY NT 2023.HarvestSoy
        Plant Soybean: same as New York Simulations.NY 2015.NY NT 2015.Soybean
        Operations
          2022-09-11  [SurfaceOrganicMatter].Incorporate(fraction: 1, depth: 150)
          2022-09-14  [Fertiliser].Apply(amount: 109, type: UreaN)
          2022-09-15  [Wheat].Sow(cultivar: CerealRye, population: 121, depth: 50, rowSpacing: 190)
          2023-05-12  [Wheat].EndCrop
          2023-06-02  [SurfaceOrganicMatter].Incorporate(fraction: 0.2, depth: 100)
          2023-06-05  [Soybean].Sow(cultivar: Generic_MG2, population: 57.3, depth: 50, rowSpacing: 760)
          2023-11-19  [Soybean].Harvest
          2023-11-20  [Soybean].EndCrop
        Soil Rosetta Lima (disabled): same as New York Simulations.NY 2016.NY Till 2016.Rosetta Lima
        Soil Lima Lab Data: same as New York Simulations.NY 2013.NY NT 2013.Lima Lab Data
    Simulation NY 2024
      Weather: FileName=/Users/stw52/Downloads/daymet_musgrave_apsimx_leap.met
      Clock: Start=2023-01-01; End=2024-11-19
      Summary
      SoilArbitrator
      Zone NY NT 2024: Area=1; Slope=2; AspectAngle=0; Altitude=50
        SurfaceOrganicMatter: InitialResidueName=Wheat; InitialResidueType=wheat; InitialResidueMass=0; InitialStandingFraction=1; InitialCPR=0; InitialCNR=30
        Fertiliser
        Report: EventNames=[Clock].EndOfDay
          VariableNames:
            [Clock].Today
            //===== Daily Values
            [Wheat].AboveGround.Wt*10 as rye_bm_kg_ha
            [Soybean].Grain.Wt*10 as soy_kg_ha
            sum([Soil].Water.MM - [Soil].Physical.DULmm) as SoilWaterDeficit
            [Soybean].Phenology.AccumulatedTT as thermal_time
        MicroClimate: a_interception=0; b_interception=1; c_interception=0; d_interception=0; SoilHeatFluxFraction=0.4; MinimumHeightDiffForNewLayer=0; NightInterceptionFraction=0.5; ReferenceHeight=2
        Plant Wheat: same as New York Simulations.NY 2014.NY Till 2014.Wheat
        Manager Simple Rotation (disabled): same as New York Simulations.NY 2015.NY NT 2015.Simple Rotation
        Manager EndWheat (disabled)
          Crop = [Wheat]
          Date = 22-may
          script: same as in New York Simulations.NY 2014.NY NT 2014.EndWheat
        Manager Fertilise (disabled): same as New York Simulations.NY 2015.NY NT 2015.Fertilise
        Manager HarvestSoy (disabled): same as New York Simulations.NY 2023.NY NT 2023.HarvestSoy
        Plant Soybean: same as New York Simulations.NY 2015.NY NT 2015.Soybean
        Operations
          2023-09-11  [SurfaceOrganicMatter].Incorporate(fraction: 1, depth: 150)
          2023-09-15  [Fertiliser].Apply(amount: 109, type: UreaN)
          2023-09-15  [Wheat].Sow(cultivar: CerealRye, population: 121, depth: 20, rowSpacing: 190)
          2024-05-22  [Wheat].EndCrop
          2024-05-23  [Soybean].Sow(cultivar: Generic_MG2, population: 55.8, depth: 25, rowSpacing: 760)
          2024-10-26  [Soybean].Harvest
          2024-10-27  [Soybean].EndCrop
        Manager Sow Soy (disabled)
          Crop = [Soybean]
          SowDate = 23-May
          CultivarName = Generic_MG2
          SowingDepth = 50
          RowSpacing = 760
          Population = 61.8
```csharp
using APSIM.Shared.Utilities;
using Models.Utilities;
using Models.Soils;
using Models.PMF;
using Models.Core;
using System;
using System.Linq;

namespace Models
{
    [Serializable]
    public class Script : Model
    {
        [Link] Clock Clock;
        [Link] Fertiliser Fertiliser;
        [Link] Summary Summary;
        [Link] Soil Soil;
        
        [Description("Crop")]
        public IPlant Crop { get; set; }

        [Description("Sowing date (d-mmm)")]
        public string SowDate { get; set; }

        [Display(Type = DisplayType.CultivarName)]
        [Description("Cultivar to be sown")]
        public string CultivarName { get; set; }

        [Description("Sowing depth (mm)")]
        public double SowingDepth { get; set; }

        [Description("Row spacing (mm)")]
        public double RowSpacing { get; set; }

        [Description("Plant population (/m2)")]
        public double Population { get; set; }

        [EventSubscribe("DoManagement")]
        private void OnDoManagement(object sender, EventArgs e)
        {
            if (DateUtilities.WithinDates(SowDate, Clock.Today, SowDate))
            {
                Crop.Sow(population: Population, cultivar: CultivarName, depth: SowingDepth, rowSpacing: RowSpacing);    
            }
        }
    }
}
```
        Manager Sow on a fixed date (disabled)
          Crop = [Wheat]
          SowDate = 15-Sep
          CultivarName = CerealRye
          SowingDepth = 50
          RowSpacing = 190
          Population = 770
          script: same as in New York Simulations.NY 2024.NY NT 2024.Sow Soy
        Soil Lima Lab Data: same as New York Simulations.NY 2013.NY NT 2013.Lima Lab Data
      Zone NY Till 2024: Area=1; Slope=2; AspectAngle=0; Altitude=50
        SurfaceOrganicMatter: InitialResidueName=Wheat; InitialResidueType=wheat; InitialResidueMass=0; InitialStandingFraction=1; InitialCPR=0; InitialCNR=30
        Fertiliser
        Report: EventNames=[Clock].EndOfDay
          VariableNames:
            [Clock].Today
            //===== Daily Values
            [Soybean].Grain.Wt*10 as soy_kg_ha
            sum([Soil].Water.MM - [Soil].Physical.DULmm) as SoilWaterDeficit
            [Wheat].Phenology.Zadok
        MicroClimate: a_interception=0; b_interception=1; c_interception=0; d_interception=0; SoilHeatFluxFraction=0.4; MinimumHeightDiffForNewLayer=0; NightInterceptionFraction=0.5; ReferenceHeight=2
        Plant Wheat: same as New York Simulations.NY 2014.NY Till 2014.Wheat
        Manager Simple Rotation (disabled)
          Crops = Soybean
          script: same as in New York Simulations.NY 2014.NY NT 2014.Simple Rotation
        Manager EndWheat (disabled): same as New York Simulations.NY 2023.NY NT 2023.EndWheat
        Manager Fertilise (disabled): same as New York Simulations.NY 2015.NY NT 2015.Fertilise
        Manager HarvestSoy (disabled): same as New York Simulations.NY 2023.NY NT 2023.HarvestSoy
        Plant Soybean: same as New York Simulations.NY 2015.NY NT 2015.Soybean
        Operations
          2024-05-14  [SurfaceOrganicMatter].Incorporate(fraction: 1, depth: 150)
          2024-05-20  [SurfaceOrganicMatter].Incorporate(fraction: 0.2, depth: 100)
          2024-05-23  [Soybean].Sow(cultivar: Generic_MG2, population: 61.7, depth: 25, rowSpacing: 760)
          2024-10-26  [Soybean].Harvest
          2024-10-27  [Soybean].EndCrop
        Manager Sow Wheat (disabled)
          Crop = [Wheat]
          SowDate = 24-Jul
          CultivarName = Amethyst
          SowingDepth = 50
          RowSpacing = 750
          Population = 6
          script: same as in New York Simulations.NY 2024.NY NT 2024.Sow Soy
        Manager Sow Soy (disabled): same as New York Simulations.NY 2024.NY NT 2024.Sow Soy
        Soil Lima Lab Data: same as New York Simulations.NY 2013.NY NT 2013.Lima Lab Data
  Folder Wisconsin Simulations
    Simulation WI 2015
      Weather: FileName=/Users/stw52/Downloads/aars_apsim_daymet.met
      Clock: Start=2014-01-01; End=2015-11-19
      Summary
      SoilArbitrator
      Zone WI NT 2015: Area=1; Slope=2; AspectAngle=0; Altitude=50
        SurfaceOrganicMatter: InitialResidueName=Wheat; InitialResidueType=wheat; InitialResidueMass=0; InitialStandingFraction=1; InitialCPR=0; InitialCNR=30
        Fertiliser
        Report: EventNames=[Clock].EndOfDay
          VariableNames:
            [Clock].Today
            //===== Daily Values
            [Wheat].AboveGround.Wt*10 as rye_bm_kg_ha
            [Soybean].Grain.Wt*10 as soy_kg_ha
            sum([Soil].Water.MM - [Soil].Physical.DULmm) as SoilWaterDeficit
            [Soil].Water.Potential
        MicroClimate: a_interception=0; b_interception=1; c_interception=0; d_interception=0; SoilHeatFluxFraction=0.4; MinimumHeightDiffForNewLayer=0; NightInterceptionFraction=0.5; ReferenceHeight=2
        Plant Wheat: same as New York Simulations.NY 2014.NY Till 2014.Wheat
        Plant Soybean: same as New York Simulations.NY 2015.NY NT 2015.Soybean
        Operations
          2014-09-10  [SurfaceOrganicMatter].Incorporate(fraction: 1, depth: 150)
          2014-09-11  [Fertiliser].Apply(amount: 122, type: UreaN)
          2014-09-18  [Wheat].Sow(cultivar: CerealRye, population: 547, depth: 25, rowSpacing: 190)
          2015-06-02  [Wheat].EndCrop()
          2015-06-03  [Soybean].Sow(cultivar: Generic_MG1, population: 40, depth: 50, rowSpacing: 760)
          2015-10-17  [Soybean].Harvest
          2015-10-18  [Soybean].EndCrop
        Soil Plano SL WSS: SoilType=0; Region=Pierce; State=Wisconsin; Country=US; ApsoilNumber=221; Latitude=44.64; Longitude=-92.453; YearOfSampling=2015; Comments=0
          DataSource:
            Original data by http://websoilsurvey.sc.egov.usda.gov/App/HomePage.htm
            Profile developed by Integrated Cropping Systems Lab, Department of Agronomy, ISU
          Physical
            Thickness  ParticleSizeSand  ParticleSizeSilt  ParticleSizeClay  Rocks  BD    AirDry  LL15   DUL    SAT    KS
            150        9.5               68                22.5              0      1.34  0.076   0.152  0.299  0.444  792
            150        9.2               67.3              23.5              0      1.35  0.138   0.153  0.3    0.441  792
            150        7                 63                30                0      1.42  0.163   0.163  0.306  0.414  792
            150        7                 63                30                0      1.42  0.163   0.163  0.306  0.414  792
            150        7                 63                30                0      1.42  0.163   0.163  0.306  0.414  792
            150        7                 63                30                0      1.42  0.163   0.163  0.306  0.414  792
            1100       53.5              30.9              15.6              0      1.5   0.138   0.138  0.233  0.384  1728
            BD source: Field measured and checked for sensibility (layer 5)
            SAT source: Calculated from measured, estimated or calculated BD (layer 5)
            Rocks source: Calculated (layer 1, 2, 3, 4, 5, 6)
            SoilCrop maizeSoil: LL=[0.152, 0.153, 0.163, 0.163, 0.163, 0.163, 0.138]; KL=[0.08, 0.069, 0.064, 0.057, 0.049, 0.035, 0.06]; XF=[1, 1, 1, 1, 1, 1, 1]
              LL, KL, XF source: Calculated (layer 7)
            SoilCrop soybeanSoil: LL=[0.152, 0.153, 0.163, 0.163, 0.163, 0.163, 0.138]; KL=[0.06, 0.049, 0.04, 0.032, 0.026, 0.022, 0.01]; XF=[1, 1, 1, 1, 1, 1, 1]
              LL, XF source: Calculated (layer 7)
            SoilCrop wheatSoil: LL=[0.152, 0.153, 0.163, 0.163, 0.163, 0.163, 0.138]; KL=[0.06, 0.049, 0.04, 0.032, 0.026, 0.022, 0.01]; XF=[1, 1, 1, 1, 1, 1, 1]
              LL source: Calculated (layer 7)
              KL source: Calculated (layer 1)
              XF source: Calculated
          WaterBalance SoilWater: SummerDate=1-jun; SummerU=7; SummerCona=3; WinterDate=1-nov; WinterU=7.275; WinterCona=3.575; DiffusConst=84; DiffusSlope=35.4; Salb=0.17; CN2Bare=73; CNRed=20; CNCov=0.8; PSIDul=-100; Thickness=[330, 80, 170, 140, 270, 710]; SWCON=[0.255, 0.293, 0.25, 0.246, 0.515, 0.226]
          Organic: FOMCNRatio=40; CarbonUnits=Total
            Thickness  Carbon  SoilCNRatio  FBiom   FInert  FOM
            200        2.32    12           0.04    0.8     150
            200        2.32    12           0.032   0.81    122
            200        2.32    12           0.0268  0.82    100.5
            200        0.36    12           0.022   0.82    82
            200        0.26    12           0.018   0.83    67.4
            200        0.26    12           0.015   0.84    55.2
            200        0.26    12           0.012   0.85    45.2
            200        0.26    12           0.009   0.86    37
            400        0.18    12           0.08    0.87    30
          Chemical: PHUnits=Water
            Thickness  PH    CEC
            150        6.58  9.5015
            150        6.48  9.7484
            150        6.05  9.8245
            150        6.05  9.2815
            150        6.05  9.0325
            150        6.05  8.8165
            1100       7.64  8.16984
            CEC source: Calculated
            PH source: Estimated based on local knowledge
          Nutrient
          Solute NO3: Thickness=[150, 150, 150, 150, 150, 150, 1100]; InitialValues=[0, 0, 0, 0, 0, 0, 0]; InitialValuesUnits=ppm; WaterTableConcentration=0; D0=0; Exco=[1, 1, 1, 1, 1, 1]; FIP=[1, 1, 1, 1, 1, 1]; DepthConstant=0; MaxDepthSoluteAccessible=0; RunoffEffectivenessAtMovingSolute=0; MaxEffectiveRunoff=0
          Solute NH4: same as Wisconsin Simulations.WI 2015.WI NT 2015.Plano SL WSS.NO3
          Solute Urea: Thickness=[150, 150, 150, 150, 150, 150, 1100]; InitialValues=[0, 0, 0, 0, 0, 0, 0]; InitialValuesUnits=kg/ha; WaterTableConcentration=0; D0=0; Exco=[1, 1, 1, 1, 1, 1]; FIP=[1, 1, 1, 1, 1, 1]; DepthConstant=0; MaxDepthSoluteAccessible=0; RunoffEffectivenessAtMovingSolute=0; MaxEffectiveRunoff=0
          Water: Thickness=[150, 150, 150, 150, 150, 150, 1100]; InitialValues=[0.299, 0.3, 0.306, 0.306, 0.306, 0.306, 0.233]; FilledFromTop=true
          SoilTemperature Temperature
      Zone WI Till 2015: Area=1; Slope=2; AspectAngle=0; Altitude=50
        SurfaceOrganicMatter: InitialResidueName=Wheat; InitialResidueType=wheat; InitialResidueMass=0; InitialStandingFraction=1; InitialCPR=0; InitialCNR=30
        Fertiliser
        Report: EventNames=[Clock].EndOfDay
          VariableNames:
            [Clock].Today
            //===== Daily Values
            [Soybean].Grain.Wt*10 as soy_kg_ha
            sum([Soil].Water.MM - [Soil].Physical.DULmm) as SoilWaterDeficit
            [Soil].Water.Volumetric
            [Soil].Water.Potential
        MicroClimate: a_interception=0; b_interception=1; c_interception=0; d_interception=0; SoilHeatFluxFraction=0.4; MinimumHeightDiffForNewLayer=0; NightInterceptionFraction=0.5; ReferenceHeight=2
        Plant Wheat: same as New York Simulations.NY 2014.NY Till 2014.Wheat
        Plant Soybean: same as New York Simulations.NY 2015.NY NT 2015.Soybean
        Operations
          2015-06-01  [SurfaceOrganicMatter].Incorporate(fraction: 1, depth: 150)
          2015-06-03  [Soybean].Sow(cultivar: Generic_MG1, population: 41.3, depth: 50, rowSpacing: 760)
          2015-10-17  [Soybean].Harvest
          2015-10-18  [Soybean].EndCrop
        Soil Plano SL WSS: same as Wisconsin Simulations.WI 2015.WI NT 2015.Plano SL WSS
    Simulation WI 2017
      Weather: FileName=/Users/stw52/Downloads/aars_apsim_daymet.met
      Clock: Start=2016-01-01; End=2017-11-19
      Summary
      SoilArbitrator
      Zone WI NT 2017: Area=1; Slope=2; AspectAngle=0; Altitude=50
        SurfaceOrganicMatter: InitialResidueName=Wheat; InitialResidueType=wheat; InitialResidueMass=0; InitialStandingFraction=1; InitialCPR=0; InitialCNR=30
        Fertiliser
        Report: EventNames=[Clock].EndOfDay
          VariableNames:
            [Clock].Today
            //===== Daily Values
            [Wheat].AboveGround.Wt*10 as rye_bm_kg_ha
            [Soybean].Grain.Wt*10 as soy_kg_ha
            sum([Soil].Water.MM - [Soil].Physical.DULmm) as SoilWaterDeficit
        MicroClimate: a_interception=0; b_interception=1; c_interception=0; d_interception=0; SoilHeatFluxFraction=0.4; MinimumHeightDiffForNewLayer=0; NightInterceptionFraction=0.5; ReferenceHeight=2
        Plant Wheat: same as New York Simulations.NY 2014.NY Till 2014.Wheat
        Plant Soybean: same as New York Simulations.NY 2015.NY NT 2015.Soybean
        Operations
          2016-09-10  [SurfaceOrganicMatter].Incorporate(fraction: 1, depth: 150)
          2016-09-11  [Fertiliser].Apply(amount: 122, type: UreaN)
          2016-09-19  [Wheat].Sow(cultivar: CerealRye, population: 547, depth: 25, rowSpacing: 190)
          2017-05-31  [Wheat].EndCrop()
          2017-06-01  [Soybean].Sow(cultivar: Generic_MG1, population: 23.18, depth: 50, rowSpacing: 760)
          2017-10-19  [Soybean].Harvest
          2017-10-20  [Soybean].EndCrop
        Soil Plano SL WSS: same as Wisconsin Simulations.WI 2015.WI NT 2015.Plano SL WSS
      Zone WI Till 2017: Area=1; Slope=2; AspectAngle=0; Altitude=50
        SurfaceOrganicMatter: InitialResidueName=Wheat; InitialResidueType=wheat; InitialResidueMass=0; InitialStandingFraction=1; InitialCPR=0; InitialCNR=30
        Fertiliser
        Report: EventNames=[Clock].EndOfDay
          VariableNames:
            [Clock].Today
            //===== Daily Values
            [Soybean].Grain.Wt*10 as soy_kg_ha
            sum([Soil].Water.MM - [Soil].Physical.DULmm) as SoilWaterDeficit
            [Soil].Water.Volumetric
        MicroClimate: a_interception=0; b_interception=1; c_interception=0; d_interception=0; SoilHeatFluxFraction=0.4; MinimumHeightDiffForNewLayer=0; NightInterceptionFraction=0.5; ReferenceHeight=2
        Plant Wheat: same as New York Simulations.NY 2014.NY Till 2014.Wheat
        Plant Soybean: same as New York Simulations.NY 2015.NY NT 2015.Soybean
        Operations
          2017-05-30  [SurfaceOrganicMatter].Incorporate(fraction: 1, depth: 150)
          2017-06-01  [Soybean].Sow(cultivar: Generic_MG1, population: 36.6, depth: 50, rowSpacing: 760)
          2017-10-19  [Soybean].Harvest
          2017-10-20  [Soybean].EndCrop
        Soil Plano SL WSS: same as Wisconsin Simulations.WI 2015.WI NT 2015.Plano SL WSS
    Simulation WI 2018
      Weather: FileName=/Users/stw52/Downloads/aars_apsim_daymet.met
      Clock: Start=2017-01-01; End=2018-11-19
      Summary
      SoilArbitrator
      Zone WI NT 2018: Area=1; Slope=2; AspectAngle=0; Altitude=50
        SurfaceOrganicMatter: InitialResidueName=Wheat; InitialResidueType=wheat; InitialResidueMass=0; InitialStandingFraction=1; InitialCPR=0; InitialCNR=30
        Fertiliser
        Report: EventNames=[Clock].EndOfDay
          VariableNames:
            [Clock].Today
            //===== Daily Values
            [Wheat].AboveGround.Wt*10 as rye_bm_kg_ha
            [Soybean].Grain.Wt*10 as soy_kg_ha
            sum([Soil].Water.MM - [Soil].Physical.DULmm) as SoilWaterDeficit
        MicroClimate: a_interception=0; b_interception=1; c_interception=0; d_interception=0; SoilHeatFluxFraction=0.4; MinimumHeightDiffForNewLayer=0; NightInterceptionFraction=0.5; ReferenceHeight=2
        Plant Wheat: same as New York Simulations.NY 2014.NY Till 2014.Wheat
        Plant Soybean: same as New York Simulations.NY 2015.NY NT 2015.Soybean
        Operations
          2017-09-24  [SurfaceOrganicMatter].Incorporate(fraction: 1, depth: 150)
          2017-09-25  [Fertiliser].Apply(amount: 122, type: UreaN)
          2017-10-02  [Wheat].Sow(cultivar: CerealRye, population: 747, depth: 25, rowSpacing: 190)
          2018-06-05  [Wheat].EndCrop()
          2018-06-06  [Soybean].Sow(cultivar: Generic_MG1, population: 36.9, depth: 50, rowSpacing: 760)
          2018-11-19  [Soybean].Harvest
          2018-11-20  [Soybean].EndCrop
        Soil Plano SL WSS: same as Wisconsin Simulations.WI 2015.WI NT 2015.Plano SL WSS
      Zone WI Till 2018: Area=1; Slope=2; AspectAngle=0; Altitude=50
        SurfaceOrganicMatter: InitialResidueName=Wheat; InitialResidueType=wheat; InitialResidueMass=0; InitialStandingFraction=1; InitialCPR=0; InitialCNR=30
        Fertiliser
        Report: EventNames=[Clock].EndOfDay
          VariableNames:
            [Clock].Today
            //===== Daily Values
            [Soybean].Grain.Wt*10 as soy_kg_ha
            sum([Soil].Water.MM - [Soil].Physical.DULmm) as SoilWaterDeficit
            [Soil].Water.Volumetric
        MicroClimate: a_interception=0; b_interception=1; c_interception=0; d_interception=0; SoilHeatFluxFraction=0.4; MinimumHeightDiffForNewLayer=0; NightInterceptionFraction=0.5; ReferenceHeight=2
        Plant Wheat: same as New York Simulations.NY 2014.NY Till 2014.Wheat
        Plant Soybean: same as New York Simulations.NY 2015.NY NT 2015.Soybean
        Operations
          2018-06-01  [SurfaceOrganicMatter].Incorporate(fraction: 1, depth: 150)
          2018-06-06  [Soybean].Sow(cultivar: Generic_MG1, population: 45.4, depth: 50, rowSpacing: 760)
          2018-11-19  [Soybean].Harvest
          2018-11-20  [Soybean].EndCrop
        Soil Plano SL WSS: same as Wisconsin Simulations.WI 2015.WI NT 2015.Plano SL WSS
    Simulation WI 2019
      Weather: FileName=/Users/stw52/Downloads/aars_apsim_daymet.met
      Clock: Start=2018-01-01; End=2019-11-19
      Summary
      SoilArbitrator
      Zone WI NT 2019: Area=1; Slope=2; AspectAngle=0; Altitude=50
        SurfaceOrganicMatter: InitialResidueName=Wheat; InitialResidueType=wheat; InitialResidueMass=0; InitialStandingFraction=1; InitialCPR=0; InitialCNR=30
        Fertiliser
        Report: EventNames=[Clock].EndOfDay
          VariableNames:
            [Clock].Today
            //===== Daily Values
            [Wheat].AboveGround.Wt*10 as rye_bm_kg_ha
            [Soybean].Grain.Wt*10 as soy_kg_ha
            sum([Soil].Water.MM - [Soil].Physical.DULmm) as SoilWaterDeficit
        MicroClimate: a_interception=0; b_interception=1; c_interception=0; d_interception=0; SoilHeatFluxFraction=0.4; MinimumHeightDiffForNewLayer=0; NightInterceptionFraction=0.5; ReferenceHeight=2
        Plant Wheat: same as New York Simulations.NY 2014.NY Till 2014.Wheat
        Plant Soybean: same as New York Simulations.NY 2015.NY NT 2015.Soybean
        Operations
          2018-09-10  [SurfaceOrganicMatter].Incorporate(fraction: 1, depth: 150)
          2018-09-11  [Fertiliser].Apply(amount: 122, type: UreaN)
          2018-09-17  [Wheat].Sow(cultivar: CerealRye, population: 649, depth: 25, rowSpacing: 190)
          2019-06-02  [Wheat].EndCrop()
          2019-06-05  [Soybean].Sow(cultivar: Generic_MG1, population: 38.8, depth: 50, rowSpacing: 760)
          2019-11-24  [Soybean].Harvest
          2019-11-25  [Soybean].EndCrop
        Soil Plano SL WSS: same as Wisconsin Simulations.WI 2015.WI NT 2015.Plano SL WSS
      Zone WI Till 2019: Area=1; Slope=2; AspectAngle=0; Altitude=50
        SurfaceOrganicMatter: InitialResidueName=Wheat; InitialResidueType=wheat; InitialResidueMass=0; InitialStandingFraction=1; InitialCPR=0; InitialCNR=30
        Fertiliser
        Report: EventNames=[Clock].EndOfDay
          VariableNames:
            [Clock].Today
            //===== Daily Values
            [Soybean].Grain.Wt*10 as soy_kg_ha
            sum([Soil].Water.MM - [Soil].Physical.DULmm) as SoilWaterDeficit
            [Soil].Water.Volumetric
        MicroClimate: a_interception=0; b_interception=1; c_interception=0; d_interception=0; SoilHeatFluxFraction=0.4; MinimumHeightDiffForNewLayer=0; NightInterceptionFraction=0.5; ReferenceHeight=2
        Plant Wheat: same as New York Simulations.NY 2014.NY Till 2014.Wheat
        Plant Soybean: same as New York Simulations.NY 2015.NY NT 2015.Soybean
        Operations
          2019-06-01  [SurfaceOrganicMatter].Incorporate(fraction: 1, depth: 150)
          2018-09-11  [Fertiliser].Apply(amount: 122, type: UreaN)
          2019-06-05  [Soybean].Sow(cultivar: Generic_MG1, population: 39.6, depth: 50, rowSpacing: 760)
          2019-11-24  [Soybean].Harvest
          2019-11-25  [Soybean].EndCrop
        Soil Plano SL WSS: same as Wisconsin Simulations.WI 2015.WI NT 2015.Plano SL WSS
    Simulation WI 2020 - Missing info
      Weather: FileName=arlington_apsim_weather.csv
        ConstantsFile=/Users/stw52/Library/CloudStorage/Box-Box/TOTO OREI/Yield Gap Soy NT vs Till/NY-WI Rye Soy YGA Sam/Data/Weather data/APSIM Ready Weather Files and Constant Files/Arlington/arlington_constants.txt
      Clock: Start=2019-01-01; End=2020-11-19
      Summary
      SoilArbitrator
      Zone WI NT 2020: Area=1; Slope=2; AspectAngle=0; Altitude=50
        SurfaceOrganicMatter: InitialResidueName=Wheat; InitialResidueType=wheat; InitialResidueMass=0; InitialStandingFraction=1; InitialCPR=0; InitialCNR=30
        Fertiliser
        Report: EventNames=[Clock].EndOfDay
          VariableNames:
            [Clock].Today
            //===== Daily Values
            [Wheat].AboveGround.Wt*10 as rye_bm_kg_ha
            [Soybean].Grain.Wt*10 as soy_kg_ha
            sum([Soil].Water.MM - [Soil].Physical.DULmm) as SoilWaterDeficit
        MicroClimate: a_interception=0; b_interception=1; c_interception=0; d_interception=0; SoilHeatFluxFraction=0.4; MinimumHeightDiffForNewLayer=0; NightInterceptionFraction=0.5; ReferenceHeight=2
        Plant Wheat: same as New York Simulations.NY 2014.NY Till 2014.Wheat
        Plant Soybean: same as New York Simulations.NY 2015.NY NT 2015.Soybean
        Operations
          2019-09-10  [SurfaceOrganicMatter].Incorporate(fraction: 1, depth: 150)
          2019-09-11  [Fertiliser].Apply(amount: 122, type: UreaN)
          2019-09-18  [Wheat].Sow(cultivar: CerealRye, population: 721, depth: 25, rowSpacing: 190)
          2020-06-02  [Wheat].EndCrop()
          2020-06-03  [Soybean].Sow(cultivar: Generic_MG1, population: 53.1, depth: 50, rowSpacing: 760)
          2020-10-17  [Soybean].Harvest
          2020-10-18  [Soybean].EndCrop
        Soil Plano SL WSS: SoilType=0; Region=Pierce; State=Wisconsin; Country=US; ApsoilNumber=221; Latitude=44.64; Longitude=-92.453; YearOfSampling=2015; Comments=0
          DataSource:
            Original data by http://websoilsurvey.sc.egov.usda.gov/App/HomePage.htm
            Profile developed by Integrated Cropping Systems Lab, Department of Agronomy, ISU
          Physical: same as Wisconsin Simulations.WI 2015.WI NT 2015.Plano SL WSS.Physical
          WaterBalance SoilWater: same as Wisconsin Simulations.WI 2015.WI NT 2015.Plano SL WSS.SoilWater
          Organic: same as Wisconsin Simulations.WI 2015.WI NT 2015.Plano SL WSS.Organic
          Chemical: same as Wisconsin Simulations.WI 2015.WI NT 2015.Plano SL WSS.Chemical
          Nutrient
          Solute NO3: same as Wisconsin Simulations.WI 2015.WI NT 2015.Plano SL WSS.NO3
          Solute NH4: same as Wisconsin Simulations.WI 2015.WI NT 2015.Plano SL WSS.NO3
          Solute Urea: same as Wisconsin Simulations.WI 2015.WI NT 2015.Plano SL WSS.Urea
          Water: Thickness=[150, 150, 150, 150, 150, 150, 1100]; InitialValues=[0.299, 0.3, 0.306, 0.306, 0.306, 0.306, 0.213822]; FilledFromTop=true
          SoilTemperature Temperature
      Zone WI Till 2020: Area=1; Slope=2; AspectAngle=0; Altitude=50
        SurfaceOrganicMatter: InitialResidueName=Wheat; InitialResidueType=wheat; InitialResidueMass=0; InitialStandingFraction=1; InitialCPR=0; InitialCNR=30
        Fertiliser
        Report: EventNames=[Clock].EndOfDay
          VariableNames:
            [Clock].Today
            //===== Daily Values
            [Soybean].Grain.Wt*10 as soy_kg_ha
            sum([Soil].Water.MM - [Soil].Physical.DULmm) as SoilWaterDeficit
            [Soil].Water.Volumetric
        MicroClimate: a_interception=0; b_interception=1; c_interception=0; d_interception=0; SoilHeatFluxFraction=0.4; MinimumHeightDiffForNewLayer=0; NightInterceptionFraction=0.5; ReferenceHeight=2
        Plant Wheat: same as New York Simulations.NY 2014.NY Till 2014.Wheat
        Plant Soybean: same as New York Simulations.NY 2015.NY NT 2015.Soybean
        Operations
          2015-06-01  [SurfaceOrganicMatter].Incorporate(fraction: 1, depth: 150)
          2015-06-03  [Soybean].Sow(cultivar: Generic_MG1, population: 57.7, depth: 50, rowSpacing: 760)
          2015-10-17  [Soybean].Harvest
          2015-10-18  [Soybean].EndCrop
        Soil Plano SL WSS: same as Wisconsin Simulations.WI 2020 - Missing info.WI NT 2020.Plano SL WSS
    Simulation WI 2021a
      Weather: FileName=/Users/stw52/Downloads/apsim_aars.met
      Clock: Start=2020-01-01; End=2021-11-19
      Summary
      SoilArbitrator
      Zone WI NT 2021a: Area=1; Slope=2; AspectAngle=0; Altitude=50
        SurfaceOrganicMatter: InitialResidueName=Wheat; InitialResidueType=wheat; InitialResidueMass=0; InitialStandingFraction=1; InitialCPR=0; InitialCNR=30
        Fertiliser
        Report: EventNames=[Clock].EndOfDay
          VariableNames:
            [Clock].Today
            //===== Daily Values
            [Wheat].AboveGround.Wt*10 as rye_bm_kg_ha
            [Soybean].Grain.Wt*10 as soy_kg_ha
            sum([Soil].Water.MM - [Soil].Physical.DULmm) as SoilWaterDeficit
            [Soybean].Root.Depth as soy_root_depth
        MicroClimate: a_interception=0; b_interception=1; c_interception=0; d_interception=0; SoilHeatFluxFraction=0.4; MinimumHeightDiffForNewLayer=0; NightInterceptionFraction=0.5; ReferenceHeight=2
        Plant Wheat: same as New York Simulations.NY 2014.NY Till 2014.Wheat
        Plant Soybean: same as New York Simulations.NY 2015.NY NT 2015.Soybean
        Operations
          2020-09-18  [SurfaceOrganicMatter].Incorporate(fraction: 1, depth: 150)
          2020-09-19  [Fertiliser].Apply(amount: 122, type: UreaN)
          2020-09-22  [Wheat].Sow(cultivar: CerealRye, population: 689, depth: 25, rowSpacing: 190)
          2021-06-01  [Wheat].EndCrop()
          2021-06-02  [Soybean].Sow(cultivar: Generic_MG1, population: 68, depth: 50, rowSpacing: 760)
          2021-10-19  [Soybean].Harvest
          2021-10-20  [Soybean].EndCrop
        Soil Plano SL WSS: SoilType=0; Region=Pierce; State=Wisconsin; Country=US; ApsoilNumber=221; Latitude=44.64; Longitude=-92.453; YearOfSampling=2015; Comments=0
          DataSource:
            Original data by http://websoilsurvey.sc.egov.usda.gov/App/HomePage.htm
            Profile developed by Integrated Cropping Systems Lab, Department of Agronomy, ISU
          Physical
            Thickness  ParticleSizeSand  ParticleSizeSilt  ParticleSizeClay  Rocks  BD     AirDry  LL15   DUL    SAT    KS
            150        16                64                20                0      1.472  0.076   0.152  0.299  0.444  300
            150        9.2               61                26                0      1.48   0.138   0.153  0.3    0.441  300
            150        11                60                28                0      1.55   0.163   0.163  0.306  0.414  300
            150        11                60                28                0      1.55   0.163   0.163  0.306  0.414  300
            150        11                60                28                0      1.55   0.163   0.163  0.306  0.414  300
            150        16                60                24                0      1.55   0.163   0.163  0.306  0.414  300
            1100       53.5              30.9              15.6              0      1.5    0.138   0.138  0.233  0.384  300
            SAT source: Calculated from measured, estimated or calculated BD (layer 5)
            Rocks source: Calculated (layer 1, 2, 3, 4, 5, 6)
            SoilCrop maizeSoil: same as Wisconsin Simulations.WI 2015.WI NT 2015.Plano SL WSS.Physical.maizeSoil
            SoilCrop soybeanSoil: same as Wisconsin Simulations.WI 2015.WI NT 2015.Plano SL WSS.Physical.soybeanSoil
            SoilCrop wheatSoil: same as Wisconsin Simulations.WI 2015.WI NT 2015.Plano SL WSS.Physical.wheatSoil
          WaterBalance SoilWater: SummerDate=1-jun; SummerU=9; SummerCona=4; WinterDate=1-nov; WinterU=7; WinterCona=3; DiffusConst=84; DiffusSlope=35.4; Salb=0.17; CN2Bare=73; CNRed=20; CNCov=0.8; PSIDul=-100; Thickness=[330, 80, 170, 140, 270, 710]; SWCON=[0.255, 0.293, 0.25, 0.246, 0.515, 0.226]
          Organic: same as Wisconsin Simulations.WI 2015.WI NT 2015.Plano SL WSS.Organic
          Chemical: same as Wisconsin Simulations.WI 2015.WI NT 2015.Plano SL WSS.Chemical
          Nutrient
          Solute NO3: same as Wisconsin Simulations.WI 2015.WI NT 2015.Plano SL WSS.NO3
          Solute NH4: same as Wisconsin Simulations.WI 2015.WI NT 2015.Plano SL WSS.NO3
          Solute Urea: same as Wisconsin Simulations.WI 2015.WI NT 2015.Plano SL WSS.Urea
          Water: Thickness=[150, 150, 150, 150, 150, 150, 1100]; InitialValues=[0.299, 0.3, 0.306, 0.306, 0.306, 0.306, 0.233]; FilledFromTop=true
          SoilTemperature Temperature
        Soil Plano SL Paper: SoilType=0; Region=Pierce; State=Wisconsin; Country=US; ApsoilNumber=221; Latitude=44.64; Longitude=-92.453; YearOfSampling=2015; Comments=0
          DataSource:
            Original data by http://websoilsurvey.sc.egov.usda.gov/App/HomePage.htm
            Profile developed by Integrated Cropping Systems Lab, Department of Agronomy, ISU
          Physical
            Thickness  ParticleSizeSand  ParticleSizeSilt  ParticleSizeClay  Rocks  BD    AirDry  LL15   DUL    SAT    KS
            250        16                64                20                0      1.53  0.076   0.19   0.41   0.444  792
            250        13                61                26                0      1.56  0.138   0.19   0.4    0.441  792
            250        11                60                28                0      1.6   0.163   0.2    0.39   0.414  792
            250        16                60                24                0      1.72  0.163   0.17   0.306  0.414  792
            250        7                 63                30                0      1.42  0.163   0.163  0.306  0.414  792
            250        7                 63                30                0      1.42  0.163   0.163  0.306  0.414  792
            500        7                 63                30                0      1.7   0.16    0.16   0.306  0.414  792
            Rocks source: Calculated (layer 1, 2, 3, 4, 5, 6)
            SoilCrop maizeSoil: LL=[0.152, 0.153, 0.163, 0.163, 0.163, 0.163, 0.163]; KL=[0.08, 0.069, 0.064, 0.057, 0.049, 0.035, 0.035]; XF=[1, 1, 1, 1, 1, 1, 1]
            SoilCrop soybeanSoil: LL=[0.152, 0.153, 0.163, 0.163, 0.163, 0.163, 0.163]; KL=[0.06, 0.049, 0.04, 0.032, 0.026, 0.022, 0.022]; XF=[1, 1, 1, 1, 1, 1, 1]
            SoilCrop wheatSoil: LL=[0.152, 0.153, 0.163, 0.163, 0.163, 0.163, 0.163]; KL=[0.06, 0.049, 0.04, 0.032, 0.026, 0.022, 0.022]; XF=[1, 1, 1, 1, 1, 1, 1]
              KL source: Calculated (layer 1)
              XF source: Calculated (layer 1, 2, 3, 4, 5, 6)
          WaterBalance SoilWater: SummerDate=1-jun; SummerU=7; SummerCona=3; WinterDate=1-nov; WinterU=7.275; WinterCona=3.575; DiffusConst=84; DiffusSlope=35.4; Salb=0.17; CN2Bare=73; CNRed=20; CNCov=0.8; PSIDul=-100; Thickness=[330, 80, 170, 140, 270, 710, 300]; SWCON=[0.255, 0.293, 0.25, 0.246, 0.515, 0.226, 0.25]
          Organic: same as Wisconsin Simulations.WI 2015.WI NT 2015.Plano SL WSS.Organic
          Chemical: same as Wisconsin Simulations.WI 2015.WI NT 2015.Plano SL WSS.Chemical
          Nutrient
          Solute NO3: same as Wisconsin Simulations.WI 2015.WI NT 2015.Plano SL WSS.NO3
          Solute NH4: same as Wisconsin Simulations.WI 2015.WI NT 2015.Plano SL WSS.NO3
          Solute Urea: same as Wisconsin Simulations.WI 2015.WI NT 2015.Plano SL WSS.Urea
          Water: Thickness=[150, 150, 150, 150, 150, 150, 1100]; InitialValues=[0.299, 0.3, 0.306, 0.306, 0.306, 0.306, 0.233]; FilledFromTop=true
          SoilTemperature Temperature
      Zone WI Till 2021a: Area=1; Slope=2; AspectAngle=0; Altitude=50
        SurfaceOrganicMatter: InitialResidueName=Wheat; InitialResidueType=wheat; InitialResidueMass=0; InitialStandingFraction=1; InitialCPR=0; InitialCNR=30
        Fertiliser
        Report: EventNames=[Clock].EndOfDay
          VariableNames:
            [Clock].Today
            //===== Daily Values
            [Soybean].Grain.Wt*10 as soy_kg_ha
            sum([Soil].Water.MM - [Soil].Physical.DULmm) as SoilWaterDeficit
            [Soil].Water.Volumetric
        MicroClimate: a_interception=0; b_interception=1; c_interception=0; d_interception=0; SoilHeatFluxFraction=0.4; MinimumHeightDiffForNewLayer=0; NightInterceptionFraction=0.5; ReferenceHeight=2
        Plant Wheat
          Cultivar CerealRye
            Command:
              [Phenology].Phyllochron.BasePhyllochron.FixedValue = 90
              [Leaf].CohortParameters.MaxArea.AreaLargestLeaves.FixedValue = 4000
              [Phenology].CAMP.FLNparams.MinLN = 7
              [Phenology].CAMP.FLNparams.PpLN = 2
              [Phenology].CAMP.FLNparams.VrnLN = 5
              [Phenology].CAMP.FLNparams.VxPLN = 2
              [Phenology].HeadEmergenceLongDayBase.FixedValue = 110
              [Phenology].HeadEmergencePpSensitivity.FixedValue = 0
              [Phenology].CAMP.EnvData.VrnTreatTemp = 4.4
              [Phenology].CAMP.EnvData.VrnTreatDuration = 60
              [Leaf].Photosynthesis.RUE.FixedValue = 1.24
        Plant Soybean: same as New York Simulations.NY 2015.NY NT 2015.Soybean
        Operations
          2021-05-26  [SurfaceOrganicMatter].Incorporate(fraction: 1, depth: 150)
          2020-09-19  [Fertiliser].Apply(amount: 122, type: UreaN)
          2021-06-02  [Soybean].Sow(cultivar: Generic_MG1, population: 68, depth: 50, rowSpacing: 760)
          2021-10-19  [Soybean].Harvest
          2021-10-20  [Soybean].EndCrop
        Soil Plano SL WSS: SoilType=0; Region=Pierce; State=Wisconsin; Country=US; ApsoilNumber=221; Latitude=44.64; Longitude=-92.453; YearOfSampling=2015; Comments=0
          DataSource:
            Original data by http://websoilsurvey.sc.egov.usda.gov/App/HomePage.htm
            Profile developed by Integrated Cropping Systems Lab, Department of Agronomy, ISU
          Physical: same as Wisconsin Simulations.WI 2015.WI NT 2015.Plano SL WSS.Physical
          WaterBalance SoilWater: SummerDate=1-jun; SummerU=9; SummerCona=4; WinterDate=1-nov; WinterU=7; WinterCona=3; DiffusConst=84; DiffusSlope=35.4; Salb=0.17; CN2Bare=73; CNRed=20; CNCov=0.8; PSIDul=-333; Thickness=[330, 80, 170, 140, 270, 710]; SWCON=[0.255, 0.293, 0.25, 0.246, 0.515, 0.226]
          Organic: same as Wisconsin Simulations.WI 2015.WI NT 2015.Plano SL WSS.Organic
          Chemical: same as Wisconsin Simulations.WI 2015.WI NT 2015.Plano SL WSS.Chemical
          Nutrient
          Solute NO3: same as Wisconsin Simulations.WI 2015.WI NT 2015.Plano SL WSS.NO3
          Solute NH4: same as Wisconsin Simulations.WI 2015.WI NT 2015.Plano SL WSS.NO3
          Solute Urea: same as Wisconsin Simulations.WI 2015.WI NT 2015.Plano SL WSS.Urea
          Water: Thickness=[150, 150, 150, 150, 150, 150, 1100]; InitialValues=[0.299, 0.3, 0.306, 0.306, 0.306, 0.306, 0.233]; FilledFromTop=true
          SoilTemperature Temperature
        Soil Plano SL Paper: same as Wisconsin Simulations.WI 2021a.WI NT 2021a.Plano SL Paper
    Simulation WI 2021b
      Weather: FileName=/Users/stw52/Downloads/apsim_aars.met
      Clock: Start=2020-01-01; End=2021-11-19
      Summary
      SoilArbitrator
      Zone WI NT 2021b: Area=1; Slope=2; AspectAngle=0; Altitude=50
        SurfaceOrganicMatter: InitialResidueName=Wheat; InitialResidueType=wheat; InitialResidueMass=0; InitialStandingFraction=1; InitialCPR=0; InitialCNR=30
        Fertiliser
        Report: EventNames=[Clock].EndOfDay
          VariableNames:
            [Clock].Today
            //===== Daily Values
            [Wheat].AboveGround.Wt*10 as rye_bm_kg_ha
            [Soybean].Grain.Wt*10 as soy_kg_ha
            sum([Soil].Water.MM - [Soil].Physical.DULmm) as SoilWaterDeficit
            [Soybean].Root.Depth as soy_root_depth
        MicroClimate: a_interception=0; b_interception=1; c_interception=0; d_interception=0; SoilHeatFluxFraction=0.4; MinimumHeightDiffForNewLayer=0; NightInterceptionFraction=0.5; ReferenceHeight=2
        Plant Wheat: same as New York Simulations.NY 2014.NY Till 2014.Wheat
        Plant Soybean: same as New York Simulations.NY 2015.NY NT 2015.Soybean
        Operations
          2020-09-18  [SurfaceOrganicMatter].Incorporate(fraction: 1, depth: 150)
          2020-09-19  [Fertiliser].Apply(amount: 122, type: UreaN)
          2020-09-22  [Wheat].Sow(cultivar: CerealRye, population: 689, depth: 25, rowSpacing: 190)
          2021-06-03  [Wheat].EndCrop()
          2021-06-04  [Soybean].Sow(cultivar: Generic_MG1, population: 20, depth: 50, rowSpacing: 760)
          2021-10-27  [Soybean].Harvest
          2021-10-28  [Soybean].EndCrop
        Soil Plano SL WSS: same as Wisconsin Simulations.WI 2015.WI NT 2015.Plano SL WSS
      Zone WI Till 2021b: Area=1; Slope=2; AspectAngle=0; Altitude=50
        SurfaceOrganicMatter: InitialResidueName=Wheat; InitialResidueType=wheat; InitialResidueMass=0; InitialStandingFraction=1; InitialCPR=0; InitialCNR=30
        Fertiliser
        Report: EventNames=[Clock].EndOfDay
          VariableNames:
            [Clock].Today
            //===== Daily Values
            [Soybean].Grain.Wt*10 as soy_kg_ha
            sum([Soil].Water.MM - [Soil].Physical.DULmm) as SoilWaterDeficit
            [Soil].Water.Volumetric
        MicroClimate: a_interception=0; b_interception=1; c_interception=0; d_interception=0; SoilHeatFluxFraction=0.4; MinimumHeightDiffForNewLayer=0; NightInterceptionFraction=0.5; ReferenceHeight=2
        Plant Wheat: same as Wisconsin Simulations.WI 2021a.WI Till 2021a.Wheat
        Plant Soybean: same as New York Simulations.NY 2015.NY NT 2015.Soybean
        Operations
          2021-05-28  [SurfaceOrganicMatter].Incorporate(fraction: 1, depth: 150)
          2020-09-19  [Fertiliser].Apply(amount: 122, type: UreaN)
          2021-06-04  [Soybean].Sow(cultivar: Generic_MG1, population: 40, depth: 50, rowSpacing: 760)
          2021-10-27  [Soybean].Harvest
          2021-10-28  [Soybean].EndCrop
        Soil Plano SL WSS: same as Wisconsin Simulations.WI 2015.WI NT 2015.Plano SL WSS
    Simulation WI 2023
      Weather: FileName=/Users/stw52/Downloads/aars_apsim_daymet.met
      Clock: Start=2022-01-01; End=2023-11-19
      Summary
      SoilArbitrator
      Zone WI NT 2023: Area=1; Slope=2; AspectAngle=0; Altitude=50
        SurfaceOrganicMatter: InitialResidueName=Wheat; InitialResidueType=wheat; InitialResidueMass=0; InitialStandingFraction=1; InitialCPR=0; InitialCNR=30
        Fertiliser
        Report: EventNames=[Clock].EndOfDay
          VariableNames:
            [Clock].Today.Year
            //===== Daily Values
            [Wheat].AboveGround.Wt*10 as rye_bm_kg_ha
            [Soybean].Grain.Wt*10 as soy_kg_ha
            sum([Soil].Water.MM - [Soil].Physical.DULmm) as SoilWaterDeficit
        MicroClimate: a_interception=0; b_interception=1; c_interception=0; d_interception=0; SoilHeatFluxFraction=0.4; MinimumHeightDiffForNewLayer=0; NightInterceptionFraction=0.5; ReferenceHeight=2
        Plant Wheat: same as New York Simulations.NY 2014.NY Till 2014.Wheat
        Plant Soybean: same as New York Simulations.NY 2015.NY NT 2015.Soybean
        Operations
          2022-09-17  [SurfaceOrganicMatter].Incorporate(fraction: 1, depth: 150)
          2022-09-18  [Fertiliser].Apply(amount: 122, type: UreaN)
          2022-09-23  [Wheat].Sow(cultivar: CerealRye, population: 741, depth: 25, rowSpacing: 190)
          2023-06-06  [Wheat].EndCrop()
          2023-06-07  [Soybean].Sow(cultivar: Generic_MG1, population: 17.8, depth: 50, rowSpacing: 760)
          2023-11-07  [Soybean].Harvest
          2023-11-08  [Soybean].EndCrop
        Soil Plano SL WSS (disabled): SoilType=0; Region=Pierce; State=Wisconsin; Country=US; ApsoilNumber=221; Latitude=44.64; Longitude=-92.453; YearOfSampling=2015; Comments=0
          DataSource:
            Original data by http://websoilsurvey.sc.egov.usda.gov/App/HomePage.htm
            Profile developed by Integrated Cropping Systems Lab, Department of Agronomy, ISU
          Physical
            Thickness  ParticleSizeSand  ParticleSizeSilt  ParticleSizeClay  Rocks  BD    AirDry  LL15   DUL    SAT    KS
            150        9.5               68                22.5              0      1.34  0.076   0.152  0.299  0.444  792
            150        9.2               67.3              23.5              0      1.35  0.138   0.153  0.3    0.441  792
            150        7                 63                30                0      1.42  0.163   0.163  0.306  0.414  792
            150        7                 63                30                0      1.42  0.163   0.163  0.306  0.414  792
            150        7                 63                30                0      1.42  0.163   0.163  0.306  0.414  792
            150        7                 63                30                0      1.42  0.163   0.163  0.306  0.414  792
            1100       53.5              30.9              15.6              0      1.5   0.138   0.138  0.233  0.384  1728
            BD source: Field measured and checked for sensibility (layer 5)
            SAT source: Calculated from measured, estimated or calculated BD (layer 5)
            Rocks source: Calculated (layer 1, 2, 3, 4, 5, 6)
            SoilCrop maizeSoil: LL=[0.152, 0.153, 0.163, 0.163, 0.163, 0.163, 0.138]; KL=[0.08, 0.069, 0.064, 0.057, 0.049, 0.035, 0.06]; XF=[1, 1, 1, 1, 1, 1, 1]
              LL, KL, XF source: Calculated (layer 7)
            SoilCrop soybeanSoil: LL=[0.152, 0.153, 0.163, 0.163, 0.163, 0.163, 0.138]; KL=[0.06, 0.049, 0.04, 0.032, 0.026, 0.022, 0.01]; XF=[1, 1, 1, 1, 1, 1, 1]
              LL, XF source: Calculated (layer 7)
            SoilCrop wheatSoil: LL=[0.152, 0.153, 0.163, 0.163, 0.163, 0.163, 0.138]; KL=[0.06, 0.049, 0.04, 0.032, 0.026, 0.022, 0.01]; XF=[1, 1, 1, 1, 1, 1, 1]
              LL source: Calculated (layer 7)
              KL source: Calculated (layer 1)
              XF source: Calculated
          WaterBalance SoilWater: SummerDate=1-jun; SummerU=7; SummerCona=3; WinterDate=1-nov; WinterU=7.275; WinterCona=3.575; DiffusConst=84; DiffusSlope=35.4; Salb=0.17; CN2Bare=73; CNRed=20; CNCov=0.8; PSIDul=-100; Thickness=[330, 80, 170, 140, 270, 710]; SWCON=[0.255, 0.293, 0.25, 0.246, 0.515, 0.226]
          Organic: FOMCNRatio=40; CarbonUnits=Total
            Thickness  Carbon  SoilCNRatio  FBiom   FInert  FOM
            200        2.32    12           0.04    0.8     150
            200        2.32    12           0.032   0.81    122
            200        2.32    12           0.0268  0.82    100.5
            200        0.36    12           0.022   0.82    82
            200        0.26    12           0.018   0.83    67.4
            200        0.26    12           0.015   0.84    55.2
            200        0.26    12           0.012   0.85    45.2
            200        0.26    12           0.009   0.86    37
            400        0.18    12           0.08    0.87    30
          Chemical: PHUnits=Water
            Thickness  PH    CEC
            150        6.58  9.5015
            150        6.48  9.7484
            150        6.05  9.8245
            150        6.05  9.2815
            150        6.05  9.0325
            150        6.05  8.8165
            1100       7.64  8.16984
            CEC source: Calculated
            PH source: Estimated based on local knowledge
          Nutrient
          Solute NO3: Thickness=[150, 150, 150, 150, 150, 150, 1100]; InitialValues=[0, 0, 0, 0, 0, 0, 0]; InitialValuesUnits=ppm; WaterTableConcentration=0; D0=0; Exco=[1, 1, 1, 1, 1, 1]; FIP=[1, 1, 1, 1, 1, 1]; DepthConstant=0; MaxDepthSoluteAccessible=0; RunoffEffectivenessAtMovingSolute=0; MaxEffectiveRunoff=0
          Solute NH4: same as Wisconsin Simulations.WI 2023.WI NT 2023.Plano SL WSS.NO3
          Solute Urea: Thickness=[150, 150, 150, 150, 150, 150, 1100]; InitialValues=[0, 0, 0, 0, 0, 0, 0]; InitialValuesUnits=kg/ha; WaterTableConcentration=0; D0=0; Exco=[1, 1, 1, 1, 1, 1]; FIP=[1, 1, 1, 1, 1, 1]; DepthConstant=0; MaxDepthSoluteAccessible=0; RunoffEffectivenessAtMovingSolute=0; MaxEffectiveRunoff=0
          Water: Thickness=[150, 150, 150, 150, 150, 150, 1100]; InitialValues=[0.299, 0.3, 0.306, 0.306, 0.306, 0.306, 0.233]; FilledFromTop=true
          SoilTemperature Temperature
        Soil Plano Lab Data (disabled): SoilType=0; Region=Pierce; State=Wisconsin; Country=US; ApsoilNumber=221; Latitude=44.64; Longitude=-92.453; YearOfSampling=2015; Comments=0
          DataSource:
            Original data by http://websoilsurvey.sc.egov.usda.gov/App/HomePage.htm
            Profile developed by Integrated Cropping Systems Lab, Department of Agronomy, ISU
          Physical
            Thickness  ParticleSizeSand  ParticleSizeSilt  ParticleSizeClay  Rocks  BD    AirDry  LL15   DUL   SAT    KS
            150        3.9               71.7              24.4              0      1.31  0.076   0.15   0.34  0.469  792
            50         3.9               71.7              24.4              0      1.32  0.076   0.15   0.34  0.469  792
            180        3.4               73.6              23                0      1.44  0.13    0.13   0.34  0.457  792
            130        3.8               77                19.2              0      1.46  0.11    0.11   0.3   0.416  792
            150        3.6               70.6              25.8              0      1.51  0.14    0.14   0.3   0.426  792
            280        3.2               65.9              30.9              0      1.56  0.18    0.18   0.34  0.411  792
            180        3.5               68.4              28.1              0      1.64  0.138   0.138  0.34  0.381  1728
            380        12.6              64.6              22.8              0      1.64  0.15    0.15   0.34  0.381  1728
            130        50.4              35.1              14.5              0      1.58  0.1     0.1    0.23  0.374  1728
            150        62.4              24.6              13                0      1.64  0.1     0.1    0.23  0.374  1728
            120        72.4              20.7              6.9               0      1.64  0.1     0.1    0.23  0.374  1728
            310        72.9              22.2              4.9               0      1.78  0.1     0.1    0.23  0.328  1728
            300        72.4              23.1              4.5               0      1.84  0.1     0.1    0.23  0.306  1728
            Rocks source: Calculated (layer 1, 2, 3, 4, 5, 6)
            SoilCrop maizeSoil
              LL=[0.15, 0.15, 0.13, 0.11, 0.14, 0.18, 0.138, 0.15, 0.1, 0.1, 0.1, 0.1, 0.1]
              KL=[0.08, 0.069, 0.064, 0.057, 0.049, 0.035, 0.06, 0.06, 0.06, 0.06, 0.06, 0.06, 0.06]
              XF=[1, 1, 1, 1, 1, 1, 1, 1, 1, 1, 1, 1, 1]
              KL, XF source: Calculated (layer 7, 8, 9, 10, 11, 12, 13)
            SoilCrop soybeanSoil
              LL=[0.15, 0.15, 0.13, 0.11, 0.14, 0.18, 0.138, 0.15, 0.1, 0.1, 0.1, 0.1, 0.1]
              KL=[0.06, 0.049, 0.04, 0.032, 0.026, 0.022, 0.01, 0.06, 0.06, 0.06, 0.06, 0.06, 0.06]
              XF=[1, 1, 1, 1, 1, 1, 1, 1, 1, 1, 1, 1, 1]
              KL source: Calculated (layer 8, 9, 10, 11, 12, 13)
              XF source: Calculated (layer 7, 8, 9, 10, 11, 12, 13)
            SoilCrop wheatSoil
              LL=[0.15, 0.15, 0.13, 0.11, 0.14, 0.18, 0.138, 0.15, 0.1, 0.1, 0.1, 0.1, 0.1]
              KL=[0.06, 0.049, 0.04, 0.032, 0.026, 0.022, 0.01, 0.06, 0.06, 0.06, 0.06, 0.06, 0.06]
              XF=[1, 1, 1, 1, 1, 1, 1, 1, 1, 1, 1, 1, 1]
              KL source: Calculated (layer 1, 8, 9, 10, 11, 12, 13)
              XF source: Calculated
          WaterBalance SoilWater: SummerDate=1-jun; SummerU=7; SummerCona=3; WinterDate=1-nov; WinterU=7.275; WinterCona=3.575; DiffusConst=84; DiffusSlope=35.4; Salb=0.17; CN2Bare=73; CNRed=20; CNCov=0.8; PSIDul=-100
            Thickness=[150, 50, 180, 130, 150, 280, 180, 380, 130, 150, 120, 310, 300]
            SWCON=[0.45, 0.45, 0.45, 0.45, 0.45, 0.45, 0.45, 0.45, 0.45, 0.45, 0.45, 0.45, 0.45]
          Organic: FOMCNRatio=40; CarbonUnits=Total
            Thickness  Carbon  SoilCNRatio  FBiom  FInert  FOM
            150        2.5     12           0.04   0.8     150
            50         2.5     12           0.032  0.81    122
            180        2.32    12           0.027  0.82    100.5
            130        0.36    12           0.022  0.82    82
            150        0.26    12           0.018  0.83    67.4
            280        0.26    12           0.015  0.84    55.2
            180        0.26    12           0.012  0.85    45.2
            380        0.26    12           0.009  0.86    37
            130        0.18    12           0.08   0.87    30
            150        0.18    12           0.08   0.87    25
            120        0.18    12           0.08   0.87    20
            310        0.18    12           0.08   0.87    15
            300        0.18    12           0.08   0.87    10
          Chemical: PHUnits=Water
            Thickness  PH   CEC
            150        6.6  9.502
            50         6.5  9.748
            180        6    9.825
            130        6    9.281
            150        6    9.032
            280        6    8.816
            180        7.6  8.17
            380        7.6  8.17
            130        7.6  8.17
            150        7.6  8.18
            120        7.6  8.17
            310        7.6  8.17
            300        7.6  8.17
            CEC source: Calculated (layer 1, 2, 3, 4, 5, 6, 7)
          Nutrient
          Solute NO3: InitialValues=[0, 0, 0, 0, 0, 0, 0, 0, 0, 0, 0, 0, 0]; InitialValuesUnits=ppm; WaterTableConcentration=0; D0=0; Exco=[1, 1, 1, 1, 1, 1]; FIP=[1, 1, 1, 1, 1, 1]; DepthConstant=0; MaxDepthSoluteAccessible=0; RunoffEffectivenessAtMovingSolute=0; MaxEffectiveRunoff=0
            Thickness=[150, 50, 180, 130, 150, 280, 180, 380, 130, 150, 120, 310, 300]
          Solute NH4: same as Wisconsin Simulations.WI 2023.WI NT 2023.Plano Lab Data.NO3
          Solute Urea: InitialValues=[0, 0, 0, 0, 0, 0, 0, 0, 0, 0, 0, 0, 0]; InitialValuesUnits=kg/ha; WaterTableConcentration=0; D0=0; Exco=[1, 1, 1, 1, 1, 1]; FIP=[1, 1, 1, 1, 1, 1]; DepthConstant=0; MaxDepthSoluteAccessible=0; RunoffEffectivenessAtMovingSolute=0; MaxEffectiveRunoff=0
            Thickness=[150, 50, 180, 130, 150, 280, 180, 380, 130, 150, 120, 310, 300]
          Water: FilledFromTop=true
            Thickness=[150, 50, 180, 130, 150, 280, 180, 380, 130, 150, 120, 310, 300]
            InitialValues=[0.34, 0.34, 0.34, 0.3, 0.3, 0.34, 0.34, 0.34, 0.23, 0.23, 0.23, 0.23, 0.23]
          SoilTemperature Temperature
        Soil Plano SoilDB: SoilType=0; Region=Pierce; State=Wisconsin; Country=US; ApsoilNumber=221; Latitude=44.64; Longitude=-92.453; YearOfSampling=2015; Comments=0
          DataSource:
            Original data by http://websoilsurvey.sc.egov.usda.gov/App/HomePage.htm
            Profile developed by Integrated Cropping Systems Lab, Department of Agronomy, ISU
          Physical
            Thickness  ParticleSizeSand  ParticleSizeSilt  ParticleSizeClay  Rocks  BD    AirDry  LL15   DUL    SAT    KS
            150        9.5               68                22.5              0      1.34  0.071   0.141  0.353  0.438  792
            130        9.5               68                2.5               0      1.34  0.113   0.141  0.353  0.438  792
            400        7                 63                30                0      1.42  0.162   0.162  0.35   0.431  792
            360        7                 63                30                0      1.42  0.162   0.162  0.35   0.431  792
            130        43                34                23                0      1.6   0.14    0.14   0.267  0.363  792
            400        63                25                12                0      1.5   0.095   0.095  0.213  0.377  1728
            430        63                25                12                0      1.5   0.095   0.095  0.213  0.377  1728
            Rocks source: Calculated (layer 1, 2, 3, 4, 5, 6)
            SoilCrop maizeSoil: same as Wisconsin Simulations.WI 2015.WI NT 2015.Plano SL WSS.Physical.maizeSoil
            SoilCrop soybeanSoil: same as Wisconsin Simulations.WI 2015.WI NT 2015.Plano SL WSS.Physical.soybeanSoil
            SoilCrop wheatSoil: same as Wisconsin Simulations.WI 2015.WI NT 2015.Plano SL WSS.Physical.wheatSoil
          WaterBalance SoilWater: SummerDate=1-jun; SummerU=7; SummerCona=3; WinterDate=1-nov; WinterU=7.275; WinterCona=3.575; DiffusConst=84; DiffusSlope=35.4; Salb=0.17; CN2Bare=73; CNRed=20; CNCov=0.8; PSIDul=-100; Thickness=[150, 130, 400, 360, 130, 400, 430]; SWCON=[0.45, 0.45, 0.45, 0.45, 0.45, 0.45, 0.45]
          Organic: FOMCNRatio=40; CarbonUnits=Total
            Thickness  Carbon  SoilCNRatio  FBiom   FInert  FOM
            150        2.32    12           0.04    0.8     150
            130        2.32    12           0.032   0.81    122
            400        2.32    12           0.0268  0.82    100.5
            360        0.36    12           0.022   0.82    82
            130        0.26    12           0.018   0.83    67.4
            400        0.26    12           0.015   0.84    55.2
            430        0.26    12           0.012   0.85    45.2
            200        0.26    12           0.009   0.86    37
            400        0.18    12           0.08    0.87    30
          Chemical: PHUnits=Water
            Thickness  PH    CEC
            150        6.58  9.5015
            130        6.48  9.7484
            400        6.05  9.8245
            360        6.05  9.2815
            130        6.05  9.0325
            400        6.05  8.8165
            430        7.64  8.16984
            CEC source: Calculated
            PH source: Estimated based on local knowledge
          Nutrient
          Solute NO3: Thickness=[150, 130, 400, 360, 130, 400, 430]; InitialValues=[0, 0, 0, 0, 0, 0, 0]; InitialValuesUnits=ppm; WaterTableConcentration=0; D0=0; Exco=[1, 1, 1, 1, 1, 1]; FIP=[1, 1, 1, 1, 1, 1]; DepthConstant=0; MaxDepthSoluteAccessible=0; RunoffEffectivenessAtMovingSolute=0; MaxEffectiveRunoff=0
          Solute NH4: same as Wisconsin Simulations.WI 2023.WI NT 2023.Plano SoilDB.NO3
          Solute Urea: Thickness=[150, 130, 400, 360, 130, 400, 430]; InitialValues=[0, 0, 0, 0, 0, 0, 0]; InitialValuesUnits=kg/ha; WaterTableConcentration=0; D0=0; Exco=[1, 1, 1, 1, 1, 1]; FIP=[1, 1, 1, 1, 1, 1]; DepthConstant=0; MaxDepthSoluteAccessible=0; RunoffEffectivenessAtMovingSolute=0; MaxEffectiveRunoff=0
          Water: Thickness=[150, 130, 400, 360, 130, 400, 430]; InitialValues=[0.353, 0.353, 0.35, 0.35, 0.267, 0.213, 0.213]; FilledFromTop=true
          SoilTemperature Temperature
      Zone WI Till 2023: Area=1; Slope=2; AspectAngle=0; Altitude=50
        SurfaceOrganicMatter: InitialResidueName=Wheat; InitialResidueType=wheat; InitialResidueMass=0; InitialStandingFraction=1; InitialCPR=0; InitialCNR=30
        Fertiliser
        Report: EventNames=[Clock].EndOfDay
          VariableNames:
            [Clock].Today
            //===== Daily Values
            [Soybean].Grain.Wt*10 as soy_kg_ha
            sum([Soil].Water.MM - [Soil].Physical.DULmm) as SoilWaterDeficit
            [Soil].Water.Volumetric
        MicroClimate: a_interception=0; b_interception=1; c_interception=0; d_interception=0; SoilHeatFluxFraction=0.4; MinimumHeightDiffForNewLayer=0; NightInterceptionFraction=0.5; ReferenceHeight=2
        Plant Wheat: same as New York Simulations.NY 2014.NY Till 2014.Wheat
        Plant Soybean: same as New York Simulations.NY 2015.NY NT 2015.Soybean
        Operations
          2022-06-01  [SurfaceOrganicMatter].Incorporate(fraction: 1, depth: 150)
          2022-09-18  [Fertiliser].Apply(amount: 122, type: UreaN)
          2023-06-07  [Soybean].Sow(cultivar: Generic_MG1, population: 31.8, depth: 50, rowSpacing: 760)
          2023-11-07  [Soybean].Harvest
          2023-11-08  [Soybean].EndCrop
        Soil Plano SL WSS (disabled): same as Wisconsin Simulations.WI 2023.WI NT 2023.Plano SL WSS
        Soil Plano Lab Data (disabled): same as Wisconsin Simulations.WI 2023.WI NT 2023.Plano Lab Data
        Soil Plano SoilDB: same as Wisconsin Simulations.WI 2023.WI NT 2023.Plano SoilDB
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