Simulations: Version=197
  DataStore
  Folder Soybean Yield Gap Simulations
    Folder Wisconsin Simulations
      Simulation WI 2015
        Weather: FileName=/Users/stw52/Downloads/aars_iem.met
        Clock: Start=2014-01-01; End=2015-11-19
        Summary
        SoilArbitrator
        Folder NT PD
          Zone WI NT 2015 Med PD: Area=1; Slope=2; AspectAngle=0; Altitude=50
            SurfaceOrganicMatter: InitialResidueName=Wheat; InitialResidueType=wheat; InitialResidueMass=0; InitialStandingFraction=1; InitialCPR=0; InitialCNR=30
            Fertiliser
            Report: EventNames=[Clock].EndOfDay
              VariableNames:
                [Clock].Today
                //===== Daily Values
                [Wheat].AboveGround.Wt*10 as rye_bm_kg_ha
                [Soybean].Grain.Wt*10 as soy_kg_ha
                sum([Soil].Water.MM - [Soil].Physical.DULmm) as SoilWaterDeficit
                [Soil].Water.Potential
                (sum([Soil].SoilWater.ESW)/(sum([Soil].Physical.DULmm-[Soil].Physical.LL15mm) as frac_water
                [Soybean].IsEmerged as emg_tf
            MicroClimate: a_interception=0; b_interception=1; c_interception=0; d_interception=0; SoilHeatFluxFraction=0.4; MinimumHeightDiffForNewLayer=0; NightInterceptionFraction=0.5; ReferenceHeight=2
            Plant Wheat
              Cultivar CerealRye
                Command:
                  [Phenology].Phyllochron.BasePhyllochron.FixedValue = 90
                  [Leaf].CohortParameters.MaxArea.AreaLargestLeaves.FixedValue = 4000
                  [Phenology].CAMP.FLNparams.MinLN = 7
                  [Phenology].CAMP.FLNparams.PpLN = 2
                  [Phenology].CAMP.FLNparams.VrnLN = 5
                  [Phenology].CAMP.FLNparams.VxPLN = 2
                  [Phenology].HeadEmergenceLongDayBase.FixedValue = 110
                  [Phenology].HeadEmergencePpSensitivity.FixedValue = 0
                  [Phenology].CAMP.EnvData.VrnTreatTemp = 6.6
                  [Phenology].CAMP.EnvData.VrnTreatDuration = 60
                  [Leaf].Photosynthesis.RUE.FixedValue = 1.2
                  [Phenology].Vernalising.Target = 26
            Plant Soybean
              Cultivar Musgrave 1
                Command:
                  [Phenology].Vegetative.Target.FixedValue = 340
                  [Phenology].EarlyFlowering.Target.FixedValue = 120
                  [Phenology].EarlyGrainFilling.Target.FractionofGrainfilling.FixedValue = 0.3
                  [Phenology].LateGrainFilling.Target.EntireGrainfillPeriod.FixedValue = 632
                  [Phenology].VegetativePhotoperiodModifier.XYPairs.X = 13.84, 18.77
                  [Phenology].ReproductivePhotoperiodModifier.XYPairs.X = 13.84, 18.77
              Cultivar V1718
                Command:
                  [Phenology].Vegetative.Target.FixedValue = 285.36
                  [Phenology].EarlyFlowering.Target.FixedValue = 100.7
                  [Phenology].EarlyGrainFilling.Target.FractionofGrainfilling.FixedValue = 0.411
                  [Phenology].LateGrainFilling.Target.EntireGrainfillPeriod.FixedValue = 530.4
                  [Phenology].VegetativePhotoperiodModifier.XYPairs.X = 13.84, 18.77
                  [Phenology].ReproductivePhotoperiodModifier.XYPairs.X = 13.84, 18.77
            Operations
              2014-08-01  [Soil].NO3.Reset()
              2014-09-09  [SurfaceOrganicMatter].Add(mass: 4500, N: 218, P: 0, type: manure, name: dairy)
              2014-09-10  [SurfaceOrganicMatter].Incorporate(fraction: 1, depth: 150)
              2014-09-18  [Wheat].Sow(cultivar: CerealRye, population: 547, depth: 25, rowSpacing: 190)
              2015-06-03  [Wheat].EndCrop()
              2015-06-03  [Soybean].Sow(cultivar: V1718, population: 40, depth: 50, rowSpacing: 760)
              2015-10-16  [Soybean].Harvest()
            Soil Plano APSIMX R (disabled): SoilType=Plano:423332; State=WI; Country=USA; ApsoilNumber=0; Latitude=43.30458; Longitude=-89.33146
              DataSource=SSURGO (https://sdmdataaccess.nrcs.usda.gov/) through R package soilDB, R package apsimx function ssurgo2sp. Timestamp 2025-10-21 09:50:39.70961
              Comments=cokey = 27524243 - acres percent = 90 - component percent = 90 - taxonomic classification name = Fine-silty, mixed, superactive, mesic Typic Argiudolls - drainage class = Well drained - elevation = 260 - slope = 1 - geomdesc = Rise
              Physical
                Thickness  ParticleSizeSand  ParticleSizeSilt  ParticleSizeClay  Rocks  BD       AirDry      LL15        DUL       SAT       KS
                200        9.5               68                22.5              0      1.20573  0.0777506   0.15550129  0.362292  0.545007  792.288
                200        9.5               68                22.5              0      1.20573  0.0777506   0.15550129  0.362292  0.545007  792.288
                200        9.5               68                22.5              0      1.20573  0.0777506   0.15550129  0.362292  0.545007  792.288
                200        7                 63                30                0      1.42806  0.18328252  0.18328252  0.363425  0.46111   792.288
                200        7                 63                30                0      1.42806  0.18328252  0.18328252  0.363425  0.46111   792.288
                200        43                34                23                0      1.58139  0.140404    0.140404    0.26419   0.40325   2012.256
                200        43                34                23                0      1.58139  0.140404    0.140404    0.26419   0.40325   2012.256
                200        43                34                23                0      1.58139  0.140404    0.140404    0.26419   0.40325   2012.256
                200        63                25                12                0      1.61772  0.0727485   0.0727485   0.163033  0.38954   2012.256
                200        63                25                12                0      1.61772  0.0727485   0.0727485   0.163033  0.38954   2012.256
                Rocks source: Calculated (layer 1, 2, 3, 4, 5, 6)
                SoilCrop maizeSoil
                  LL=[0.15550129, 0.15550129, 0.15550129, 0.18328252, 0.18328252, 0.140404, 0.140404, 0.140404, 0.0727485, 0.0727485]
                  KL=[0.06, 0.0491238, 0.0402192, 0.0329287, 0.0269597, 0.0220728, 0.0180717, 0.0147958, 0.0121138, 0.00991793]
                  XF=[1, 1, 1, 1, 1, 1, 1, 1, 1, 1]
                  KL, XF source: Calculated (layer 7, 8, 9, 10)
                SoilCrop soybeanSoil
                  LL=[0.15550129, 0.15550129, 0.15550129, 0.18328252, 0.18328252, 0.140404, 0.140404, 0.140404, 0.0727485, 0.0727485]
                  KL=[0.06, 0.0491238, 0.0402192, 0.0329287, 0.0269597, 0.0220728, 0.0180717, 0.0147958, 0.0121138, 0.00991793]
                  XF=[1, 1, 1, 1, 1, 1, 1, 1, 1, 1]
                  KL source: Calculated (layer 8, 9, 10)
                  XF source: Calculated (layer 7, 8, 9, 10)
                SoilCrop wheatSoil
                  LL=[0.15550129, 0.15550129, 0.15550129, 0.18328252, 0.18328252, 0.140404, 0.140404, 0.140404, 0.0727485, 0.0727485]
                  KL=[0.06, 0.0491238, 0.0402192, 0.0329287, 0.0269597, 0.0220728, 0.0180717, 0.0147958, 0.0121138, 0.00991793]
                  XF=[1, 1, 1, 1, 1, 1, 1, 1, 1, 1]
                  KL source: Calculated (layer 1, 8, 9, 10)
                  XF source: Calculated
              WaterBalance SoilWater: SummerDate=1-jun; SummerU=7; SummerCona=3; WinterDate=1-nov; WinterU=7.275; WinterCona=3.575; DiffusConst=84; DiffusSlope=35.4; Salb=0.17; CN2Bare=73; CNRed=20; CNCov=0.8; PSIDul=-100; Thickness=[200, 200, 200, 200, 200, 200, 200, 200, 200, 200]
                SWCON=[0.45, 0.45, 0.45, 0.45, 0.45, 0.45, 0.45, 0.45, 0.45, 0.45]
              Organic: FOMCNRatio=40; CarbonUnits=Total
                Thickness  Carbon    SoilCNRatio  FBiom       FInert    FOM
                200        2.32558   12           0.04        0.8       150
                200        2.32558   12           0.0327492   0.80804   122.81
                200        2.32558   12           0.0268128   0.816161  100.548
                200        0.348837  12           0.0219525   0.824364  82.3217
                200        0.348837  12           0.0179732   0.832649  67.3993
                200        0.145349  12           0.0147152   0.841017  55.1819
                200        0.145349  12           0.0120478   0.849469  45.1791
                200        0.145349  12           0.00986388  0.858007  36.9895
                200        0.145349  12           0.00807586  0.86663   30.2845
                200        0.145349  12           0.00661196  0.875339  24.7948
              Chemical: PHUnits=Water
                Thickness  PH   CEC
                200        6.5  9.502
                200        6.5  9.748
                200        6.5  9.825
                200        6.5  9.281
                200        6.5  9.032
                200        6.5  8.816
                200        6.5  8.17
                200        6.5  8.17
                200        6.5  8.17
                200        6.5  8.18
                CEC source: Calculated (layer 1, 2, 3, 4, 5, 6, 7)
              Nutrient
              Solute NO3: Thickness=[200, 200, 200, 200, 200, 200, 200, 200, 200, 200]; InitialValues=[19, 16.2, 13, 10.4, 8.4, 6.7, 5.4, 4.3, 3.5, 2.8]; InitialValuesUnits=ppm; WaterTableConcentration=0; D0=0; Exco=[1, 1, 1, 1, 1, 1]; FIP=[1, 1, 1, 1, 1, 1]; DepthConstant=0; MaxDepthSoluteAccessible=0; RunoffEffectivenessAtMovingSolute=0; MaxEffectiveRunoff=0
              Solute NH4: Thickness=[200, 200, 200, 200, 200, 200, 200, 200, 200, 200]; InitialValuesUnits=ppm; WaterTableConcentration=0; D0=0; Exco=[1, 1, 1, 1, 1, 1]; FIP=[1, 1, 1, 1, 1, 1]; DepthConstant=0; MaxDepthSoluteAccessible=0; RunoffEffectivenessAtMovingSolute=0; MaxEffectiveRunoff=0
                InitialValues=[0.05, 0.0495025, 0.0490099, 0.0485223, 0.0480395, 0.0475615, 0.0470882, 0.0466197, 0.0461558, 0.0456966]
              Solute Urea: Thickness=[200, 200, 200, 200, 200, 200, 200, 200, 200, 200]; InitialValuesUnits=kg/ha; WaterTableConcentration=0; D0=0; Exco=[1, 1, 1, 1, 1, 1]; FIP=[1, 1, 1, 1, 1, 1]; DepthConstant=0; MaxDepthSoluteAccessible=0; RunoffEffectivenessAtMovingSolute=0; MaxEffectiveRunoff=0
                InitialValues=[0.05, 0.05, 0.049, 0.049, 0.048, 0.048, 0.047, 0.047, 0.046, 0.046]
              Water: Thickness=[200, 200, 200, 200, 200, 200, 200, 200, 200, 200]; FilledFromTop=true
                InitialValues=[0.362, 0.362, 0.362, 0.363, 0.363, 0.264, 0.264, 0.264, 0.163, 0.163]
              SoilTemperature Temperature
            Soil Plano Lab Data Med: SoilType=0; Region=Pierce; State=Wisconsin; Country=US; ApsoilNumber=221; Latitude=44.64; Longitude=-92.453; YearOfSampling=2015; Comments=0
              DataSource:
                Original data by http://websoilsurvey.sc.egov.usda.gov/App/HomePage.htm
                Profile developed by Integrated Cropping Systems Lab, Department of Agronomy, ISU
              Physical
                Thickness  ParticleSizeSand  ParticleSizeSilt  ParticleSizeClay  Rocks  BD    AirDry  LL15   DUL    SAT    KS
                150        3.9               71.7              24.4              0      1.34  0.058   0.115  0.327  0.435  171
                50         3.9               71.7              24.4              0      1.34  0.058   0.115  0.327  0.435  171
                180        3.4               73.6              23                0      1.42  0.07    0.14   0.354  0.44   126
                130        3.8               77                19.2              0      1.42  0.057   0.114  0.319  0.428  97.2
                150        3.6               70.6              25.8              0      1.42  0.074   0.148  0.344  0.413  124
                280        3.2               65.9              30.9              0      1.42  0.174   0.174  0.362  0.418  68.4
                180        3.5               68.4              28.1              0      1.45  0.2     0.2    0.391  0.452  197
                380        12.6              64.6              22.8              0      1.6   0.148   0.148  0.306  0.38   67.1
                130        50.4              35.1              14.5              0      1.5   0.113   0.113  0.236  0.354  83.5
                150        62.4              24.6              13                0      1.5   0.098   0.098  0.218  0.372  284
                120        72.4              20.7              6.9               0      1.5   0.074   0.074  0.168  0.371  685
                310        72.9              22.2              4.9               0      1.5   0.065   0.065  0.154  0.387  616
                300        72.4              23.1              4.5               0      1.5   0.072   0.072  0.162  0.364  578
                Rocks source: Calculated (layer 1, 2, 3, 4, 5, 6)
                SoilCrop maizeSoil
                  LL=[0.115, 0.115, 0.14, 0.114, 0.148, 0.174, 0.2, 0.148, 0.113, 0.098, 0.074, 0.065, 0.072]
                  KL=[0.06, 0.049, 0.04, 0.033, 0.027, 0.022, 0.018, 0.015, 0.012, 0.01, 0.008, 0.006, 0.004]
                  XF=[1, 1, 1, 1, 1, 1, 1, 1, 1, 1, 1, 1, 1]
                  XF source: Calculated (layer 7, 8, 9, 10, 11, 12)
                SoilCrop soybeanSoil: same as Soybean Yield Gap Simulations.Wisconsin Simulations.WI 2015.NT PD.WI NT 2015 Med PD.Plano Lab Data Med.Physical.maizeSoil
                SoilCrop wheatSoil
                  LL=[0.115, 0.115, 0.14, 0.114, 0.148, 0.174, 0.2, 0.148, 0.113, 0.098, 0.074, 0.065, 0.072]
                  KL=[0.06, 0.049, 0.04, 0.033, 0.027, 0.022, 0.018, 0.015, 0.012, 0.01, 0.008, 0.006, 0.004]
                  XF=[1, 1, 1, 1, 1, 1, 1, 1, 1, 1, 1, 1, 1]
                  XF source: Calculated (layer 1, 2, 3, 4, 5, 6, 7, 8, 9, 10, 11, 12)
              WaterBalance SoilWater: SummerDate=1-jun; SummerU=7; SummerCona=3; WinterDate=1-nov; WinterU=7.275; WinterCona=3.575; DiffusConst=84; DiffusSlope=35.4; Salb=0.17; CN2Bare=73; CNRed=20; CNCov=0.8; PSIDul=-100
                Thickness=[150, 50, 180, 130, 150, 280, 180, 380, 130, 150, 120, 310, 300]
                SWCON=[0.45, 0.45, 0.45, 0.45, 0.45, 0.45, 0.45, 0.45, 0.45, 0.45, 0.45, 0.45, 0.45]
              Organic: FOMCNRatio=40; CarbonUnits=Total
                Thickness  Carbon  SoilCNRatio  FBiom  FInert  FOM
                150        2.5     12           0.04   0.8     150
                50         2.5     12           0.032  0.81    122
                180        2.32    12           0.027  0.82    100.5
                130        0.36    12           0.022  0.82    82
                150        0.26    12           0.018  0.83    67.4
                280        0.26    12           0.015  0.84    55.2
                180        0.26    12           0.012  0.85    45.2
                380        0.26    12           0.009  0.86    37
                130        0.18    12           0.08   0.87    30
                150        0.18    12           0.08   0.87    25
                120        0.18    12           0.08   0.87    20
                310        0.18    12           0.08   0.87    15
                300        0.18    12           0.08   0.87    10
              Chemical: PHUnits=Water
                Thickness  PH   CEC
                150        6.6  9.502
                50         6.5  9.748
                180        6    9.825
                130        6    9.281
                150        6    9.032
                280        6    8.816
                180        7.6  8.17
                380        7.6  8.17
                130        7.6  8.17
                150        7.6  8.18
                120        7.6  8.17
                310        7.6  8.17
                300        7.6  8.17
                CEC source: Calculated (layer 1, 2, 3, 4, 5, 6, 7)
              Nutrient
              Solute NO3: InitialValues=[18, 15, 12, 9, 7, 6, 5, 4, 3.5, 3, 2.8, 2.5, 2.2]; InitialValuesUnits=ppm; WaterTableConcentration=0; D0=0; Exco=[1, 1, 1, 1, 1, 1]; FIP=[1, 1, 1, 1, 1, 1]; DepthConstant=0; MaxDepthSoluteAccessible=0; RunoffEffectivenessAtMovingSolute=0; MaxEffectiveRunoff=0
                Thickness=[150, 50, 180, 130, 150, 280, 180, 380, 130, 150, 120, 310, 300]
              Solute NH4: InitialValues=[0, 0, 0, 0, 0, 0, 0, 0, 0, 0, 0, 0, 0]; InitialValuesUnits=ppm; WaterTableConcentration=0; D0=0; Exco=[1, 1, 1, 1, 1, 1]; FIP=[1, 1, 1, 1, 1, 1]; DepthConstant=0; MaxDepthSoluteAccessible=0; RunoffEffectivenessAtMovingSolute=0; MaxEffectiveRunoff=0
                Thickness=[150, 50, 180, 130, 150, 280, 180, 380, 130, 150, 120, 310, 300]
              Solute Urea: InitialValues=[0, 0, 0, 0, 0, 0, 0, 0, 0, 0, 0, 0, 0]; InitialValuesUnits=kg/ha; WaterTableConcentration=0; D0=0; Exco=[1, 1, 1, 1, 1, 1]; FIP=[1, 1, 1, 1, 1, 1]; DepthConstant=0; MaxDepthSoluteAccessible=0; RunoffEffectivenessAtMovingSolute=0; MaxEffectiveRunoff=0
                Thickness=[150, 50, 180, 130, 150, 280, 180, 380, 130, 150, 120, 310, 300]
              Water: FilledFromTop=true
                Thickness=[150, 50, 180, 130, 150, 280, 180, 380, 130, 150, 120, 310, 300]
                InitialValues=[0.327, 0.327, 0.354, 0.319, 0.344, 0.362, 0.391, 0.306, 0.236, 0.218, 0.168, 0.154, 0.162]
              SoilTemperature Temperature
        Folder Till PD
          Zone WI Till 2015 Med PD: Area=1; Slope=2; AspectAngle=0; Altitude=50
            SurfaceOrganicMatter: InitialResidueName=Wheat; InitialResidueType=wheat; InitialResidueMass=0; InitialStandingFraction=1; InitialCPR=0; InitialCNR=30
            Fertiliser
            Report: EventNames=[Clock].EndOfDay
              VariableNames:
                [Clock].Today
                //===== Daily Values
                [Soybean].Grain.Wt*10 as soy_kg_ha
                sum([Soil].Water.MM - [Soil].Physical.DULmm) as SoilWaterDeficit
                [Soil].Water.Volumetric
                [Soil].Water.Potential
                (sum([Soil].SoilWater.ESW)/(sum([Soil].Physical.DULmm-[Soil].Physical.LL15mm) as frac_water
                [Soybean].IsEmerged as emg_tf
            MicroClimate: a_interception=0; b_interception=1; c_interception=0; d_interception=0; SoilHeatFluxFraction=0.4; MinimumHeightDiffForNewLayer=0; NightInterceptionFraction=0.5; ReferenceHeight=2
            Plant Wheat: same as Soybean Yield Gap Simulations.Wisconsin Simulations.WI 2015.NT PD.WI NT 2015 Med PD.Wheat
            Plant Soybean: same as Soybean Yield Gap Simulations.Wisconsin Simulations.WI 2015.NT PD.WI NT 2015 Med PD.Soybean
            Operations
              2014-08-01  [Soil].NO3.Reset()
              2015-06-01  [SurfaceOrganicMatter].Incorporate(fraction: 1, depth: 150)
              2015-06-03  [Soybean].Sow(cultivar: V1718, population: 41.3, depth: 50, rowSpacing: 760)
              2015-10-16  [Soybean].Harvest()
            Soil Plano APSIMX R (disabled): same as Soybean Yield Gap Simulations.Wisconsin Simulations.WI 2015.NT PD.WI NT 2015 Med PD.Plano APSIMX R
            Soil Plano Lab Data Med: same as Soybean Yield Gap Simulations.Wisconsin Simulations.WI 2015.NT PD.WI NT 2015 Med PD.Plano Lab Data Med
        Folder NT TPD
          Zone WI NT 2015 Med TPD: Area=1; Slope=2; AspectAngle=0; Altitude=50
            SurfaceOrganicMatter: InitialResidueName=Wheat; InitialResidueType=wheat; InitialResidueMass=0; InitialStandingFraction=1; InitialCPR=0; InitialCNR=30
            Fertiliser
            Report: same as Soybean Yield Gap Simulations.Wisconsin Simulations.WI 2015.NT PD.WI NT 2015 Med PD.Report
            MicroClimate: a_interception=0; b_interception=1; c_interception=0; d_interception=0; SoilHeatFluxFraction=0.4; MinimumHeightDiffForNewLayer=0; NightInterceptionFraction=0.5; ReferenceHeight=2
            Plant Wheat: same as Soybean Yield Gap Simulations.Wisconsin Simulations.WI 2015.NT PD.WI NT 2015 Med PD.Wheat
            Plant Soybean: same as Soybean Yield Gap Simulations.Wisconsin Simulations.WI 2015.NT PD.WI NT 2015 Med PD.Soybean
            Operations
              2014-08-01  [Soil].NO3.Reset()
              2014-09-09  [SurfaceOrganicMatter].Add(mass: 4500, N: 218, P: 0, type: manure, name: dairy)
              2014-09-10  [SurfaceOrganicMatter].Incorporate(fraction: 1, depth: 150)
              2014-09-18  [Wheat].Sow(cultivar: CerealRye, population: 547, depth: 25, rowSpacing: 190)
              2015-06-03  [Wheat].EndCrop()
              2015-06-03  [Soybean].Sow(cultivar: V1718, population: 41.3, depth: 50, rowSpacing: 760)
              2015-10-16  [Soybean].Harvest()
            Soil Plano APSIMX R (disabled): same as Soybean Yield Gap Simulations.Wisconsin Simulations.WI 2015.NT PD.WI NT 2015 Med PD.Plano APSIMX R
            Soil Plano Lab Data Med: same as Soybean Yield Gap Simulations.Wisconsin Simulations.WI 2015.NT PD.WI NT 2015 Med PD.Plano Lab Data Med
      Simulation WI 2017
        Weather: FileName=/Users/stw52/Downloads/aars_iem.met
        Clock: Start=2016-01-01; End=2017-11-19
        Summary
        SoilArbitrator
        Folder NT PD
          Zone WI NT 2017 Med PD: Area=1; Slope=2; AspectAngle=0; Altitude=50
            SurfaceOrganicMatter: InitialResidueName=Wheat; InitialResidueType=wheat; InitialResidueMass=0; InitialStandingFraction=1; InitialCPR=0; InitialCNR=30
            Fertiliser
            Report: EventNames=[Clock].EndOfDay
              VariableNames:
                [Clock].Today
                //===== Daily Values
                [Wheat].AboveGround.Wt*10 as rye_bm_kg_ha
                [Soybean].Grain.Wt*10 as soy_kg_ha
                sum([Soil].Water.MM - [Soil].Physical.DULmm) as SoilWaterDeficit
                (sum([Soil].SoilWater.ESW)/(sum([Soil].Physical.DULmm-[Soil].Physical.LL15mm) as frac_water
            MicroClimate: a_interception=0; b_interception=1; c_interception=0; d_interception=0; SoilHeatFluxFraction=0.4; MinimumHeightDiffForNewLayer=0; NightInterceptionFraction=0.5; ReferenceHeight=2
            Plant Wheat: same as Soybean Yield Gap Simulations.Wisconsin Simulations.WI 2015.NT PD.WI NT 2015 Med PD.Wheat
            Plant Soybean
              Cultivar Musgrave 1: same as Soybean Yield Gap Simulations.Wisconsin Simulations.WI 2015.NT PD.WI NT 2015 Med PD.Soybean.Musgrave 1
              Cultivar V1718
                Command:
                  [Phenology].Vegetative.Target.FixedValue = 284.6
                  [Phenology].EarlyFlowering.Target.FixedValue = 100.5
                  [Phenology].EarlyGrainFilling.Target.FractionofGrainfilling.FixedValue = 0.411
                  [Phenology].LateGrainFilling.Target.EntireGrainfillPeriod.FixedValue = 529.1
                  [Phenology].VegetativePhotoperiodModifier.XYPairs.X = 13.84, 18.77
                  [Phenology].ReproductivePhotoperiodModifier.XYPairs.X = 13.84, 18.77
            Operations
              2016-09-09  [SurfaceOrganicMatter].Add(mass: 4500, N: 218, P: 0, type: manure, name: dairy)
              2016-09-10  [SurfaceOrganicMatter].Incorporate(fraction: 1, depth: 150)
              2016-09-19  [Wheat].Sow(cultivar: CerealRye, population: 547, depth: 25, rowSpacing: 190)
              2017-06-01  [Wheat].EndCrop()
              2017-06-01  [Soybean].Sow(cultivar: V1718, population: 23.18, depth: 25.4, rowSpacing: 760)
              2017-10-19  [Soybean].Harvest()
            Soil Plano APSIMX R (disabled): same as Soybean Yield Gap Simulations.Wisconsin Simulations.WI 2015.NT PD.WI NT 2015 Med PD.Plano APSIMX R
            Soil Plano Lab Data Med: same as Soybean Yield Gap Simulations.Wisconsin Simulations.WI 2015.NT PD.WI NT 2015 Med PD.Plano Lab Data Med
        Folder Till PD
          Zone WI Till 2017 Med PD: Area=1; Slope=2; AspectAngle=0; Altitude=50
            SurfaceOrganicMatter: InitialResidueName=Wheat; InitialResidueType=wheat; InitialResidueMass=0; InitialStandingFraction=1; InitialCPR=0; InitialCNR=30
            Fertiliser
            Report: EventNames=[Clock].EndOfDay
              VariableNames:
                [Clock].Today
                //===== Daily Values
                [Soybean].Grain.Wt*10 as soy_kg_ha
                sum([Soil].Water.MM - [Soil].Physical.DULmm) as SoilWaterDeficit
                [Soil].Water.Volumetric
                (sum([Soil].SoilWater.ESW)/(sum([Soil].Physical.DULmm-[Soil].Physical.LL15mm) as frac_water
            MicroClimate: a_interception=0; b_interception=1; c_interception=0; d_interception=0; SoilHeatFluxFraction=0.4; MinimumHeightDiffForNewLayer=0; NightInterceptionFraction=0.5; ReferenceHeight=2
            Plant Wheat: same as Soybean Yield Gap Simulations.Wisconsin Simulations.WI 2015.NT PD.WI NT 2015 Med PD.Wheat
            Plant Soybean: same as Soybean Yield Gap Simulations.Wisconsin Simulations.WI 2017.NT PD.WI NT 2017 Med PD.Soybean
            Operations
              2016-09-09  [SurfaceOrganicMatter].Add(mass: 4500, N: 218, P: 0, type: manure, name: dairy)
              2016-09-10  [SurfaceOrganicMatter].Incorporate(fraction: 1, depth: 150)
              2017-05-20  [SurfaceOrganicMatter].Incorporate(fraction: 1, depth: 150)
              2017-06-01  [Soybean].Sow(cultivar: V1718, population: 36.6, depth: 25.4, rowSpacing: 760)
              2017-10-19  [Soybean].Harvest()
            Soil Plano APSIMX R (disabled): same as Soybean Yield Gap Simulations.Wisconsin Simulations.WI 2015.NT PD.WI NT 2015 Med PD.Plano APSIMX R
            Soil Plano Lab Data Med: same as Soybean Yield Gap Simulations.Wisconsin Simulations.WI 2015.NT PD.WI NT 2015 Med PD.Plano Lab Data Med
        Folder NT TPD
          Zone WI NT 2017 Med TPD: Area=1; Slope=2; AspectAngle=0; Altitude=50
            SurfaceOrganicMatter: InitialResidueName=Wheat; InitialResidueType=wheat; InitialResidueMass=0; InitialStandingFraction=1; InitialCPR=0; InitialCNR=30
            Fertiliser
            Report: same as Soybean Yield Gap Simulations.Wisconsin Simulations.WI 2017.NT PD.WI NT 2017 Med PD.Report
            MicroClimate: a_interception=0; b_interception=1; c_interception=0; d_interception=0; SoilHeatFluxFraction=0.4; MinimumHeightDiffForNewLayer=0; NightInterceptionFraction=0.5; ReferenceHeight=2
            Plant Wheat: same as Soybean Yield Gap Simulations.Wisconsin Simulations.WI 2015.NT PD.WI NT 2015 Med PD.Wheat
            Plant Soybean: same as Soybean Yield Gap Simulations.Wisconsin Simulations.WI 2017.NT PD.WI NT 2017 Med PD.Soybean
            Operations
              2016-09-09  [SurfaceOrganicMatter].Add(mass: 4500, N: 218, P: 0, type: manure, name: dairy)
              2016-09-10  [SurfaceOrganicMatter].Incorporate(fraction: 1, depth: 150)
              2016-09-19  [Wheat].Sow(cultivar: CerealRye, population: 547, depth: 25, rowSpacing: 190)
              2017-06-01  [Wheat].EndCrop()
              2017-06-01  [Soybean].Sow(cultivar: V1718, population: 36.6, depth: 25.4, rowSpacing: 760)
              2017-10-19  [Soybean].Harvest()
            Soil Plano APSIMX R (disabled): same as Soybean Yield Gap Simulations.Wisconsin Simulations.WI 2015.NT PD.WI NT 2015 Med PD.Plano APSIMX R
            Soil Plano Lab Data Med: same as Soybean Yield Gap Simulations.Wisconsin Simulations.WI 2015.NT PD.WI NT 2015 Med PD.Plano Lab Data Med
      Simulation WI 2018
        Weather: FileName=/Users/stw52/Downloads/aars_iem.met
        Clock: Start=2017-01-01; End=2018-11-19
        Summary
        SoilArbitrator
        Folder NT PD
          Zone WI NT 2018 Med PD: Area=1; Slope=2; AspectAngle=0; Altitude=50
            SurfaceOrganicMatter: InitialResidueName=Alfalfa; InitialResidueType=lucerne; InitialResidueMass=0; InitialStandingFraction=0.5; InitialCPR=0; InitialCNR=20
            Fertiliser
            Report: same as Soybean Yield Gap Simulations.Wisconsin Simulations.WI 2017.NT PD.WI NT 2017 Med PD.Report
            MicroClimate: a_interception=0; b_interception=1; c_interception=0; d_interception=0; SoilHeatFluxFraction=0.4; MinimumHeightDiffForNewLayer=0; NightInterceptionFraction=0.5; ReferenceHeight=2
            Plant Wheat: same as Soybean Yield Gap Simulations.Wisconsin Simulations.WI 2015.NT PD.WI NT 2015 Med PD.Wheat
            Plant Soybean: same as Soybean Yield Gap Simulations.Wisconsin Simulations.WI 2017.NT PD.WI NT 2017 Med PD.Soybean
            Operations
              2017-08-01  [Soil].NO3.Reset()
              2017-09-24  [SurfaceOrganicMatter].Incorporate(fraction: 1, depth: 150)
              2017-10-02  [Wheat].Sow(cultivar: CerealRye, population: 747, depth: 25, rowSpacing: 190)
              2018-06-05  [Wheat].EndCrop()
              2018-06-06  [Soybean].Sow(cultivar: V1718, population: 36.9, depth: 50, rowSpacing: 760)
              2018-10-25  [Soybean].Harvest
              2018-11-20  [Soybean].EndCrop
            Soil Plano APSIMX R (disabled): same as Soybean Yield Gap Simulations.Wisconsin Simulations.WI 2015.NT PD.WI NT 2015 Med PD.Plano APSIMX R
            Soil Plano Lab Data Med: same as Soybean Yield Gap Simulations.Wisconsin Simulations.WI 2015.NT PD.WI NT 2015 Med PD.Plano Lab Data Med
        Folder Till PD
          Zone WI Till 2018 Med PD: Area=1; Slope=2; AspectAngle=0; Altitude=50
            SurfaceOrganicMatter: InitialResidueName=Wheat; InitialResidueType=wheat; InitialResidueMass=0; InitialStandingFraction=1; InitialCPR=0; InitialCNR=30
            Fertiliser
            Report: same as Soybean Yield Gap Simulations.Wisconsin Simulations.WI 2017.Till PD.WI Till 2017 Med PD.Report
            MicroClimate: a_interception=0; b_interception=1; c_interception=0; d_interception=0; SoilHeatFluxFraction=0.4; MinimumHeightDiffForNewLayer=0; NightInterceptionFraction=0.5; ReferenceHeight=2
            Plant Wheat: same as Soybean Yield Gap Simulations.Wisconsin Simulations.WI 2015.NT PD.WI NT 2015 Med PD.Wheat
            Plant Soybean: same as Soybean Yield Gap Simulations.Wisconsin Simulations.WI 2017.NT PD.WI NT 2017 Med PD.Soybean
            Operations
              2017-08-01  [Soil].NO3.Reset()
              2018-06-01  [SurfaceOrganicMatter].Incorporate(fraction: 1, depth: 150)
              2018-06-06  [Soybean].Sow(cultivar: V1718, population: 45.4, depth: 50, rowSpacing: 760)
              2018-10-25  [Soybean].Harvest
              2018-10-26  [Soybean].EndCrop
            Soil Plano APSIMX R (disabled): same as Soybean Yield Gap Simulations.Wisconsin Simulations.WI 2015.NT PD.WI NT 2015 Med PD.Plano APSIMX R
            Soil Plano Lab Data Med: same as Soybean Yield Gap Simulations.Wisconsin Simulations.WI 2015.NT PD.WI NT 2015 Med PD.Plano Lab Data Med
        Folder NT TPD
          Zone WI NT 2018 Med TPD: Area=1; Slope=2; AspectAngle=0; Altitude=50
            SurfaceOrganicMatter: InitialResidueName=Wheat; InitialResidueType=wheat; InitialResidueMass=0; InitialStandingFraction=1; InitialCPR=0; InitialCNR=30
            Fertiliser
            Report: same as Soybean Yield Gap Simulations.Wisconsin Simulations.WI 2017.NT PD.WI NT 2017 Med PD.Report
            MicroClimate: a_interception=0; b_interception=1; c_interception=0; d_interception=0; SoilHeatFluxFraction=0.4; MinimumHeightDiffForNewLayer=0; NightInterceptionFraction=0.5; ReferenceHeight=2
            Plant Wheat: same as Soybean Yield Gap Simulations.Wisconsin Simulations.WI 2015.NT PD.WI NT 2015 Med PD.Wheat
            Plant Soybean: same as Soybean Yield Gap Simulations.Wisconsin Simulations.WI 2017.NT PD.WI NT 2017 Med PD.Soybean
            Operations
              2017-08-01  [Soil].NO3.Reset()
              2017-09-24  [SurfaceOrganicMatter].Incorporate(fraction: 1, depth: 150)
              2017-10-02  [Wheat].Sow(cultivar: CerealRye, population: 747, depth: 25, rowSpacing: 190)
              2018-06-05  [Wheat].EndCrop()
              2018-06-06  [Soybean].Sow(cultivar: V1718, population: 45.4, depth: 50, rowSpacing: 760)
              2018-10-25  [Soybean].Harvest
              2018-10-26  [Soybean].EndCrop
            Soil Plano APSIMX R (disabled): same as Soybean Yield Gap Simulations.Wisconsin Simulations.WI 2015.NT PD.WI NT 2015 Med PD.Plano APSIMX R
            Soil Plano Lab Data Med: same as Soybean Yield Gap Simulations.Wisconsin Simulations.WI 2015.NT PD.WI NT 2015 Med PD.Plano Lab Data Med
      Simulation WI 2019
        Weather: FileName=/Users/stw52/Downloads/aars_iem.met
        Clock: Start=2018-01-01; End=2019-11-19
        Summary
        SoilArbitrator
        Folder Till PD
          Zone WI Till 2019 Med PD: Area=1; Slope=2; AspectAngle=0; Altitude=50
            SurfaceOrganicMatter: InitialResidueName=Wheat; InitialResidueType=wheat; InitialResidueMass=0; InitialStandingFraction=1; InitialCPR=0; InitialCNR=30
            Fertiliser
            Report: EventNames=[Clock].EndOfDay
              VariableNames:
                [Clock].Today
                //===== Daily Values
                [Soybean].Grain.Wt*10 as soy_kg_ha
                sum([Soil].Water.MM - [Soil].Physical.DULmm) as SoilWaterDeficit
                [Soil].Water.Volumetric
                (sum([Soil].SoilWater.ESW)/(sum([Soil].Physical.DULmm-[Soil].Physical.LL15mm) as frac_water
                [Soybean].Phenology.Stage as stage_number
            MicroClimate: a_interception=0; b_interception=1; c_interception=0; d_interception=0; SoilHeatFluxFraction=0.4; MinimumHeightDiffForNewLayer=0; NightInterceptionFraction=0.5; ReferenceHeight=2
            Plant Wheat
              Cultivar CerealRye
                Command:
                  [Phenology].Phyllochron.BasePhyllochron.FixedValue = 90
                  [Leaf].CohortParameters.MaxArea.AreaLargestLeaves.FixedValue = 4000
                  [Phenology].CAMP.FLNparams.MinLN = 7
                  [Phenology].CAMP.FLNparams.PpLN = 2
                  [Phenology].CAMP.FLNparams.VrnLN = 5
                  [Phenology].CAMP.FLNparams.VxPLN = 2
                  [Phenology].HeadEmergenceLongDayBase.FixedValue = 110
                  [Phenology].HeadEmergencePpSensitivity.FixedValue = 0
                  [Phenology].CAMP.EnvData.VrnTreatTemp = 4.4
                  [Phenology].CAMP.EnvData.VrnTreatDuration = 60
                  [Leaf].Photosynthesis.RUE.FixedValue = 1.24
                  [Phenology].Vernalising.Target = 26
            Plant Soybean
              Cultivar Musgrave 1
                Command:
                  [Phenology].Vegetative.Target.FixedValue = 390
                  [Phenology].EarlyFlowering.Target.FixedValue = 100
                  [Phenology].EarlyGrainFilling.Target.FractionofGrainfilling.FixedValue = 0.31
                  [Phenology].LateGrainFilling.Target.EntireGrainfillPeriod.FixedValue = 520
                  [Phenology].VegetativePhotoperiodModifier.XYPairs.X = 13.84, 18.77
                  [Phenology].ReproductivePhotoperiodModifier.XYPairs.X = 13.84, 18.77
              Cultivar V1718: same as Soybean Yield Gap Simulations.Wisconsin Simulations.WI 2017.NT PD.WI NT 2017 Med PD.Soybean.V1718
            Operations
              2019-06-01  [SurfaceOrganicMatter].Incorporate(fraction: 1, depth: 150)
              2019-06-05  [Soybean].Sow(cultivar: V1718, population: 39.6, depth: 50, rowSpacing: 760)
              2019-11-24  [Soybean].Harvest
              2019-11-25  [Soybean].EndCrop
            Soil Plano APSIMX R (disabled): same as Soybean Yield Gap Simulations.Wisconsin Simulations.WI 2015.NT PD.WI NT 2015 Med PD.Plano APSIMX R
            Soil Plano Lab Data Med: same as Soybean Yield Gap Simulations.Wisconsin Simulations.WI 2015.NT PD.WI NT 2015 Med PD.Plano Lab Data Med
        Folder NT PD
          Zone WI NT 2019 Med PD: Area=1; Slope=2; AspectAngle=0; Altitude=50
            SurfaceOrganicMatter: InitialResidueName=Wheat; InitialResidueType=wheat; InitialResidueMass=0; InitialStandingFraction=1; InitialCPR=0; InitialCNR=30
            Fertiliser
            Report: EventNames=[Clock].EndOfDay
              VariableNames:
                [Clock].Today
                //===== Daily Values
                [Wheat].AboveGround.Wt*10 as rye_bm_kg_ha
                [Soybean].Grain.Wt*10 as soy_kg_ha
                sum([Soil].Water.MM - [Soil].Physical.DULmm) as SoilWaterDeficit
                (sum([Soil].SoilWater.ESW)/(sum([Soil].Physical.DULmm-[Soil].Physical.LL15mm) as frac_water
                [Soybean].Phenology.Stage as stage_number
            MicroClimate: a_interception=0; b_interception=1; c_interception=0; d_interception=0; SoilHeatFluxFraction=0.4; MinimumHeightDiffForNewLayer=0; NightInterceptionFraction=0.5; ReferenceHeight=2
            Plant Wheat: same as Soybean Yield Gap Simulations.Wisconsin Simulations.WI 2015.NT PD.WI NT 2015 Med PD.Wheat
            Plant Soybean: same as Soybean Yield Gap Simulations.Wisconsin Simulations.WI 2019.Till PD.WI Till 2019 Med PD.Soybean
            Operations
              2018-08-02  [SurfaceOrganicMatter].Add(mass: 4500, N: 218, P: 0, type: manure, name: dairy)
              2018-09-10  [SurfaceOrganicMatter].Incorporate(fraction: 1, depth: 200)
              2018-09-17  [Wheat].Sow(cultivar: CerealRye, population: 741, depth: 25, rowSpacing: 190)
              2019-06-05  [Wheat].EndCrop()
              2019-06-05  [Soybean].Sow(cultivar: V1718, population: 38.8, depth: 50, rowSpacing: 760)
              2019-11-24  [Soybean].Harvest
              2019-11-25  [Soybean].EndCrop
            Soil Plano APSIMX R (disabled): SoilType=Plano:423332; State=WI; Country=USA; ApsoilNumber=0; Latitude=43.30458; Longitude=-89.33146
              DataSource=SSURGO (https://sdmdataaccess.nrcs.usda.gov/) through R package soilDB, R package apsimx function ssurgo2sp. Timestamp 2025-10-21 09:50:39.70961
              Comments=cokey = 27524243 - acres percent = 90 - component percent = 90 - taxonomic classification name = Fine-silty, mixed, superactive, mesic Typic Argiudolls - drainage class = Well drained - elevation = 260 - slope = 1 - geomdesc = Rise
              Physical: same as Soybean Yield Gap Simulations.Wisconsin Simulations.WI 2015.NT PD.WI NT 2015 Med PD.Plano APSIMX R.Physical
              WaterBalance SoilWater: same as Soybean Yield Gap Simulations.Wisconsin Simulations.WI 2015.NT PD.WI NT 2015 Med PD.Plano APSIMX R.SoilWater
              Organic: same as Soybean Yield Gap Simulations.Wisconsin Simulations.WI 2015.NT PD.WI NT 2015 Med PD.Plano APSIMX R.Organic
              Chemical: same as Soybean Yield Gap Simulations.Wisconsin Simulations.WI 2015.NT PD.WI NT 2015 Med PD.Plano APSIMX R.Chemical
              Nutrient
              Solute NH4: same as Soybean Yield Gap Simulations.Wisconsin Simulations.WI 2015.NT PD.WI NT 2015 Med PD.Plano APSIMX R.NH4
              Solute Urea: same as Soybean Yield Gap Simulations.Wisconsin Simulations.WI 2015.NT PD.WI NT 2015 Med PD.Plano APSIMX R.Urea
              Water: Thickness=[200, 200, 200, 200, 200, 200, 200, 200, 200, 200]; FilledFromTop=true
                InitialValues=[0.362, 0.362, 0.362, 0.363, 0.363, 0.264, 0.264, 0.264, 0.163, 0.163]
              SoilTemperature Temperature
              Solute NO3: same as Soybean Yield Gap Simulations.Wisconsin Simulations.WI 2015.NT PD.WI NT 2015 Med PD.Plano APSIMX R.NO3
            Soil Plano Lab Data Med: same as Soybean Yield Gap Simulations.Wisconsin Simulations.WI 2015.NT PD.WI NT 2015 Med PD.Plano Lab Data Med
        Folder NT TPD
          Zone WI NT 2019 Med TPD: Area=1; Slope=2; AspectAngle=0; Altitude=50
            SurfaceOrganicMatter: InitialResidueName=Wheat; InitialResidueType=wheat; InitialResidueMass=0; InitialStandingFraction=1; InitialCPR=0; InitialCNR=30
            Fertiliser
            Report: same as Soybean Yield Gap Simulations.Wisconsin Simulations.WI 2017.NT PD.WI NT 2017 Med PD.Report
            MicroClimate: a_interception=0; b_interception=1; c_interception=0; d_interception=0; SoilHeatFluxFraction=0.4; MinimumHeightDiffForNewLayer=0; NightInterceptionFraction=0.5; ReferenceHeight=2
            Plant Wheat: same as Soybean Yield Gap Simulations.Wisconsin Simulations.WI 2015.NT PD.WI NT 2015 Med PD.Wheat
            Plant Soybean: same as Soybean Yield Gap Simulations.Wisconsin Simulations.WI 2017.NT PD.WI NT 2017 Med PD.Soybean
            Operations
              2018-08-02  [SurfaceOrganicMatter].Add(mass: 4500, N: 218, P: 0, type: manure, name: dairy)
              2018-09-10  [SurfaceOrganicMatter].Incorporate(fraction: 1, depth: 200)
              2018-09-17  [Wheat].Sow(cultivar: CerealRye, population: 741, depth: 25, rowSpacing: 190)
              2019-06-05  [Wheat].EndCrop()
              2019-06-05  [Soybean].Sow(cultivar: V1718, population: 39.6, depth: 50, rowSpacing: 760)
              2019-11-24  [Soybean].Harvest
              2019-11-25  [Soybean].EndCrop
            Soil Plano APSIMX R (disabled): same as Soybean Yield Gap Simulations.Wisconsin Simulations.WI 2015.NT PD.WI NT 2015 Med PD.Plano APSIMX R
            Soil Plano Lab Data Med: same as Soybean Yield Gap Simulations.Wisconsin Simulations.WI 2015.NT PD.WI NT 2015 Med PD.Plano Lab Data Med
      Simulation WI 2023
        Weather: FileName=/Users/stw52/Downloads/aars_iem.met
        Clock: Start=2022-01-01; End=2023-11-19
        Summary
        SoilArbitrator
        Folder Till PD
          Zone WI Till 2023 Med PD: Area=1; Slope=2; AspectAngle=0; Altitude=50
            SurfaceOrganicMatter: InitialResidueName=Wheat; InitialResidueType=wheat; InitialResidueMass=0; InitialStandingFraction=1; InitialCPR=0; InitialCNR=30
            Fertiliser
            Report: same as Soybean Yield Gap Simulations.Wisconsin Simulations.WI 2017.Till PD.WI Till 2017 Med PD.Report
            MicroClimate: a_interception=0; b_interception=1; c_interception=0; d_interception=0; SoilHeatFluxFraction=0.4; MinimumHeightDiffForNewLayer=0; NightInterceptionFraction=0.5; ReferenceHeight=2
            Plant Wheat
              Cultivar CerealRye
                Command:
                  [Phenology].Phyllochron.BasePhyllochron.FixedValue = 90
                  [Leaf].CohortParameters.MaxArea.AreaLargestLeaves.FixedValue = 4000
                  [Phenology].CAMP.FLNparams.MinLN = 7
                  [Phenology].CAMP.FLNparams.PpLN = 2
                  [Phenology].CAMP.FLNparams.VrnLN = 5
                  [Phenology].CAMP.FLNparams.VxPLN = 2
                  [Phenology].HeadEmergenceLongDayBase.FixedValue = 110
                  [Phenology].HeadEmergencePpSensitivity.FixedValue = 0
                  [Phenology].CAMP.EnvData.VrnTreatTemp = 6.6
                  [Phenology].CAMP.EnvData.VrnTreatDuration = 60
                  [Leaf].Photosynthesis.RUE.FixedValue = 1.24
                  [Phenology].Vernalising.Target = 26
            Plant Soybean
              Cultivar Musgrave 1: same as Soybean Yield Gap Simulations.Wisconsin Simulations.WI 2015.NT PD.WI NT 2015 Med PD.Soybean.Musgrave 1
              Cultivar Arlington 1
                Command:
                  [Phenology].Vegetative.Target.FixedValue = 380
                  [Phenology].EarlyFlowering.Target.FixedValue = 100
                  [Phenology].EarlyGrainFilling.Target.FractionofGrainfilling.FixedValue = 0.31
                  [Phenology].LateGrainFilling.Target.EntireGrainfillPeriod.FixedValue = 500
                  [Phenology].VegetativePhotoperiodModifier.XYPairs.X = 13.84, 18.77
                  [Phenology].ReproductivePhotoperiodModifier.XYPairs.X = 13.84, 18.77
              Cultivar V1718: same as Soybean Yield Gap Simulations.Wisconsin Simulations.WI 2017.NT PD.WI NT 2017 Med PD.Soybean.V1718
            Operations
              2022-09-01  [SurfaceOrganicMatter].Incorporate(fraction: 1, depth: 150)
              2023-06-06  [SurfaceOrganicMatter].Incorporate(fraction: 1, depth: 150)
              2023-06-07  [Soybean].Sow(cultivar: V1718, population: 31.8, depth: 50, rowSpacing: 760)
              2023-11-07  [Soybean].Harvest()
            Soil Plano Lab Data Med: same as Soybean Yield Gap Simulations.Wisconsin Simulations.WI 2015.NT PD.WI NT 2015 Med PD.Plano Lab Data Med
            Soil Plano APSIMX R (disabled): same as Soybean Yield Gap Simulations.Wisconsin Simulations.WI 2015.NT PD.WI NT 2015 Med PD.Plano APSIMX R
        Folder NT PD
          Zone WI NT 2023 Med PD: Area=1; Slope=2; AspectAngle=0; Altitude=50
            SurfaceOrganicMatter: InitialResidueName=Wheat; InitialResidueType=wheat; InitialResidueMass=0; InitialStandingFraction=1; InitialCPR=0; InitialCNR=30
            Fertiliser
            Report: EventNames=[Clock].EndOfDay
              VariableNames:
                [Clock].Today
                //===== Daily Values
                [Wheat].AboveGround.Wt*10 as rye_bm_kg_ha
                [Soybean].Grain.Wt*10 as soy_kg_ha
                sum([Soil].Water.MM - [Soil].Physical.DULmm) as SoilWaterDeficit
                (sum([Soil].SoilWater.ESW)/(sum([Soil].Physical.DULmm-[Soil].Physical.LL15mm) as frac_water
                [Soil].Water.Volumetric
            MicroClimate: a_interception=0; b_interception=1; c_interception=0; d_interception=0; SoilHeatFluxFraction=0.4; MinimumHeightDiffForNewLayer=0; NightInterceptionFraction=0.5; ReferenceHeight=2
            Plant Wheat: same as Soybean Yield Gap Simulations.Wisconsin Simulations.WI 2015.NT PD.WI NT 2015 Med PD.Wheat
            Plant Soybean: same as Soybean Yield Gap Simulations.Wisconsin Simulations.WI 2023.Till PD.WI Till 2023 Med PD.Soybean
            Operations
              2022-08-11  [SurfaceOrganicMatter].Add(mass: 4500, N:300, P: 200, type: manure, name: dairy)
              2022-08-15  [SurfaceOrganicMatter].Incorporate(fraction: 1, depth: 150)
              2022-08-17  [SurfaceOrganicMatter].Incorporate(fraction: 1, depth: 150)
              2022-09-01  [SurfaceOrganicMatter].Incorporate(fraction: 1, depth: 127)
              2022-09-23  [Wheat].Sow(cultivar: CerealRye, population: 741, depth: 20, rowSpacing: 190)
              2023-06-07  [Wheat].EndCrop()
              2023-06-07  [Soybean].Sow(cultivar: V1718, population: 17.8, depth: 44.45, rowSpacing: 760)
              2023-11-07  [Soybean].Harvest()
            Soil Plano APSIMX R (disabled): same as Soybean Yield Gap Simulations.Wisconsin Simulations.WI 2015.NT PD.WI NT 2015 Med PD.Plano APSIMX R
            Soil Plano Lab Data Med: SoilType=0; Region=Pierce; State=Wisconsin; Country=US; ApsoilNumber=221; Latitude=44.64; Longitude=-92.453; YearOfSampling=2015; Comments=0
              DataSource:
                Original data by http://websoilsurvey.sc.egov.usda.gov/App/HomePage.htm
                Profile developed by Integrated Cropping Systems Lab, Department of Agronomy, ISU
              Physical: same as Soybean Yield Gap Simulations.Wisconsin Simulations.WI 2015.NT PD.WI NT 2015 Med PD.Plano Lab Data Med.Physical
              WaterBalance SoilWater: same as Soybean Yield Gap Simulations.Wisconsin Simulations.WI 2015.NT PD.WI NT 2015 Med PD.Plano Lab Data Med.SoilWater
              Organic: same as Soybean Yield Gap Simulations.Wisconsin Simulations.WI 2015.NT PD.WI NT 2015 Med PD.Plano Lab Data Med.Organic
              Chemical: same as Soybean Yield Gap Simulations.Wisconsin Simulations.WI 2015.NT PD.WI NT 2015 Med PD.Plano Lab Data Med.Chemical
              Nutrient
              Solute NH4: same as Soybean Yield Gap Simulations.Wisconsin Simulations.WI 2015.NT PD.WI NT 2015 Med PD.Plano Lab Data Med.NH4
              Solute Urea: same as Soybean Yield Gap Simulations.Wisconsin Simulations.WI 2015.NT PD.WI NT 2015 Med PD.Plano Lab Data Med.Urea
              Water: FilledFromTop=true
                Thickness=[150, 50, 180, 130, 150, 280, 180, 380, 130, 150, 120, 310, 300]
                InitialValues=[0.327, 0.327, 0.354, 0.319, 0.344, 0.362, 0.391, 0.306, 0.236, 0.218, 0.168, 0.154, 0.162]
              SoilTemperature Temperature
              Solute NO3: same as Soybean Yield Gap Simulations.Wisconsin Simulations.WI 2015.NT PD.WI NT 2015 Med PD.Plano Lab Data Med.NO3
        Folder NT TPD
          Zone WI NT 2023 Med TPD: Area=1; Slope=2; AspectAngle=0; Altitude=50
            SurfaceOrganicMatter: InitialResidueName=Wheat; InitialResidueType=wheat; InitialResidueMass=0; InitialStandingFraction=1; InitialCPR=0; InitialCNR=30
            Fertiliser
            Report: same as Soybean Yield Gap Simulations.Wisconsin Simulations.WI 2017.NT PD.WI NT 2017 Med PD.Report
            MicroClimate: a_interception=0; b_interception=1; c_interception=0; d_interception=0; SoilHeatFluxFraction=0.4; MinimumHeightDiffForNewLayer=0; NightInterceptionFraction=0.5; ReferenceHeight=2
            Plant Wheat: same as Soybean Yield Gap Simulations.Wisconsin Simulations.WI 2015.NT PD.WI NT 2015 Med PD.Wheat
            Plant Soybean: same as Soybean Yield Gap Simulations.Wisconsin Simulations.WI 2023.Till PD.WI Till 2023 Med PD.Soybean
            Operations
              2022-08-11  [SurfaceOrganicMatter].Add(mass: 4500, N:300, P: 200, type: manure, name: dairy)
              2022-08-15  [SurfaceOrganicMatter].Incorporate(fraction: 1, depth: 150)
              2022-08-17  [SurfaceOrganicMatter].Incorporate(fraction: 1, depth: 150)
              2022-09-01  [SurfaceOrganicMatter].Incorporate(fraction: 1, depth: 127)
              2022-09-23  [Wheat].Sow(cultivar: CerealRye, population: 741, depth: 20, rowSpacing: 190)
              2023-06-07  [Wheat].EndCrop()
              2023-06-07  [Soybean].Sow(cultivar: V1718, population: 31.8, depth: 44.45, rowSpacing: 760)
              2023-11-07  [Soybean].Harvest()
            Soil Plano APSIMX R (disabled): same as Soybean Yield Gap Simulations.Wisconsin Simulations.WI 2015.NT PD.WI NT 2015 Med PD.Plano APSIMX R
            Soil Plano Lab Data Med: same as Soybean Yield Gap Simulations.Wisconsin Simulations.WI 2015.NT PD.WI NT 2015 Med PD.Plano Lab Data Med
    Folder New York Simulations
      Simulation NY 2015
        Weather: FileName=/Users/stw52/Downloads/mus_iem.met
        Clock: Start=2014-01-01; End=2015-11-19
        Summary
        SoilArbitrator
        Folder Till PD
          Zone NY Till 2015 Med PD: Area=1; Slope=2; AspectAngle=0; Altitude=50
            SurfaceOrganicMatter: InitialResidueName=Wheat; InitialResidueType=wheat; InitialResidueMass=0; InitialStandingFraction=1; InitialCPR=0; InitialCNR=30
            Fertiliser
            Report: EventNames=[Clock].EndOfDay
              VariableNames:
                [Clock].Today.Year
                [Clock].Today
                [Wheat].AboveGround.Wt*10 as rye_bm_kg_ha
                [Soybean].Grain.Wt*10 as soy_kg_ha
                sum([Soil].Water.MM - [Soil].Physical.DULmm) as SoilWaterDeficit
                sum([Soil].SoilWater.ESW[1:5]) as esw
                [Soybean].Phenology.CurrentStageName
                sum([SoilWater].Water[1:5]) as sum_soilwater
                (sum([Soil].SoilWater.ESW[1:5])/(sum([Soil].Physical.DULmm[1:5]-[Soil].Physical.LL15mm[1:5]) as frac_water
                [SoilTemperature].AverageSoilTemperature
                [Soybean].Phenology.Stage
                [SoilWater].Runoff as runoff
                [SurfaceOrganicMatter].Cover
                [SoilWater].CNRed
            MicroClimate: a_interception=0; b_interception=1; c_interception=0; d_interception=0; SoilHeatFluxFraction=0.4; MinimumHeightDiffForNewLayer=0; NightInterceptionFraction=0.5; ReferenceHeight=2
            Plant Wheat: same as Soybean Yield Gap Simulations.Wisconsin Simulations.WI 2019.Till PD.WI Till 2019 Med PD.Wheat
            Plant Soybean
              Cultivar Musgrave 1: same as Soybean Yield Gap Simulations.Wisconsin Simulations.WI 2015.NT PD.WI NT 2015 Med PD.Soybean.Musgrave 1
              Cultivar Musgrave 2
                Command:
                  [Phenology].Vegetative.Target.FixedValue = 290
                  [Phenology].EarlyFlowering.Target.FixedValue = 110
                  [Phenology].EarlyGrainFilling.Target.FractionofGrainfilling.FixedValue = 0.2
                  [Phenology].LateGrainFilling.Target.EntireGrainfillPeriod.FixedValue = 530
                  [Phenology].VegetativePhotoperiodModifier.XYPairs.X = 13.59, 17.61
                  [Phenology].ReproductivePhotoperiodModifier.XYPairs.X = 13.59, 17.61
              Cultivar V2399
                Command:
                  [Phenology].Vegetative.Target.FixedValue = 303
                  [Phenology].EarlyFlowering.Target.FixedValue = 106.87
                  [Phenology].EarlyGrainFilling.Target.FractionofGrainfilling.FixedValue = 0.411
                  [Phenology].LateGrainFilling.Target.EntireGrainfillPeriod.FixedValue = 565
                  [Phenology].VegetativePhotoperiodModifier.XYPairs.X = 13.84, 18.77
                  [Phenology].ReproductivePhotoperiodModifier.XYPairs.X = 13.84, 18.77
            Operations
              2014-09-01  [SurfaceOrganicMatter].Add(mass: 6720, N:134, P:47,type: manure, name: dairy)
              2014-09-24  [SurfaceOrganicMatter].Incorporate(fraction: 1, depth: 150)
              2015-05-07  [SurfaceOrganicMatter].Incorporate(fraction: 1, depth: 150)
              2015-05-22  [SurfaceOrganicMatter].Incorporate(fraction: 1, depth: 150)
              2015-06-04  [Soybean].Sow(cultivar: V2399, population: 48.2, depth: 44.45, rowSpacing: 760)
              2015-10-12  [Soybean].Harvest()
            Soil Lima APSIMX R (disabled): SoilType=Lima:289443; State=NY; Country=USA; ApsoilNumber=0; Latitude=42.73414; Longitude=-76.65019
              DataSource=SSURGO (https://sdmdataaccess.nrcs.usda.gov/) through R package soilDB, R package apsimx function ssurgo2sp. Timestamp 2025-10-21 10:43:18.57775
              Comments=cokey = 27018443 - acres percent = 85 - component percent = 85 - taxonomic classification name = Fine-loamy, mixed, semiactive, mesic Oxyaquic Hapludalfs - drainage class = Moderately well drained - elevation = 280 - slope = 2 - geomdesc = Crest
              Physical
                Thickness  ParticleSizeSand  ParticleSizeSilt  ParticleSizeClay  Rocks  BD       AirDry     LL15      DUL       SAT       KS
                200        26                55                19                0      1.35171  0.0670293  0.134059  0.310082  0.489919  864
                200        26                55                19                0      1.35171  0.0670293  0.134059  0.310082  0.489919  864
                200        37                41                22                0      1.49124  0.142199   0.142199  0.283737  0.437268  432
                200        37                41                22                0      1.49124  0.142199   0.142199  0.283737  0.437268  432
                200        37                41                22                0      1.49124  0.142199   0.142199  0.283737  0.437268  432
                200        37                41                22                0      1.49124  0.142199   0.142199  0.283737  0.437268  432
                200        41                42                17                0      1.58311  0.107235   0.107235  0.241223  0.4026    432
                200        41                42                17                0      1.58311  0.107235   0.107235  0.241223  0.4026    432
                200        41                42                17                0      1.58311  0.107235   0.107235  0.241223  0.4026    432
                200        41                42                17                0      1.58311  0.107235   0.107235  0.241223  0.4026    432
                Rocks source: Calculated (layer 1, 2, 3, 4, 5, 6)
                SoilCrop maizeSoil
                  LL=[0.134059, 0.134059, 0.142199, 0.142199, 0.142199, 0.142199, 0.107235, 0.107235, 0.107235, 0.107235]
                  KL=[0.06, 0.0491238, 0.0402192, 0.0329287, 0.0269597, 0.0220728, 0.0180717, 0.0147958, 0.0121138, 0.00991793]
                  XF=[1, 1, 1, 1, 0, 0, 0, 0, 0, 0]
                  KL, XF source: Calculated (layer 7, 8, 9, 10)
                SoilCrop soybeanSoil
                  LL=[0.134059, 0.134059, 0.142199, 0.142199, 0.142199, 0.142199, 0.107235, 0.107235, 0.107235, 0.107235]
                  KL=[0.06, 0.0491238, 0.0402192, 0.0329287, 0.0269597, 0.0220728, 0.0180717, 0.0147958, 0.0121138, 0.00991793]
                  XF=[1, 1, 1, 1, 0, 0, 0, 0, 0, 0]
                  KL source: Calculated (layer 8, 9, 10)
                  XF source: Calculated (layer 7, 8, 9, 10)
                SoilCrop wheatSoil
                  LL=[0.134059, 0.134059, 0.142199, 0.142199, 0.142199, 0.142199, 0.107235, 0.107235, 0.107235, 0.107235]
                  KL=[0.06, 0.0491238, 0.0402192, 0.0329287, 0.0269597, 0.0220728, 0.0180717, 0.0147958, 0.0121138, 0.00991793]
                  XF=[1, 1, 1, 1, 0, 0, 0, 0, 0, 0]
                  KL source: Calculated (layer 1, 8, 9, 10)
                  XF source: Calculated (layer 1, 2, 3, 4, 6, 7, 8, 9, 10)
              WaterBalance SoilWater: SummerDate=1-jun; SummerU=6; SummerCona=4; WinterDate=1-nov; WinterU=6; WinterCona=4; DiffusConst=84; DiffusSlope=35.4; Salb=0.13; CN2Bare=73; CNRed=20; CNCov=0.8; PSIDul=-333; Thickness=[200, 200, 200, 200, 200, 200, 200, 200, 200, 200]
                SWCON=[0.45, 0.45, 0.45, 0.45, 0.45, 0.45, 0.45, 0.45, 0.45, 0.45]
              Organic: FOMCNRatio=40; CarbonUnits=Total
                Thickness  Carbon    SoilCNRatio  FBiom       FInert    FOM
                200        1.74419   12           0.04        0.8       150
                200        1.74419   12           0.0327492   0.80804   122.81
                200        0.872093  12           0.0268128   0.816161  100.548
                200        0.872093  12           0.0219525   0.824364  82.3217
                200        0.872093  12           0.0179732   0.832649  67.3993
                200        0.872093  12           0.0147152   0.841017  55.1819
                200        0.290698  12           0.0120478   0.849469  45.1791
                200        0.290698  12           0.00986388  0.858007  36.9895
                200        0.290698  12           0.00807586  0.86663   30.2845
                200        0.290698  12           0.00661196  0.875339  24.7948
              Chemical: Thickness=[200, 200, 200, 200, 200, 200, 200, 200, 200, 200]; PH=[7.4, 7.4, 7.4, 7.4, 7.4, 7.4, 7.4, 7.4, 7.4, 7.4]; PHUnits=Water
                CEC=[9.502, 9.748, 9.825, 9.281, 9.032, 8.816, 8.17, 8.17, 8.17, 8.18, -, -, -]
                CEC source: Calculated (layer 1, 2, 3, 4, 5, 6, 7)
              Nutrient
              Solute NO3: Thickness=[200, 200, 200, 200, 200, 200, 200, 200, 200, 200]; InitialValues=[16.2, 13, 10.4, 8.4, 6.7, 5.4, 4.3, 3.5, 2.8, 2.2]; InitialValuesUnits=ppm; WaterTableConcentration=0; D0=0; Exco=[1, 1, 1, 1, 1, 1]; FIP=[1, 1, 1, 1, 1, 1]; DepthConstant=0; MaxDepthSoluteAccessible=0; RunoffEffectivenessAtMovingSolute=0; MaxEffectiveRunoff=0
              Solute NH4: same as Soybean Yield Gap Simulations.Wisconsin Simulations.WI 2015.NT PD.WI NT 2015 Med PD.Plano APSIMX R.NH4
              Solute Urea: Thickness=[200, 200, 200, 200, 200, 200, 200, 200, 200, 200]; InitialValues=[0, 0, 0, 0, 0, 0, 0, 0, 0, 0]; InitialValuesUnits=kg/ha; WaterTableConcentration=0; D0=0; Exco=[1, 1, 1, 1, 1, 1]; FIP=[1, 1, 1, 1, 1, 1]; DepthConstant=0; MaxDepthSoluteAccessible=0; RunoffEffectivenessAtMovingSolute=0; MaxEffectiveRunoff=0
              Water: Thickness=[200, 200, 200, 200, 200, 200, 200, 200, 200, 200]; FilledFromTop=true
                InitialValues=[0.31, 0.31, 0.284, 0.284, 0.284, 0.284, 0.241, 0.241, 0.241, 0.241]
              SoilTemperature Temperature
            Soil Lima Lab Data Med: ASCOrder=NA; ASCSubOrder=NA; SoilType=Lima Silt Loam; Site=Musgrave; NearestTown=Aurora; Region=Northeast United States; State=New York; Country=United States of America; NaturalVegetation=NA; ApsoilNumber=9999; Latitude=42.625; Longitude=-76.625; LocationAccuracy=+- 250 m; YearOfSampling=1985; DataSource=Soil Lab Data; Comments=Data filled from Soil Lab Data from USDA soil survey
              Water: Thickness=[150, 100, 50, 160, 400, 180, 960]; InitialValues=[0.28, 0.28, 0.279, 0.29, 0.252, 0.272, 0.272]; FilledFromTop=true
              Physical
                Thickness  ParticleSizeSand  ParticleSizeSilt  ParticleSizeClay  Rocks  BD    AirDry  LL15   DUL    SAT    KS
                150        41.4              41.2              17.4              10     1.38  0.06    0.12   0.28   0.408  864
                100        41.4              41.2              17.4              10     1.38  0.096   0.12   0.28   0.408  864
                50         41.8              38.7              19.5              10     1.46  0.132   0.132  0.279  0.372  864
                160        42.1              34                23.9              10     1.55  0.157   0.157  0.29   0.38   864
                400        38.8              47.6              13.6              15     1.55  0.11    0.11   0.252  0.369  432
                180        38.6              48                13.4              0      1.73  0.155   0.155  0.272  0.325  432
                960        38.6              48                13.4              0      1.73  0.155   0.155  0.272  0.325  432
                SoilCrop WheatSoil: LL=[0.12, 0.12, 0.132, 0.157, 0.11, 0.155, 0.155]; KL=[0.06, 0.049, 0.04, 0.033, 0.027, 0.022, 0.018]; XF=[1, 1, 1, 1, 0.959, 0, 0]
                SoilCrop MaizeSoil: same as Soybean Yield Gap Simulations.New York Simulations.NY 2015.Till PD.NY Till 2015 Med PD.Lima Lab Data Med.Physical.WheatSoil
                SoilCrop SoybeanSoil: LL=[0.12, 0.12, 0.132, 0.157, 0.11, 0.155, 0.155]; KL=[0.06, 0.049, 0.04, 0.033, 0.027, 0.022, 0.018]; XF=[1, 1, 1, 1, 1, 0, 0]
              WaterBalance SoilWater: SummerDate=1-jun; SummerU=6; SummerCona=4; WinterDate=1-nov; WinterU=6; WinterCona=4; DiffusConst=88; DiffusSlope=35.4; Salb=0.13; CN2Bare=73; CNRed=20; CNCov=0; DischargeWidth=5; CatchmentArea=10; PSIDul=-336.6; Thickness=[150, 80, 70, 110, 230, 220, 960]; SWCON=[0.457, 0.464, 0.47, 0.481, 0.451, 0.469, 0.469]
              Organic: FOMCNRatio=40; CarbonUnits=Total
                Thickness  Carbon  SoilCNRatio  FBiom  FInert  FOM
                150        1.78    8            0.04   0.193   100
                80         1.78    8            0.031  0.395   70
                70         0.87    8            0.014  0.667   60
                110        0.87    8            0.01   0.832   0
                230        0.87    8            0.01   0.99    0
                220        0.87    8            0.01   0.99    0
              Nutrient
              Solute NO3: Thickness=[150, 100, 50, 160, 400, 180, 960]; InitialValues=[17, 14, 12, 9, 6.5, 5, 3.5]; InitialValuesUnits=ppm; WaterTableConcentration=0; D0=0; DepthConstant=0; MaxDepthSoluteAccessible=0; RunoffEffectivenessAtMovingSolute=0; MaxEffectiveRunoff=0
              Solute NH4: Thickness=[150, 150, 150, 150, 200, 200, 200, 200, 300, 300]; InitialValues=[0, 0, 0, 0, 0, 0, 0, 0, 0, 0]; InitialValuesUnits=ppm; WaterTableConcentration=0; D0=0; DepthConstant=0; MaxDepthSoluteAccessible=0; RunoffEffectivenessAtMovingSolute=0; MaxEffectiveRunoff=0
              Solute Urea: Thickness=[150, 150, 150, 150, 200, 200, 200, 200, 300, 300]; InitialValues=[0, 0, 0, 0, 0, 0, 0, 0, 0, 0]; InitialValuesUnits=kg/ha; WaterTableConcentration=0; D0=0; DepthConstant=0; MaxDepthSoluteAccessible=0; RunoffEffectivenessAtMovingSolute=0; MaxEffectiveRunoff=0
              SoilTemperature CERESSoilTemperature
              CERESSoilTemperature Temperature
              Chemical: PHUnits=Water
                Thickness  PH   CEC
                150        7.6  10
                150        7.6  10
                150        7.6  10
                150        7.6  7.5
                200        7.6  7.5
                200        8    5
                200        8    5
                200        8.3  5
                300        8.3  2.5
                300        8.3  2.5
        Folder NT PD
          Zone NY NT 2015 Med PD: Area=1; Slope=2; AspectAngle=0; Altitude=50
            SurfaceOrganicMatter: InitialResidueName=Wheat; InitialResidueType=wheat; InitialResidueMass=0; InitialStandingFraction=1; InitialCPR=0; InitialCNR=30
            Fertiliser
            Report: EventNames=[Clock].EndOfDay
              VariableNames:
                [Clock].Today.Year
                [Clock].Today
                [Wheat].AboveGround.Wt*10 as rye_bm_kg_ha
                [Soybean].Grain.Wt*10 as soy_kg_ha
                sum([Soil].Water.MM - [Soil].Physical.DULmm) as SoilWaterDeficit
                sum([Soil].SoilWater.ESW[1:5]) as esw
                sum([SoilWater].Water[1:5]) as sum_soilwater
                (sum([Soil].SoilWater.ESW[1:5])/(sum([Soil].Physical.DULmm[1:5]-[Soil].Physical.LL15mm[1:5]) as frac_water
                [SoilTemperature].AverageSoilTemperature
                [Soybean].Phenology.Stage
                [SoilWater].Runoff as runoff
                [SurfaceOrganicMatter].Cover
                [SoilWater].CNRed
            MicroClimate: a_interception=0; b_interception=1; c_interception=0; d_interception=0; SoilHeatFluxFraction=0.4; MinimumHeightDiffForNewLayer=0; NightInterceptionFraction=0.5; ReferenceHeight=2
            Plant Wheat: same as Soybean Yield Gap Simulations.Wisconsin Simulations.WI 2015.NT PD.WI NT 2015 Med PD.Wheat
            Plant Soybean: same as Soybean Yield Gap Simulations.New York Simulations.NY 2015.Till PD.NY Till 2015 Med PD.Soybean
            Operations
              2014-09-01  [SurfaceOrganicMatter].Add(mass: 6720, N:134, P:47,type: manure, name: dairy)
              2014-09-24  [SurfaceOrganicMatter].Incorporate(fraction: 1, depth: 150)
              2014-10-07  [Wheat].Sow(cultivar: CerealRye, population: 547, depth: 19, rowSpacing: 190)
              2015-06-03  [Wheat].EndCrop()
              2015-06-04  [Soybean].Sow(cultivar: V2399, population: 47.6, depth: 44.45, rowSpacing: 760)
              2015-10-12  [Soybean].Harvest()
            Soil Lima APSIMX R (disabled): same as Soybean Yield Gap Simulations.New York Simulations.NY 2015.Till PD.NY Till 2015 Med PD.Lima APSIMX R
            Soil Lima Lab Data Med: ASCOrder=NA; ASCSubOrder=NA; SoilType=Lima Silt Loam; Site=Musgrave; NearestTown=Aurora; Region=Northeast United States; State=New York; Country=United States of America; NaturalVegetation=NA; ApsoilNumber=9999; Latitude=42.625; Longitude=-76.625; LocationAccuracy=+- 250 m; YearOfSampling=1985; DataSource=Soil Lab Data; Comments=Data filled from Soil Lab Data from USDA soil survey
              Water: Thickness=[150, 100, 50, 160, 400, 180, 960]; InitialValues=[0.28, 0.28, 0.279, 0.29, 0.252, 0.272, 0.272]; FilledFromTop=true
              Physical
                Thickness  ParticleSizeSand  ParticleSizeSilt  ParticleSizeClay  Rocks  BD    AirDry  LL15   DUL    SAT    KS
                150        41.4              41.2              17.4              10     1.38  0.06    0.12   0.28   0.408  864
                100        41.4              41.2              17.4              10     1.38  0.06    0.12   0.28   0.408  864
                50         41.8              38.7              19.5              10     1.46  0.066   0.132  0.279  0.372  864
                160        42.1              34                23.9              10     1.55  0.0785  0.157  0.29   0.38   864
                400        38.8              47.6              13.6              15     1.55  0.11    0.11   0.252  0.369  432
                180        38.6              48                13.4              0      1.73  0.155   0.155  0.272  0.325  432
                960        38.6              48                13.4              0      1.73  0.155   0.155  0.272  0.325  432
                SoilCrop WheatSoil: same as Soybean Yield Gap Simulations.New York Simulations.NY 2015.Till PD.NY Till 2015 Med PD.Lima Lab Data Med.Physical.WheatSoil
                SoilCrop MaizeSoil: same as Soybean Yield Gap Simulations.New York Simulations.NY 2015.Till PD.NY Till 2015 Med PD.Lima Lab Data Med.Physical.WheatSoil
                SoilCrop SoybeanSoil: same as Soybean Yield Gap Simulations.New York Simulations.NY 2015.Till PD.NY Till 2015 Med PD.Lima Lab Data Med.Physical.SoybeanSoil
              WaterBalance SoilWater: same as Soybean Yield Gap Simulations.New York Simulations.NY 2015.Till PD.NY Till 2015 Med PD.Lima Lab Data Med.SoilWater
              Organic: same as Soybean Yield Gap Simulations.New York Simulations.NY 2015.Till PD.NY Till 2015 Med PD.Lima Lab Data Med.Organic
              Nutrient
              Solute NO3: same as Soybean Yield Gap Simulations.New York Simulations.NY 2015.Till PD.NY Till 2015 Med PD.Lima Lab Data Med.NO3
              Solute NH4: same as Soybean Yield Gap Simulations.New York Simulations.NY 2015.Till PD.NY Till 2015 Med PD.Lima Lab Data Med.NH4
              Solute Urea: same as Soybean Yield Gap Simulations.New York Simulations.NY 2015.Till PD.NY Till 2015 Med PD.Lima Lab Data Med.Urea
              SoilTemperature CERESSoilTemperature
              CERESSoilTemperature Temperature
              Chemical: same as Soybean Yield Gap Simulations.New York Simulations.NY 2015.Till PD.NY Till 2015 Med PD.Lima Lab Data Med.Chemical
        Folder NT TPD
          Zone NY NT 2015 Med TPD: Area=1; Slope=2; AspectAngle=0; Altitude=50
            SurfaceOrganicMatter: InitialResidueName=Wheat; InitialResidueType=wheat; InitialResidueMass=0; InitialStandingFraction=1; InitialCPR=0; InitialCNR=30
            Fertiliser
            Report: EventNames=[Clock].EndOfDay
              VariableNames:
                [Clock].Today.Year
                [Clock].Today
                [Wheat].AboveGround.Wt*10 as rye_bm_kg_ha
                [Soybean].Grain.Wt*10 as soy_kg_ha
                sum([Soil].Water.MM - [Soil].Physical.DULmm) as SoilWaterDeficit
                sum([Soil].SoilWater.ESW[1:5]) as esw
                (sum([Soil].SoilWater.ESW[1:5])/(sum([Soil].Physical.DULmm[1:5]-[Soil].Physical.LL15mm[1:5]) as frac_water
            MicroClimate: a_interception=0; b_interception=1; c_interception=0; d_interception=0; SoilHeatFluxFraction=0.4; MinimumHeightDiffForNewLayer=0; NightInterceptionFraction=0.5; ReferenceHeight=2
            Plant Wheat: same as Soybean Yield Gap Simulations.Wisconsin Simulations.WI 2015.NT PD.WI NT 2015 Med PD.Wheat
            Plant Soybean
              Cultivar Musgrave 1
                Command:
                  [Phenology].Vegetative.Target.FixedValue = 320
                  [Phenology].EarlyFlowering.Target.FixedValue = 120
                  [Phenology].EarlyGrainFilling.Target.FractionofGrainfilling.FixedValue = 0.411
                  [Phenology].LateGrainFilling.Target.EntireGrainfillPeriod.FixedValue = 632
                  [Phenology].VegetativePhotoperiodModifier.XYPairs.X = 13.84, 18.77
                  [Phenology].ReproductivePhotoperiodModifier.XYPairs.X = 13.84, 18.77
              Cultivar V2299
                Command:
                  [Phenology].Vegetative.Target.FixedValue = 315
                  [Phenology].EarlyFlowering.Target.FixedValue = 105
                  [Phenology].EarlyGrainFilling.Target.FractionofGrainfilling.FixedValue = 0.2
                  [Phenology].LateGrainFilling.Target.EntireGrainfillPeriod.FixedValue = 500
                  [Phenology].VegetativePhotoperiodModifier.XYPairs.X = 13.59, 17.61
                  [Phenology].ReproductivePhotoperiodModifier.XYPairs.X = 13.59, 17.61
              Cultivar V2399: same as Soybean Yield Gap Simulations.New York Simulations.NY 2015.Till PD.NY Till 2015 Med PD.Soybean.V2399
            Operations
              2014-09-01  [SurfaceOrganicMatter].Add(mass: 6720, N:134, P:47,type: manure, name: dairy)
              2014-09-24  [SurfaceOrganicMatter].Incorporate(fraction: 1, depth: 150)
              2014-10-07  [Wheat].Sow(cultivar: CerealRye, population: 547, depth: 19, rowSpacing: 190)
              2015-06-03  [Wheat].EndCrop()
              2015-06-04  [Soybean].Sow(cultivar: V2399, population: 48.2, depth: 44.45, rowSpacing: 760)
              2015-10-12  [Soybean].Harvest()
            Soil Lima Lab Data Med: same as Soybean Yield Gap Simulations.New York Simulations.NY 2015.Till PD.NY Till 2015 Med PD.Lima Lab Data Med
            Soil Lima APSIMX R (disabled): SoilType=Lima:289443; State=NY; Country=USA; ApsoilNumber=0; Latitude=42.73414; Longitude=-76.65019
              DataSource=SSURGO (https://sdmdataaccess.nrcs.usda.gov/) through R package soilDB, R package apsimx function ssurgo2sp. Timestamp 2025-10-21 10:43:18.57775
              Comments=cokey = 27018443 - acres percent = 85 - component percent = 85 - taxonomic classification name = Fine-loamy, mixed, semiactive, mesic Oxyaquic Hapludalfs - drainage class = Moderately well drained - elevation = 280 - slope = 2 - geomdesc = Crest
              Physical
                Thickness  ParticleSizeSand  ParticleSizeSilt  ParticleSizeClay  Rocks  BD       AirDry     LL15      DUL       SAT       KS
                200        26                55                19                0      1.35171  0.0670293  0.134059  0.310082  0.489919  864
                200        26                55                19                0      1.35171  0.0670293  0.134059  0.310082  0.489919  864
                200        37                41                22                0      1.49124  0.142199   0.142199  0.283737  0.437268  432
                200        37                41                22                0      1.49124  0.142199   0.142199  0.283737  0.437268  432
                200        37                41                22                0      1.49124  0.142199   0.142199  0.283737  0.437268  432
                200        37                41                22                0      1.49124  0.142199   0.142199  0.283737  0.437268  432
                200        41                42                17                0      1.58311  0.107235   0.107235  0.241223  0.4026    432
                200        41                42                17                0      1.58311  0.107235   0.107235  0.241223  0.4026    432
                200        41                42                17                0      1.58311  0.107235   0.107235  0.241223  0.4026    432
                200        41                42                17                0      1.58311  0.107235   0.107235  0.241223  0.4026    432
                Rocks source: Calculated (layer 1, 2, 3, 4, 5, 6)
                SoilCrop maizeSoil: same as Soybean Yield Gap Simulations.New York Simulations.NY 2015.Till PD.NY Till 2015 Med PD.Lima APSIMX R.Physical.maizeSoil
                SoilCrop soybeanSoil: same as Soybean Yield Gap Simulations.New York Simulations.NY 2015.Till PD.NY Till 2015 Med PD.Lima APSIMX R.Physical.soybeanSoil
                SoilCrop wheatSoil
                  LL=[0.134059, 0.134059, 0.142199, 0.142199, 0.142199, 0.142199, 0.107235, 0.107235, 0.107235, 0.107235]
                  KL=[0.06, 0.0491238, 0.0402192, 0.0329287, 0.0269597, 0.0220728, 0.0180717, 0.0147958, 0.0121138, 0.00991793]
                  XF=[1, 1, 1, 1, 0, 0, 0, 0, 0, 0]
                  KL source: Calculated (layer 1, 8, 9, 10)
                  XF source: Calculated
              WaterBalance SoilWater: same as Soybean Yield Gap Simulations.New York Simulations.NY 2015.Till PD.NY Till 2015 Med PD.Lima APSIMX R.SoilWater
              Organic: same as Soybean Yield Gap Simulations.New York Simulations.NY 2015.Till PD.NY Till 2015 Med PD.Lima APSIMX R.Organic
              Chemical: same as Soybean Yield Gap Simulations.New York Simulations.NY 2015.Till PD.NY Till 2015 Med PD.Lima APSIMX R.Chemical
              Nutrient
              Solute NO3: same as Soybean Yield Gap Simulations.New York Simulations.NY 2015.Till PD.NY Till 2015 Med PD.Lima APSIMX R.NO3
              Solute NH4: same as Soybean Yield Gap Simulations.Wisconsin Simulations.WI 2015.NT PD.WI NT 2015 Med PD.Plano APSIMX R.NH4
              Solute Urea: same as Soybean Yield Gap Simulations.New York Simulations.NY 2015.Till PD.NY Till 2015 Med PD.Lima APSIMX R.Urea
              Water: Thickness=[200, 200, 200, 200, 200, 200, 200, 200, 200, 200]; FilledFromTop=true
                InitialValues=[0.31, 0.31, 0.284, 0.284, 0.284, 0.284, 0.241, 0.241, 0.241, 0.241]
              SoilTemperature Temperature
      Simulation NY 2016
        Weather: FileName=/Users/stw52/Downloads/mus_iem.met
        Clock: Start=2015-01-01; End=2016-11-19
        Summary
        SoilArbitrator
        Folder NT PD
          Zone NY NT 2016 Med PD: Area=1; Slope=3; AspectAngle=0; Altitude=50
            SurfaceOrganicMatter: InitialResidueName=Wheat; InitialResidueType=base_type; InitialResidueMass=0; InitialStandingFraction=1; InitialCPR=0; InitialCNR=30
            Fertiliser
            Report: EventNames=[Clock].EndOfDay
              VariableNames:
                [Clock].Today
                //===== Daily Values
                [Wheat].AboveGround.Wt*10 as rye_bm_kg_ha
                [Soybean].Grain.Wt*10 as soy_kg_ha
                sum([Soil].Water.MM - [Soil].Physical.DULmm) as SoilWaterDeficit
                [Soybean].Phenology.CurrentStageName as stage
                [Soybean].Phenology.Stage as stage_num
                (sum([Soil].SoilWater.ESW[1:5])/(sum([Soil].Physical.DULmm[1:5]-[Soil].Physical.LL15mm[1:5]) as frac_water
                [Soybean].Leaf.Fw as fw_beans
                [Soil].NO3.ppm
            MicroClimate: a_interception=0; b_interception=1; c_interception=0; d_interception=0; SoilHeatFluxFraction=0.4; MinimumHeightDiffForNewLayer=0; NightInterceptionFraction=0.5; ReferenceHeight=2
            Plant Wheat: same as Soybean Yield Gap Simulations.Wisconsin Simulations.WI 2015.NT PD.WI NT 2015 Med PD.Wheat
            Plant Soybean
              Cultivar Musgrave 2: same as Soybean Yield Gap Simulations.New York Simulations.NY 2015.Till PD.NY Till 2015 Med PD.Soybean.Musgrave 2
              Cultivar V2299
                Command:
                  [Phenology].Vegetative.Target.FixedValue = 305
                  [Phenology].EarlyFlowering.Target.FixedValue = 105
                  [Phenology].EarlyGrainFilling.Target.FractionofGrainfilling.FixedValue = 0.2
                  [Phenology].LateGrainFilling.Target.EntireGrainfillPeriod.FixedValue = 500
                  [Phenology].VegetativePhotoperiodModifier.XYPairs.X = 13.59, 17.61
                  [Phenology].ReproductivePhotoperiodModifier.XYPairs.X = 13.59, 17.61
              Cultivar V2399: same as Soybean Yield Gap Simulations.New York Simulations.NY 2015.Till PD.NY Till 2015 Med PD.Soybean.V2399
            Operations
              2015-09-09  [SurfaceOrganicMatter].Add(mass: 1400, N: 70, P: 56, type: chickenmanure_base, name: poultry)
              2015-09-09  [SurfaceOrganicMatter].Incorporate(fraction: 1, depth: 150)
              2015-09-18  [Wheat].Sow(cultivar: CerealRye, population: 547, depth: 25.4, rowSpacing: 190)
              2016-05-26  [Wheat].EndCrop()
              2016-05-31  [Soybean].Sow(cultivar: V2399, population: 41.4, depth: 44.45, rowSpacing: 760)
              2016-10-19  [Soybean].Harvest()
            Soil Lima APSIMX R (disabled): same as Soybean Yield Gap Simulations.New York Simulations.NY 2015.NT TPD.NY NT 2015 Med TPD.Lima APSIMX R
            Soil Lima Lab Data Med: same as Soybean Yield Gap Simulations.New York Simulations.NY 2015.NT PD.NY NT 2015 Med PD.Lima Lab Data Med
        Folder Till PD
          Zone NY Till 2016 Med PD: Area=1; Slope=3; AspectAngle=0; Altitude=50
            SurfaceOrganicMatter: InitialResidueName=Wheat; InitialResidueType=wheat; InitialResidueMass=0; InitialStandingFraction=1; InitialCPR=0; InitialCNR=30
            Fertiliser
            Report: EventNames=[Clock].EndOfDay
              VariableNames:
                [Clock].Today
                //===== Daily Values
                [Wheat].AboveGround.Wt*10 as rye_bm_kg_ha
                [Soybean].Grain.Wt*10 as soy_kg_ha
                sum([Soil].Water.MM - [Soil].Physical.DULmm) as SoilWaterDeficit
                sum([Soil].Water.MM[1:3] - [Soil].Physical.DULmm[1:3]) as swd
                [Soil].Water.Potential as pot
                [Soil].Water.Volumetric as vwc
                [Soybean].LAI as lai_soy
                [Soybean].CoverTotal as soy_cover
                [Soybean].AboveGround.Wt as soy_biomass
                [Soybean].Leaf.Transpiration as soy_transpiration
                [SoilWater].Es as soil_evap
                sum([SoilWater].ESW) as esw
                (sum([Soil].SoilWater.ESW[1:5])/(sum([Soil].Physical.DULmm[1:5]-[Soil].Physical.LL15mm[1:5]) as frac_water
                [Soybean].Leaf.Fw as fw_beans
                [Soybean].Phenology.Stage as stage_num
            MicroClimate: a_interception=0; b_interception=1; c_interception=0; d_interception=0; SoilHeatFluxFraction=0.4; MinimumHeightDiffForNewLayer=0; NightInterceptionFraction=0.5; ReferenceHeight=2
            Plant Wheat: same as Soybean Yield Gap Simulations.Wisconsin Simulations.WI 2019.Till PD.WI Till 2019 Med PD.Wheat
            Plant Soybean
              Cultivar Musgrave 2: same as Soybean Yield Gap Simulations.New York Simulations.NY 2015.Till PD.NY Till 2015 Med PD.Soybean.Musgrave 2
              Cultivar V2399: same as Soybean Yield Gap Simulations.New York Simulations.NY 2015.Till PD.NY Till 2015 Med PD.Soybean.V2399
            Operations
              2015-09-09  [SurfaceOrganicMatter].Add(mass: 1400, N: 70, P: 56, type: chickenmanure_base, name: poultry)
              2015-09-09  [SurfaceOrganicMatter].Incorporate(fraction: 1, depth: 150)
              2016-04-22  [SurfaceOrganicMatter].Incorporate(fraction: 1, depth: 150)
              2016-05-31  [Soybean].Sow(cultivar: V2399, population: 73.4, depth: 44.45, rowSpacing: 760)
              2016-10-19  [Soybean].Harvest()
            Soil Lima APSIMX R (disabled): same as Soybean Yield Gap Simulations.New York Simulations.NY 2015.NT TPD.NY NT 2015 Med TPD.Lima APSIMX R
            Soil Lima Lab Data Med: same as Soybean Yield Gap Simulations.New York Simulations.NY 2015.NT PD.NY NT 2015 Med PD.Lima Lab Data Med
        Folder NT TPD
          Zone NY NT 2016 Med TPD: Area=1; Slope=3; AspectAngle=0; Altitude=50
            SurfaceOrganicMatter: InitialResidueName=Wheat; InitialResidueType=wheat; InitialResidueMass=0; InitialStandingFraction=1; InitialCPR=0; InitialCNR=30
            Fertiliser
            Report: EventNames=[Clock].EndOfDay
              VariableNames:
                [Clock].Today
                //===== Daily Values
                [Wheat].AboveGround.Wt*10 as rye_bm_kg_ha
                [Soybean].Grain.Wt*10 as soy_kg_ha
                sum([Soil].Water.MM - [Soil].Physical.DULmm) as SoilWaterDeficit
                sum([Soil].Water.MM[1:3] - [Soil].Physical.DULmm[1:3]) as swd
                [Soil].Water.Potential as pot
                [Soil].Water.Volumetric as vwc
                [Soybean].LAI as lai_soy
                [Soybean].CoverTotal as soy_cover
                [Soybean].AboveGround.Wt as soy_biomass
                [Soybean].Leaf.Transpiration as soy_transpiration
                [SoilWater].Es as soil_evap
                sum([SoilWater].ESW) as esw
                (sum([Soil].SoilWater.ESW[1:5])/(sum([Soil].Physical.DULmm[1:5]-[Soil].Physical.LL15mm[1:5]) as frac_water
            MicroClimate: a_interception=0; b_interception=1; c_interception=0; d_interception=0; SoilHeatFluxFraction=0.4; MinimumHeightDiffForNewLayer=0; NightInterceptionFraction=0.5; ReferenceHeight=2
            Plant Wheat: same as Soybean Yield Gap Simulations.Wisconsin Simulations.WI 2015.NT PD.WI NT 2015 Med PD.Wheat
            Plant Soybean
              Cultivar Musgrave 1
                Command:
                  [Phenology].Vegetative.Target.FixedValue = 348
                  [Phenology].EarlyFlowering.Target.FixedValue = 120
                  [Phenology].EarlyGrainFilling.Target.FractionofGrainfilling.FixedValue = 0.2
                  [Phenology].LateGrainFilling.Target.EntireGrainfillPeriod.FixedValue = 300
                  [Phenology].VegetativePhotoperiodModifier.XYPairs.X = 13.59, 17.61
                  [Phenology].ReproductivePhotoperiodModifier.XYPairs.X = 13.59, 17.61
                  [Leaf].Photosynthesis.RUE.FixedValue = 2
              Cultivar Musgrave 2: same as Soybean Yield Gap Simulations.New York Simulations.NY 2015.Till PD.NY Till 2015 Med PD.Soybean.Musgrave 2
              Cultivar V2399: same as Soybean Yield Gap Simulations.New York Simulations.NY 2015.Till PD.NY Till 2015 Med PD.Soybean.V2399
            Operations
              2015-09-09  [SurfaceOrganicMatter].Add(mass: 1400, N: 70, P: 56, type: chickenmanure_base, name: poultry)
              2015-09-09  [SurfaceOrganicMatter].Incorporate(fraction: 1, depth: 150)
              2015-09-18  [Wheat].Sow(cultivar: CerealRye, population: 547, depth: 19, rowSpacing: 190)
              2016-05-26  [Wheat].EndCrop()
              2016-05-31  [Soybean].Sow(cultivar: V2399, population: 73.4, depth: 44.45, rowSpacing: 760)
              2016-10-19  [Soybean].Harvest()
            Soil Lima APSIMX R (disabled): same as Soybean Yield Gap Simulations.New York Simulations.NY 2015.NT TPD.NY NT 2015 Med TPD.Lima APSIMX R
            Soil Lima Lab Data Med: same as Soybean Yield Gap Simulations.New York Simulations.NY 2015.Till PD.NY Till 2015 Med PD.Lima Lab Data Med
      Simulation NY 2023
        Weather: FileName=/Users/stw52/Downloads/apsim_musgrave.met
        Clock: Start=2022-01-01; End=2023-11-19
        Summary
        SoilArbitrator
        Folder NT PD
          Zone NY NT 2023 Med PD: Area=1; Slope=2; AspectAngle=0; Altitude=50
            SurfaceOrganicMatter: InitialResidueName=Wheat; InitialResidueType=wheat; InitialResidueMass=0; InitialStandingFraction=1; InitialCPR=0; InitialCNR=30
            Fertiliser
            Report: EventNames=[Clock].EndOfDay
              VariableNames:
                [Clock].Today
                //===== Daily Values
                [Wheat].AboveGround.Wt*10 as rye_bm_kg_ha
                [Soybean].Grain.Wt*10 as soy_kg_ha
                sum([Soil].Water.MM - [Soil].Physical.DULmm) as SoilWaterDeficit
                (sum([Soil].SoilWater.ESW[1:5])/(sum([Soil].Physical.DULmm[1:5]-[Soil].Physical.LL15mm[1:5]) as frac_water
                [SoilWater].Infiltration as infil
            MicroClimate: a_interception=0; b_interception=1; c_interception=0; d_interception=0; SoilHeatFluxFraction=0.4; MinimumHeightDiffForNewLayer=0; NightInterceptionFraction=0.5; ReferenceHeight=2
            Plant Wheat: same as Soybean Yield Gap Simulations.Wisconsin Simulations.WI 2015.NT PD.WI NT 2015 Med PD.Wheat
            Plant Soybean
              Cultivar Musgrave 1: same as Soybean Yield Gap Simulations.Wisconsin Simulations.WI 2019.Till PD.WI Till 2019 Med PD.Soybean.Musgrave 1
              Cultivar V1821
                Command:
                  [Phenology].Vegetative.Target.FixedValue = 295
                  [Phenology].EarlyFlowering.Target.FixedValue = 104.15
                  [Phenology].EarlyGrainFilling.Target.FractionofGrainfilling.FixedValue = 0.611
                  [Phenology].LateGrainFilling.Target.EntireGrainfillPeriod.FixedValue = 548
                  [Phenology].VegetativePhotoperiodModifier.XYPairs.X = 13.84, 18.77
                  [Phenology].ReproductivePhotoperiodModifier.XYPairs.X = 13.84, 18.77
            Operations
              2022-08-26  [SurfaceOrganicMatter].Add(mass: 1120, N: 56, P: 44.8, type: chickenmanure_base, name: poultry)
              2022-10-03  [SurfaceOrganicMatter].Incorporate(fraction: 1, depth: 150)
              2022-10-07  [Wheat].Sow(cultivar: CerealRye, population: 741, depth: 20, rowSpacing: 190)
              2023-06-05  [Wheat].EndCrop
              2023-06-05  [Soybean].Sow(cultivar: V1821, population: 50.7, depth: 57, rowSpacing: 760)
              2023-10-26  [Soybean].Harvest()
            Soil Lima APSIMX R (disabled): same as Soybean Yield Gap Simulations.New York Simulations.NY 2015.NT TPD.NY NT 2015 Med TPD.Lima APSIMX R
            Soil Lima Lab Data Med: same as Soybean Yield Gap Simulations.New York Simulations.NY 2015.Till PD.NY Till 2015 Med PD.Lima Lab Data Med
        Folder Till PD
          Zone NY Till 2023 Med PD: Area=1; Slope=2; AspectAngle=0; Altitude=50
            SurfaceOrganicMatter: InitialResidueName=Wheat; InitialResidueType=wheat; InitialResidueMass=0; InitialStandingFraction=1; InitialCPR=0; InitialCNR=30
            Fertiliser
            Report: same as Soybean Yield Gap Simulations.New York Simulations.NY 2023.NT PD.NY NT 2023 Med PD.Report
            MicroClimate: a_interception=0; b_interception=1; c_interception=0; d_interception=0; SoilHeatFluxFraction=0.4; MinimumHeightDiffForNewLayer=0; NightInterceptionFraction=0.5; ReferenceHeight=2
            Plant Wheat
              Cultivar CerealRye
                Command:
                  [Phenology].Phyllochron.BasePhyllochron.FixedValue = 90
                  [Leaf].CohortParameters.MaxArea.AreaLargestLeaves.FixedValue = 4000
                  [Phenology].CAMP.FLNparams.MinLN = 7
                  [Phenology].CAMP.FLNparams.PpLN = 2
                  [Phenology].CAMP.FLNparams.VrnLN = 5
                  [Phenology].CAMP.FLNparams.VxPLN = 2
                  [Phenology].HeadEmergenceLongDayBase.FixedValue = 110
                  [Phenology].HeadEmergencePpSensitivity.FixedValue = 0
                  [Phenology].CAMP.EnvData.VrnTreatTemp = 4.4
                  [Phenology].CAMP.EnvData.VrnTreatDuration = 60
                  [Phenology].Vernalising.Target = 26
            Plant Soybean: same as Soybean Yield Gap Simulations.New York Simulations.NY 2023.NT PD.NY NT 2023 Med PD.Soybean
            Operations
              2022-08-26  [SurfaceOrganicMatter].Add(mass: 1120, N: 56, P: 44.8, type: chickenmanure_base, name: poultry)
              2022-10-03  [SurfaceOrganicMatter].Incorporate(fraction: 1, depth: 150)
              2022-10-07  [Wheat].Sow(cultivar: CerealRye, population: 741, depth: 20, rowSpacing: 190)
              2023-05-12  [Wheat].EndCrop
              2023-05-14  [SurfaceOrganicMatter].Incorporate(fraction: 1, depth: 150)
              2023-06-05  [Soybean].Sow(cultivar: V1821, population: 57.3, depth: 57, rowSpacing: 760)
              2023-10-26  [Soybean].Harvest()
            Soil Lima APSIMX R (disabled): same as Soybean Yield Gap Simulations.New York Simulations.NY 2015.NT TPD.NY NT 2015 Med TPD.Lima APSIMX R
            Soil Lima Lab Data Med: same as Soybean Yield Gap Simulations.New York Simulations.NY 2015.Till PD.NY Till 2015 Med PD.Lima Lab Data Med
        Folder NT TPD
          Zone NY NT 2023 Med TPD: Area=1; Slope=2; AspectAngle=0; Altitude=50
            SurfaceOrganicMatter: InitialResidueName=Wheat; InitialResidueType=wheat; InitialResidueMass=0; InitialStandingFraction=1; InitialCPR=0; InitialCNR=30
            Fertiliser
            Report: EventNames=[Clock].EndOfDay
              VariableNames:
                [Clock].Today
                //===== Daily Values
                [Wheat].AboveGround.Wt*10 as rye_bm_kg_ha
                [Soybean].Grain.Wt*10 as soy_kg_ha
                sum([Soil].Water.MM - [Soil].Physical.DULmm) as SoilWaterDeficit
                (sum([Soil].SoilWater.ESW[1:5])/(sum([Soil].Physical.DULmm[1:5]-[Soil].Physical.LL15mm[1:5]) as frac_water
            MicroClimate: a_interception=0; b_interception=1; c_interception=0; d_interception=0; SoilHeatFluxFraction=0.4; MinimumHeightDiffForNewLayer=0; NightInterceptionFraction=0.5; ReferenceHeight=2
            Plant Wheat: same as Soybean Yield Gap Simulations.Wisconsin Simulations.WI 2015.NT PD.WI NT 2015 Med PD.Wheat
            Plant Soybean: same as Soybean Yield Gap Simulations.New York Simulations.NY 2023.NT PD.NY NT 2023 Med PD.Soybean
            Operations
              2022-08-26  [SurfaceOrganicMatter].Add(mass: 1120, N: 56, P: 44.8, type: chickenmanure_base, name: poultry)
              2022-10-03  [SurfaceOrganicMatter].Incorporate(fraction: 1, depth: 150)
              2022-10-07  [Wheat].Sow(cultivar: CerealRye, population: 741, depth: 20, rowSpacing: 190)
              2023-06-05  [Wheat].EndCrop
              2023-06-05  [Soybean].Sow(cultivar: V1821, population: 57.3, depth: 57, rowSpacing: 760)
              2023-10-26  [Soybean].Harvest()
            Soil Lima APSIMX R (disabled): same as Soybean Yield Gap Simulations.New York Simulations.NY 2015.NT TPD.NY NT 2015 Med TPD.Lima APSIMX R
            Soil Lima Lab Data Med: same as Soybean Yield Gap Simulations.New York Simulations.NY 2015.Till PD.NY Till 2015 Med PD.Lima Lab Data Med
      Simulation NY 2024
        Weather: FileName=/Users/stw52/Downloads/apsim_musgrave.met
        Clock: Start=2023-01-01; End=2024-11-19
        Summary
        SoilArbitrator
        Folder Till PD
          Zone NY Till 2024 Med PD: Area=1; Slope=2; AspectAngle=0; Altitude=50
            SurfaceOrganicMatter: InitialResidueName=Wheat; InitialResidueType=wheat; InitialResidueMass=0; InitialStandingFraction=1; InitialCPR=0; InitialCNR=30
            Fertiliser
            Report: EventNames=[Clock].EndOfDay
              VariableNames:
                [Clock].Today
                //===== Daily Values
                [Soybean].Grain.Wt*10 as soy_kg_ha
                sum([Soil].Water.MM - [Soil].Physical.DULmm) as SoilWaterDeficit
                [Wheat].Phenology.Zadok
                (sum([Soil].SoilWater.ESW[1:5])/(sum([Soil].Physical.DULmm[1:5]-[Soil].Physical.LL15mm[1:5]) as frac_water
                [Soybean].Phenology.CurrentStageName
                [Soybean].AboveGround.Wt*10 as soy_biomass
                [Soybean].Grain.Size as grain_g
            MicroClimate: a_interception=0; b_interception=1; c_interception=0; d_interception=0; SoilHeatFluxFraction=0.4; MinimumHeightDiffForNewLayer=0; NightInterceptionFraction=0.5; ReferenceHeight=2
            Plant Wheat: same as Soybean Yield Gap Simulations.Wisconsin Simulations.WI 2019.Till PD.WI Till 2019 Med PD.Wheat
            Plant Soybean
              Cultivar Musgrave 1: same as Soybean Yield Gap Simulations.Wisconsin Simulations.WI 2019.Till PD.WI Till 2019 Med PD.Soybean.Musgrave 1
              Cultivar Musgrave 2: same as Soybean Yield Gap Simulations.New York Simulations.NY 2015.Till PD.NY Till 2015 Med PD.Soybean.Musgrave 2
              Cultivar V1821
                Command:
                  [Phenology].Vegetative.Target.FixedValue = 380
                  [Phenology].EarlyFlowering.Target.FixedValue = 60
                  [Phenology].EarlyGrainFilling.Target.FractionofGrainfilling.FixedValue = 0.22
                  [Phenology].LateGrainFilling.Target.EntireGrainfillPeriod.FixedValue = 550
                  [Phenology].VegetativePhotoperiodModifier.XYPairs.X = 13.4, 18
                  [Phenology].ReproductivePhotoperiodModifier.XYPairs.X = 13.4, 18
              Cultivar Virtue 1821: same as Soybean Yield Gap Simulations.New York Simulations.NY 2023.NT PD.NY NT 2023 Med PD.Soybean.V1821
              Cultivar V2399
                Command:
                  [Phenology].Vegetative.Target.FixedValue = 320
                  [Phenology].EarlyFlowering.Target.FixedValue = 110
                  [Phenology].EarlyGrainFilling.Target.FractionofGrainfilling.FixedValue = 0.1
                  [Phenology].LateGrainFilling.Target.EntireGrainfillPeriod.FixedValue = 500
                  [Phenology].VegetativePhotoperiodModifier.XYPairs.X = 13.59, 17.61
                  [Phenology].ReproductivePhotoperiodModifier.XYPairs.X = 13.59, 17.61
            Operations
              2023-09-10  [SurfaceOrganicMatter].Add(mass: 1400, N: 70, P: 56, type: chickenmanure_base, name: poultry)
              2023-09-11  [SurfaceOrganicMatter].Incorporate(fraction: 1, depth: 150)
              2024-05-14  [SurfaceOrganicMatter].Incorporate(fraction: 1, depth: 150)
              2024-05-20  [SurfaceOrganicMatter].Incorporate(fraction: 1, depth: 100)
              2024-05-23  [Soybean].Sow(cultivar: Virtue 1821, population: 61.7, depth: 57, rowSpacing: 760)
              2024-10-23  [Soybean].Harvest()
            Soil Lima Lab Data Med 2 (disabled): ASCOrder=NA; ASCSubOrder=NA; SoilType=Lima Silt Loam; Site=Musgrave; NearestTown=Aurora; Region=Northeast United States; State=New York; Country=United States of America; NaturalVegetation=NA; ApsoilNumber=9999; Latitude=42.625; Longitude=-76.625; LocationAccuracy=+- 250 m; YearOfSampling=1985; DataSource=Soil Lab Data; Comments=Data filled from Soil Lab Data from USDA soil survey
              Water: Thickness=[150, 100, 50, 160, 400, 180, 960]; InitialValues=[0.284, 0.284, 0.277, 0.276, 0.251, 0.231, 0.231]; FilledFromTop=true
              Physical
                Thickness  ParticleSizeSand  ParticleSizeSilt  ParticleSizeClay  Rocks  BD    AirDry  LL15   DUL    SAT    KS
                150        41.4              41.2              17.4              10     1.38  0.06    0.122  0.284  0.403  864
                100        41.4              41.2              17.4              10     1.38  0.096   0.122  0.284  0.403  864
                50         41.8              38.7              19.5              10     1.46  0.128   0.128  0.277  0.389  864
                160        42.1              34                23.9              10     1.55  0.142   0.142  0.276  0.377  864
                400        38.8              47.6              13.6              15     1.55  0.108   0.108  0.251  0.361  432
                180        38.6              48                13.4              0      1.73  0.111   0.111  0.231  0.323  432
                960        38.6              48                13.4              0      1.73  0.111   0.111  0.231  0.323  432
                SoilCrop WheatSoil: LL=[0.122, 0.122, 0.128, 0.142, 0.108, 0.111, 0.111]; KL=[0.06, 0.06, 0.055, 0.048, 0.039, 0.029, 0.029]; XF=[1, 1, 1, 1, 0.959, 0, 0]
                SoilCrop MaizeSoil: same as Soybean Yield Gap Simulations.New York Simulations.NY 2024.Till PD.NY Till 2024 Med PD.Lima Lab Data Med 2.Physical.WheatSoil
                SoilCrop SoybeanSoil: LL=[0.122, 0.122, 0.128, 0.142, 0.108, 0.111, 0.111]; KL=[0.06, 0.06, 0.055, 0.048, 0.039, 0.029, 0.029]; XF=[1, 1, 1, 1, 1, 0, 0]
              WaterBalance SoilWater: SummerDate=1-jun; SummerU=6; SummerCona=4; WinterDate=1-nov; WinterU=6; WinterCona=4; DiffusConst=88; DiffusSlope=35.4; Salb=0.13; CN2Bare=73; CNRed=20; CNCov=0; DischargeWidth=5; CatchmentArea=10; PSIDul=-336.6; Thickness=[150, 80, 70, 110, 230, 220, 960]; SWCON=[0.457, 0.464, 0.47, 0.481, 0.3, 0.3, 0.3]
              Organic: FOMCNRatio=40; CarbonUnits=Total
                Thickness  Carbon  SoilCNRatio  FBiom  FInert  FOM
                150        1.78    8            0.04   0.193   100
                80         1.78    8            0.031  0.395   70
                70         0.87    8            0.014  0.667   60
                110        0.87    8            0.01   0.832   0
                230        0.87    8            0.01   0.99    0
                220        0.87    8            0.01   0.99    0
              Nutrient
              Solute NO3: Thickness=[150, 100, 50, 160, 400, 180, 960]; InitialValues=[17, 14, 12, 9, 6.5, 5, 3.5]; InitialValuesUnits=ppm; WaterTableConcentration=0; D0=0; DepthConstant=0; MaxDepthSoluteAccessible=0; RunoffEffectivenessAtMovingSolute=0; MaxEffectiveRunoff=0
              Solute NH4: Thickness=[150, 150, 150, 150, 200, 200, 200, 200, 300, 300]; InitialValues=[0, 0, 0, 0, 0, 0, 0, 0, 0, 0]; InitialValuesUnits=ppm; WaterTableConcentration=0; D0=0; DepthConstant=0; MaxDepthSoluteAccessible=0; RunoffEffectivenessAtMovingSolute=0; MaxEffectiveRunoff=0
              Solute Urea: Thickness=[150, 150, 150, 150, 200, 200, 200, 200, 300, 300]; InitialValues=[0, 0, 0, 0, 0, 0, 0, 0, 0, 0]; InitialValuesUnits=kg/ha; WaterTableConcentration=0; D0=0; DepthConstant=0; MaxDepthSoluteAccessible=0; RunoffEffectivenessAtMovingSolute=0; MaxEffectiveRunoff=0
              SoilTemperature CERESSoilTemperature
              CERESSoilTemperature Temperature
              Chemical: PHUnits=Water
                Thickness  PH   CEC
                150        7.6  10
                150        7.6  10
                150        7.6  10
                150        7.6  7.5
                200        7.6  7.5
                200        8    5
                200        8    5
                200        8.3  5
                300        8.3  2.5
                300        8.3  2.5
            Soil Lima APSIMX R (disabled): same as Soybean Yield Gap Simulations.New York Simulations.NY 2015.NT TPD.NY NT 2015 Med TPD.Lima APSIMX R
            Soil Lima Lab Data Med: same as Soybean Yield Gap Simulations.New York Simulations.NY 2015.Till PD.NY Till 2015 Med PD.Lima Lab Data Med
        Folder NT PD
          Zone NY NT 2024 Med PD: Area=1; Slope=2; AspectAngle=0; Altitude=50
            SurfaceOrganicMatter: InitialResidueName=Wheat; InitialResidueType=wheat; InitialResidueMass=0; InitialStandingFraction=1; InitialCPR=0; InitialCNR=30
            Fertiliser
            Report: EventNames=[Clock].EndOfDay
              VariableNames:
                [Clock].Today
                //===== Daily Values
                [Wheat].AboveGround.Wt*10 as rye_bm_kg_ha
                [Soybean].Grain.Wt*10 as soy_kg_ha
                sum([Soil].Water.MM - [Soil].Physical.DULmm) as SoilWaterDeficit
                (sum([Soil].SoilWater.ESW[1:5])/(sum([Soil].Physical.DULmm[1:5]-[Soil].Physical.LL15mm[1:5]) as frac_water
                [Soybean].AboveGround.Wt *10 as biomass_soy
            MicroClimate: a_interception=0; b_interception=1; c_interception=0; d_interception=0; SoilHeatFluxFraction=0.4; MinimumHeightDiffForNewLayer=0; NightInterceptionFraction=0.5; ReferenceHeight=2
            Plant Wheat: same as Soybean Yield Gap Simulations.Wisconsin Simulations.WI 2015.NT PD.WI NT 2015 Med PD.Wheat
            Plant Soybean
              Cultivar Musgrave 1: same as Soybean Yield Gap Simulations.Wisconsin Simulations.WI 2015.NT PD.WI NT 2015 Med PD.Soybean.Musgrave 1
              Cultivar Musgrave 2: same as Soybean Yield Gap Simulations.New York Simulations.NY 2015.Till PD.NY Till 2015 Med PD.Soybean.Musgrave 2
              Cultivar V1821: same as Soybean Yield Gap Simulations.New York Simulations.NY 2023.NT PD.NY NT 2023 Med PD.Soybean.V1821
              Cultivar Virtue 1821: same as Soybean Yield Gap Simulations.New York Simulations.NY 2023.NT PD.NY NT 2023 Med PD.Soybean.V1821
            Operations
              2023-09-19  [SurfaceOrganicMatter].Add(mass: 1120, N: 56, P: 44.8, type: chickenmanure_base, name: poultry)
              2023-09-20  [SurfaceOrganicMatter].Incorporate(fraction: 1, depth: 150)
              2023-09-21  [Wheat].Sow(cultivar: CerealRye, population: 741, depth: 20, rowSpacing: 190)
              2024-05-23  [Wheat].EndCrop
              2024-05-23  [Soybean].Sow(cultivar: Virtue 1821, population: 55.8, depth: 57, rowSpacing: 760)
              2024-10-23  [Soybean].Harvest()
            Soil Lima APSIMX R (disabled): same as Soybean Yield Gap Simulations.New York Simulations.NY 2015.NT TPD.NY NT 2015 Med TPD.Lima APSIMX R
            Soil Lima Lab Data Med: same as Soybean Yield Gap Simulations.New York Simulations.NY 2015.Till PD.NY Till 2015 Med PD.Lima Lab Data Med
        Folder NT TPD
          Zone NY NT 2024 Med TPD: Area=1; Slope=2; AspectAngle=0; Altitude=50
            SurfaceOrganicMatter: InitialResidueName=Wheat; InitialResidueType=wheat; InitialResidueMass=0; InitialStandingFraction=1; InitialCPR=0; InitialCNR=30
            Fertiliser
            Report: same as Soybean Yield Gap Simulations.New York Simulations.NY 2023.NT TPD.NY NT 2023 Med TPD.Report
            MicroClimate: a_interception=0; b_interception=1; c_interception=0; d_interception=0; SoilHeatFluxFraction=0.4; MinimumHeightDiffForNewLayer=0; NightInterceptionFraction=0.5; ReferenceHeight=2
            Plant Wheat: same as Soybean Yield Gap Simulations.Wisconsin Simulations.WI 2015.NT PD.WI NT 2015 Med PD.Wheat
            Plant Soybean
              Cultivar Musgrave 1
                Command:
                  [Phenology].Vegetative.Target.FixedValue = 268.6
                  [Phenology].EarlyFlowering.Target.FixedValue = 92.6
                  [Phenology].EarlyGrainFilling.Target.FractionofGrainfilling.FixedValue = 0.386
                  [Phenology].LateGrainFilling.Target.EntireGrainfillPeriod.FixedValue = 500
                  [Phenology].VegetativePhotoperiodModifier.XYPairs.X = 13.59, 17.61
                  [Phenology].ReproductivePhotoperiodModifier.XYPairs.X = 13.59, 17.61
              Cultivar V1821: same as Soybean Yield Gap Simulations.New York Simulations.NY 2023.NT PD.NY NT 2023 Med PD.Soybean.V1821
            Operations
              2023-09-19  [SurfaceOrganicMatter].Add(mass: 1120, N: 56, P: 44.8, type: chickenmanure_base, name: poultry)
              2023-09-20  [SurfaceOrganicMatter].Incorporate(fraction: 1, depth: 150)
              2023-09-21  [Wheat].Sow(cultivar: CerealRye, population: 741, depth: 20, rowSpacing: 190)
              2024-05-23  [Wheat].EndCrop
              2024-05-23  [Soybean].Sow(cultivar: V1821, population: 61.7, depth: 57, rowSpacing: 760)
              2024-10-23  [Soybean].Harvest()
            Soil Lima APSIMX R (disabled): same as Soybean Yield Gap Simulations.New York Simulations.NY 2015.NT TPD.NY NT 2015 Med TPD.Lima APSIMX R
            Soil Lima Lab Data Med: same as Soybean Yield Gap Simulations.New York Simulations.NY 2015.Till PD.NY Till 2015 Med PD.Lima Lab Data Med
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