Simulations: Version=197
  DataStore
  Simulation NY 2015 Rye
    Weather: FileName=/Users/stw52/Downloads/mus_iem.met
    Clock: Start=2014-01-01; End=2015-11-19
    Summary
    SoilArbitrator
    Zone NY NT 2015 Med SR: Area=1; Slope=2; AspectAngle=0; Altitude=50
      SurfaceOrganicMatter: InitialResidueName=Wheat; InitialResidueType=wheat; InitialResidueMass=0; InitialStandingFraction=1; InitialCPR=0; InitialCNR=30
      Fertiliser
      Report: EventNames=[Wheat].PlantEnding
        VariableNames:
          [Clock].Today.Year
          [Clock].Today
          [Soybean].Grain.Wt*10 as soy_kg_ha
          sum([Soil].Water.MM - [Soil].Physical.DULmm) as SoilWaterDeficit
          sum([Soil].SoilWater.ESW[1:5]) as esw
          (sum([Soil].SoilWater.ESW[1:5])/(sum([Soil].Physical.DULmm[1:5]-[Soil].Physical.LL15mm[1:5]) as frac_water
          sum([SoilWater].PAWmm[1:3])/sum([Soil].Physical.PAWCmm[1:3]) as fasw_top30
          [Soil].Water.Volumetric as vwc
          [SurfaceOrganicMatter].Wt as rye_bm_kg_ha
          [SurfaceOrganicMatter].C/[SurfaceOrganicMatter].N as cn
          [Soil].NH4.ppm
          [Soil].NO3.ppm
          [SurfaceOrganicMatter].LyingWt
          [Soil].Urea.ppm
          [Soil].Temperature.Value
          [Soil].Organic.FOM as fom
      MicroClimate: a_interception=0; b_interception=1; c_interception=0; d_interception=0; SoilHeatFluxFraction=0.4; MinimumHeightDiffForNewLayer=0; NightInterceptionFraction=0.5; ReferenceHeight=2
      Plant Wheat
        Cultivar CerealRye
          Command:
            [Phenology].Phyllochron.BasePhyllochron.FixedValue = 90
            [Leaf].CohortParameters.MaxArea.AreaLargestLeaves.FixedValue = 4000
            [Phenology].CAMP.FLNparams.MinLN = 7
            [Phenology].CAMP.FLNparams.PpLN = 2
            [Phenology].CAMP.FLNparams.VrnLN = 5
            [Phenology].CAMP.FLNparams.VxPLN = 2
            [Phenology].HeadEmergenceLongDayBase.FixedValue = 110
            [Phenology].HeadEmergencePpSensitivity.FixedValue = 0
            [Phenology].CAMP.EnvData.VrnTreatTemp = 4.4
            [Phenology].CAMP.EnvData.VrnTreatDuration = 60
            [Leaf].Photosynthesis.RUE.FixedValue = 1.24
            [Phenology].Vernalising.Target = 26
      Plant Soybean
        Cultivar Musgrave 1
          Command:
            [Phenology].Vegetative.Target.FixedValue = 340
            [Phenology].EarlyFlowering.Target.FixedValue = 120
            [Phenology].EarlyGrainFilling.Target.FractionofGrainfilling.FixedValue = 0.3
            [Phenology].LateGrainFilling.Target.EntireGrainfillPeriod.FixedValue = 632
            [Phenology].VegetativePhotoperiodModifier.XYPairs.X = 13.84, 18.77
            [Phenology].ReproductivePhotoperiodModifier.XYPairs.X = 13.84, 18.77
      Operations
        2014-09-24  [SurfaceOrganicMatter].Incorporate(fraction: 1, depth: 150)
        2014-09-29  [Fertiliser].Apply(amount: 122, type: UreaN)
        2014-10-07  [Wheat].Sow(cultivar: CerealRye, population: 547, depth: 25, rowSpacing: 190)
        2015-06-03  [Wheat].EndCrop()
      Soil Lima Lab Data Med: ASCOrder=NA; ASCSubOrder=NA; SoilType=Lima Silt Loam; Site=Musgrave; NearestTown=Aurora; Region=Northeast United States; State=New York; Country=United States of America; NaturalVegetation=NA; ApsoilNumber=9999; Latitude=42.625; Longitude=-76.625; LocationAccuracy=+- 250 m; YearOfSampling=1985; DataSource=Soil Lab Data; Comments=Data filled from Soil Lab Data from USDA soil survey
        Water: Thickness=[150, 100, 50, 160, 400, 180, 960]; InitialValues=[0.28, 0.28, 0.279, 0.29, 0.252, 0.272, 0.272]; FilledFromTop=true
        Physical
          Thickness  ParticleSizeSand  ParticleSizeSilt  ParticleSizeClay  Rocks  BD    AirDry  LL15   DUL    SAT    KS
          150        41.4              41.2              17.4              10     1.38  0.06    0.12   0.28   0.408  864
          100        41.4              41.2              17.4              10     1.38  0.096   0.12   0.28   0.408  864
          50         41.8              38.7              19.5              10     1.46  0.132   0.132  0.279  0.372  864
          160        42.1              34                23.9              10     1.55  0.157   0.157  0.29   0.38   864
          400        38.8              47.6              13.6              15     1.55  0.11    0.11   0.252  0.369  432
          180        38.6              48                13.4              0      1.73  0.155   0.155  0.272  0.325  432
          960        38.6              48                13.4              0      1.73  0.155   0.155  0.272  0.325  432
          SoilCrop WheatSoil: LL=[0.12, 0.12, 0.132, 0.157, 0.11, 0.155, 0.155]; KL=[0.06, 0.06, 0.055, 0.048, 0.039, 0.029, 0.029]; XF=[1, 1, 1, 1, 0.959, 0, 0]
          SoilCrop MaizeSoil: same as NY 2015 Rye.NY NT 2015 Med SR.Lima Lab Data Med.Physical.WheatSoil
          SoilCrop SoybeanSoil: LL=[0.12, 0.12, 0.132, 0.157, 0.11, 0.155, 0.155]; KL=[0.06, 0.06, 0.055, 0.048, 0.039, 0.029, 0.029]; XF=[1, 1, 1, 1, 1, 0, 0]
        WaterBalance SoilWater: SummerDate=1-jun; SummerU=6; SummerCona=4; WinterDate=1-nov; WinterU=6; WinterCona=4; DiffusConst=88; DiffusSlope=35.4; Salb=0.13; CN2Bare=73; CNRed=20; CNCov=0; DischargeWidth=5; CatchmentArea=10; PSIDul=-336.6; Thickness=[150, 80, 70, 110, 230, 220]; SWCON=[0.457, 0.464, 0.47, 0.481, 0.451, 0.469]
        Organic: FOMCNRatio=40; CarbonUnits=Total
          Thickness  Carbon  SoilCNRatio  FBiom  FInert  FOM
          150        1.78    8            0.04   0.193   100
          80         1.78    8            0.031  0.395   70
          70         0.87    8            0.014  0.667   60
          110        0.87    8            0.01   0.832   0
          230        0.87    8            0.01   0.99    0
          220        0.87    8            0.01   0.99    0
        Chemical: PHUnits=Water
          Thickness  PH    CEC
          150        6.23  16.7285
          150        6.3   11.66375
          150        6.33  10.6885
          150        6.38  10.1688
          200        6.45  8.95183
          200        6.55  8.52125
          200        6.61  8.3885
          200        6.63  8.3345
          300        6.66  8.26925
          300        6.68  8.1905
          CEC source: Calculated
        Nutrient
        Solute NO3: Thickness=[150, 100, 50, 160, 400, 180, 960]; InitialValues=[0, 0, 0, 0, 0, 0, 0]; InitialValuesUnits=ppm; WaterTableConcentration=0; D0=0; DepthConstant=0; MaxDepthSoluteAccessible=0; RunoffEffectivenessAtMovingSolute=0; MaxEffectiveRunoff=0
        Solute NH4: same as NY 2015 Rye.NY NT 2015 Med SR.Lima Lab Data Med.NO3
        Solute Urea: Thickness=[150, 150, 150, 150, 200, 200, 200, 200, 300, 300]; InitialValues=[0, 0, 0, 0, 0, 0, 0, 0, 0, 0]; InitialValuesUnits=kg/ha; WaterTableConcentration=0; D0=0; DepthConstant=0; MaxDepthSoluteAccessible=0; RunoffEffectivenessAtMovingSolute=0; MaxEffectiveRunoff=0
        SoilTemperature CERESSoilTemperature
        CERESSoilTemperature Temperature
    Zone NY Till 2015 Med SR (disabled): Area=1; Slope=2; AspectAngle=0; Altitude=50
      SurfaceOrganicMatter: InitialResidueName=Wheat; InitialResidueType=wheat; InitialResidueMass=0; InitialStandingFraction=1; InitialCPR=0; InitialCNR=30
      Fertiliser
      Report: EventNames=[Clock].EndOfDay
        VariableNames:
          [Clock].Today.Year
          [Clock].Today
          [Wheat].AboveGround.Wt*10 as rye_bm_kg_ha
          [Soybean].Grain.Wt*10 as soy_kg_ha
          sum([Soil].Water.MM - [Soil].Physical.DULmm) as SoilWaterDeficit
          sum([Soil].SoilWater.ESW[1:5]) as esw
          [Soybean].Phenology.CurrentStageName
          sum([SoilWater].Water[1:5]) as sum_soilwater
          (sum([Soil].SoilWater.ESW[1:5])/(sum([Soil].Physical.DULmm[1:5]-[Soil].Physical.LL15mm[1:5]) as frac_water
          sum([SoilWater].PAWmm[1:3])/sum([Soil].Physical.PAWCmm[1:3]) as fasw_top30
      MicroClimate: a_interception=0; b_interception=1; c_interception=0; d_interception=0; SoilHeatFluxFraction=0.4; MinimumHeightDiffForNewLayer=0; NightInterceptionFraction=0.5; ReferenceHeight=2
      Plant Wheat
        Cultivar CerealRye
          Command:
            [Phenology].Phyllochron.BasePhyllochron.FixedValue = 90
            [Leaf].CohortParameters.MaxArea.AreaLargestLeaves.FixedValue = 4000
            [Phenology].CAMP.FLNparams.MinLN = 7
            [Phenology].CAMP.FLNparams.PpLN = 2
            [Phenology].CAMP.FLNparams.VrnLN = 5
            [Phenology].CAMP.FLNparams.VxPLN = 2
            [Phenology].HeadEmergenceLongDayBase.FixedValue = 110
            [Phenology].HeadEmergencePpSensitivity.FixedValue = 0
            [Phenology].CAMP.EnvData.VrnTreatTemp = 4.4
            [Phenology].CAMP.EnvData.VrnTreatDuration = 60
            [Leaf].Photosynthesis.RUE.FixedValue = 1.24
            [Phenology].Vernalising.Target = 26
      Plant Soybean
        Cultivar Musgrave 1
          Command:
            [Phenology].Vegetative.Target.FixedValue = 340
            [Phenology].EarlyFlowering.Target.FixedValue = 120
            [Phenology].EarlyGrainFilling.Target.FractionofGrainfilling.FixedValue = 0.3
            [Phenology].LateGrainFilling.Target.EntireGrainfillPeriod.FixedValue = 632
            [Phenology].VegetativePhotoperiodModifier.XYPairs.X = 13.84, 18.77
            [Phenology].ReproductivePhotoperiodModifier.XYPairs.X = 13.84, 18.77
      Operations
        2015-06-04  [Soybean].Sow(cultivar: Generic_MG2, population: 62.5, depth: 50, rowSpacing: 760)
        2015-10-12  [Soybean].Harvest
        2015-10-13  [Soybean].EndCrop
      Soil Lima Lab Data Med: ASCOrder=NA; ASCSubOrder=NA; SoilType=Lima Silt Loam; Site=Musgrave; NearestTown=Aurora; Region=Northeast United States; State=New York; Country=United States of America; NaturalVegetation=NA; ApsoilNumber=9999; Latitude=42.625; Longitude=-76.625; LocationAccuracy=+- 250 m; YearOfSampling=1985; DataSource=Soil Lab Data; Comments=Data filled from Soil Lab Data from USDA soil survey
        Water: Thickness=[150, 100, 50, 160, 400, 180]; InitialValues=[0.28, 0.28, 0.279, 0.29, 0.252, 0.272]; FilledFromTop=true
        Physical
          Thickness  ParticleSizeSand  ParticleSizeSilt  ParticleSizeClay  Rocks  BD    AirDry  LL15   DUL    SAT    KS
          150        41.4              41.2              17.4              10     1.38  0.06    0.12   0.28   0.408  864
          100        41.4              41.2              17.4              10     1.38  0.096   0.12   0.28   0.408  864
          50         41.8              38.7              19.5              10     1.46  0.132   0.132  0.279  0.372  864
          160        42.1              34                23.9              10     1.55  0.157   0.157  0.29   0.38   864
          400        38.8              47.6              13.6              15     1.55  0.11    0.11   0.252  0.369  432
          180        38.6              48                13.4              0      1.73  0.155   0.155  0.272  0.325  432
          960        38.6              48                13.4              0      1.73  0.155   0.155  0.272  0.325  432
          SoilCrop WheatSoil: LL=[0.12, 0.12, 0.132, 0.157, 0.11, 0.155, 0.155]; KL=[0.06, 0.06, 0.055, 0.048, 0.039, 0.029, 0.029]; XF=[1, 1, 1, 1, 0.959, 0, 0]
          SoilCrop MaizeSoil: same as NY 2015 Rye.NY Till 2015 Med SR.Lima Lab Data Med.Physical.WheatSoil
          SoilCrop SoybeanSoil: LL=[0.12, 0.12, 0.132, 0.157, 0.11, 0.155, 0.155]; KL=[0.06, 0.06, 0.055, 0.048, 0.039, 0.029, 0.029]; XF=[1, 1, 1, 1, 1, 0, 0]
        WaterBalance SoilWater: SummerDate=1-jun; SummerU=6; SummerCona=4; WinterDate=1-nov; WinterU=6; WinterCona=4; DiffusConst=88; DiffusSlope=35.4; Salb=0.13; CN2Bare=73; CNRed=20; CNCov=0; DischargeWidth=5; CatchmentArea=10; PSIDul=-336.6; Thickness=[150, 80, 70, 110, 230, 220]; SWCON=[0.457, 0.464, 0.47, 0.481, 0.451, 0.469]
        Organic: FOMCNRatio=40; CarbonUnits=Total
          Thickness  Carbon  SoilCNRatio  FBiom  FInert  FOM
          150        1.78    8            0.04   0.193   100
          80         1.78    8            0.031  0.395   70
          70         0.87    8            0.014  0.667   60
          110        0.87    8            0.01   0.832   0
          230        0.87    8            0.01   0.99    0
          220        0.87    8            0.01   0.99    0
        Chemical: PHUnits=Water
          Thickness  PH    CEC
          150        6.23  16.7285
          150        6.3   11.66375
          150        6.33  10.6885
          150        6.38  10.1688
          200        6.45  8.95183
          200        6.55  8.52125
          200        6.61  8.3885
          200        6.63  8.3345
          300        6.66  8.26925
          300        6.68  8.1905
          CEC source: Calculated
        Nutrient
        Solute NO3: Thickness=[150, 150, 150, 150, 200, 200, 200, 200, 300, 300]; InitialValues=[0, 0, 0, 0, 0, 0, 0, 0, 0, 0]; InitialValuesUnits=ppm; WaterTableConcentration=0; D0=0; DepthConstant=0; MaxDepthSoluteAccessible=0; RunoffEffectivenessAtMovingSolute=0; MaxEffectiveRunoff=0
        Solute NH4: same as NY 2015 Rye.NY Till 2015 Med SR.Lima Lab Data Med.NO3
        Solute Urea: Thickness=[150, 150, 150, 150, 200, 200, 200, 200, 300, 300]; InitialValues=[0, 0, 0, 0, 0, 0, 0, 0, 0, 0]; InitialValuesUnits=kg/ha; WaterTableConcentration=0; D0=0; DepthConstant=0; MaxDepthSoluteAccessible=0; RunoffEffectivenessAtMovingSolute=0; MaxEffectiveRunoff=0
        SoilTemperature CERESSoilTemperature
        CERESSoilTemperature Temperature
    Zone NY NT 2015 Med PD (disabled): Area=1; Slope=2; AspectAngle=0; Altitude=50
      SurfaceOrganicMatter: InitialResidueName=Wheat; InitialResidueType=wheat; InitialResidueMass=0; InitialStandingFraction=1; InitialCPR=0; InitialCNR=30
      Fertiliser
      Report: EventNames=[Clock].EndOfDay
        VariableNames:
          [Clock].Today.Year
          [Clock].Today
          [Wheat].AboveGround.Wt*10 as rye_bm_kg_ha
          [Soybean].Grain.Wt*10 as soy_kg_ha
          sum([Soil].Water.MM - [Soil].Physical.DULmm) as SoilWaterDeficit
          sum([Soil].SoilWater.ESW[1:5]) as esw
          sum([SoilWater].Water[1:5]) as sum_soilwater
          (sum([Soil].SoilWater.ESW[1:5])/(sum([Soil].Physical.DULmm[1:5]-[Soil].Physical.LL15mm[1:5]) as frac_water
      MicroClimate: a_interception=0; b_interception=1; c_interception=0; d_interception=0; SoilHeatFluxFraction=0.4; MinimumHeightDiffForNewLayer=0; NightInterceptionFraction=0.5; ReferenceHeight=2
      Plant Wheat: same as NY 2015 Rye.NY Till 2015 Med SR.Wheat
      Plant Soybean: same as NY 2015 Rye.NY Till 2015 Med SR.Soybean
      Operations
        2014-09-24  [SurfaceOrganicMatter].Incorporate(fraction: 1, depth: 150)
        2014-09-29  [Fertiliser].Apply(amount: 122, type: UreaN)
        2014-10-07  [Wheat].Sow(cultivar: CerealRye, population: 547, depth: 25, rowSpacing: 190)
        2015-06-03  [Wheat].EndCrop()
        2015-06-04  [Soybean].Sow(cultivar: Generic_MG2, population: 47.6, depth: 50, rowSpacing: 760)
        2015-10-12  [Soybean].Harvest
        2015-10-12  [Soybean].EndCrop
      Soil Lima Lab Data Med: same as NY 2015 Rye.NY Till 2015 Med SR.Lima Lab Data Med
    Zone NY Till 2015 Med PD (disabled): Area=1; Slope=2; AspectAngle=0; Altitude=50
      SurfaceOrganicMatter: InitialResidueName=Wheat; InitialResidueType=wheat; InitialResidueMass=0; InitialStandingFraction=1; InitialCPR=0; InitialCNR=30
      Fertiliser
      Report: same as NY 2015 Rye.NY Till 2015 Med SR.Report
      MicroClimate: a_interception=0; b_interception=1; c_interception=0; d_interception=0; SoilHeatFluxFraction=0.4; MinimumHeightDiffForNewLayer=0; NightInterceptionFraction=0.5; ReferenceHeight=2
      Plant Wheat: same as NY 2015 Rye.NY Till 2015 Med SR.Wheat
      Plant Soybean: same as NY 2015 Rye.NY Till 2015 Med SR.Soybean
      Operations
        2014-09-24  [SurfaceOrganicMatter].Incorporate(fraction: 1, depth: 150)
        2014-09-29  [Fertiliser].Apply(amount: 122, type: UreaN)
        2015-05-07  [SurfaceOrganicMatter].Incorporate(fraction: 1, depth: 150)
        2015-06-04  [Soybean].Sow(cultivar: Generic_MG2, population: 48.2, depth: 50, rowSpacing: 760)
        2015-10-12  [Soybean].Harvest
        2015-10-13  [Soybean].EndCrop
      Soil Lima Lab Data Med: same as NY 2015 Rye.NY Till 2015 Med SR.Lima Lab Data Med
  Simulation NY 2016
    Weather: FileName=/Users/stw52/Downloads/mus_iem.met
    Clock: Start=2015-01-01; End=2016-11-19
    Summary
    SoilArbitrator
    Zone NY NT 2016 Med PD: Area=1; Slope=3; AspectAngle=0; Altitude=50
      SurfaceOrganicMatter: InitialResidueName=Wheat; InitialResidueType=wheat; InitialResidueMass=0; InitialStandingFraction=1; InitialCPR=0; InitialCNR=30
      Fertiliser
      Report: EventNames=[Clock].EndOfDay
        VariableNames:
          [Clock].Today
          //===== Daily Values
          [Wheat].AboveGround.Wt*10 as rye_bm_kg_ha
          [Soybean].Grain.Wt*10 as soy_kg_ha
          sum([Soil].Water.MM - [Soil].Physical.DULmm) as SoilWaterDeficit
          sum([Soil].Water.MM[1:3] - [Soil].Physical.DULmm[1:3]) as swd
          [Soil].Water.Potential as pot
          [Soil].Water.Volumetric as vwc
          [Soybean].LAI as lai_soy
          [Soybean].CoverTotal as soy_cover
          [Soybean].AboveGround.Wt as soy_biomass
          [Soybean].Leaf.Transpiration as soy_transpiration
          [SoilWater].Es as soil_evap
          sum([SoilWater].ESW) as esw
          (sum([Soil].SoilWater.ESW[1:5])/(sum([Soil].Physical.DULmm[1:5]-[Soil].Physical.LL15mm[1:5]) as frac_water
          sum([SoilWater].PAWmm[1:3])/sum([Soil].Physical.PAWCmm[1:3]) as fasw_top30
      MicroClimate: a_interception=0; b_interception=1; c_interception=0; d_interception=0; SoilHeatFluxFraction=0.4; MinimumHeightDiffForNewLayer=0; NightInterceptionFraction=0.5; ReferenceHeight=2
      Plant Wheat: same as NY 2015 Rye.NY NT 2015 Med SR.Wheat
      Plant Soybean
        Cultivar Musgrave 1
          Command:
            [Phenology].Vegetative.Target.FixedValue = 348
            [Phenology].EarlyFlowering.Target.FixedValue = 120
            [Phenology].EarlyGrainFilling.Target.FractionofGrainfilling.FixedValue = 0.2
            [Phenology].LateGrainFilling.Target.EntireGrainfillPeriod.FixedValue = 300
            [Phenology].VegetativePhotoperiodModifier.XYPairs.X = 13.59, 17.61
            [Phenology].ReproductivePhotoperiodModifier.XYPairs.X = 13.59, 17.61
            [Leaf].Photosynthesis.RUE.FixedValue = 2
      Operations
        2015-09-09  [SurfaceOrganicMatter].Incorporate(fraction: 1, depth: 150)
        2015-10-05  [Fertiliser].Apply(amount: 122, type: UreaN)
        2015-10-07  [Wheat].Sow(cultivar: CerealRye, population: 547, depth: 25, rowSpacing: 190)
        2016-05-26  [Wheat].EndCrop()
        2016-05-31  [Soybean].Sow(cultivar: Generic_MG2, population: 41.4, depth: 50, rowSpacing: 760)
        2016-10-19  [Soybean].Harvest
        2016-10-20  [Soybean].EndCrop
      Soil Lima Lab Data Med: ASCOrder=NA; ASCSubOrder=NA; SoilType=Lima Silt Loam; Site=Musgrave; NearestTown=Aurora; Region=Northeast United States; State=New York; Country=United States of America; NaturalVegetation=NA; ApsoilNumber=9999; Latitude=42.625; Longitude=-76.625; LocationAccuracy=+- 250 m; YearOfSampling=1985; DataSource=Soil Lab Data; Comments=Data filled from Soil Lab Data from USDA soil survey
        Water: Thickness=[150, 100, 50, 160, 400, 180]; InitialValues=[0.28, 0.28, 0.279, 0.29, 0.252, 0.272]; FilledFromTop=true
        Physical: same as NY 2015 Rye.NY NT 2015 Med SR.Lima Lab Data Med.Physical
        WaterBalance SoilWater: same as NY 2015 Rye.NY NT 2015 Med SR.Lima Lab Data Med.SoilWater
        Organic: same as NY 2015 Rye.NY NT 2015 Med SR.Lima Lab Data Med.Organic
        Chemical: same as NY 2015 Rye.NY NT 2015 Med SR.Lima Lab Data Med.Chemical
        Nutrient
        Solute NO3: Thickness=[150, 150, 150, 150, 200, 200, 200, 200, 300, 300]; InitialValues=[0, 0, 0, 0, 0, 0, 0, 0, 0, 0]; InitialValuesUnits=ppm; WaterTableConcentration=0; D0=0; DepthConstant=0; MaxDepthSoluteAccessible=0; RunoffEffectivenessAtMovingSolute=0; MaxEffectiveRunoff=0
        Solute NH4: same as NY 2016.NY NT 2016 Med PD.Lima Lab Data Med.NO3
        Solute Urea: same as NY 2015 Rye.NY NT 2015 Med SR.Lima Lab Data Med.Urea
        SoilTemperature CERESSoilTemperature
        CERESSoilTemperature Temperature
    Zone NY Till 2016 Med PD: Area=1; Slope=3; AspectAngle=0; Altitude=50
      SurfaceOrganicMatter: InitialResidueName=Wheat; InitialResidueType=wheat; InitialResidueMass=0; InitialStandingFraction=1; InitialCPR=0; InitialCNR=30
      Fertiliser
      Report: same as NY 2016.NY NT 2016 Med PD.Report
      MicroClimate: a_interception=0; b_interception=1; c_interception=0; d_interception=0; SoilHeatFluxFraction=0.4; MinimumHeightDiffForNewLayer=0; NightInterceptionFraction=0.5; ReferenceHeight=2
      Plant Wheat: same as NY 2015 Rye.NY NT 2015 Med SR.Wheat
      Plant Soybean: same as NY 2016.NY NT 2016 Med PD.Soybean
      Operations
        2016-04-22  [SurfaceOrganicMatter].Incorporate(fraction: 1, depth: 150)
        2016-05-31  [Soybean].Sow(cultivar: Generic_MG2, population: 73.4, depth: 50, rowSpacing: 760)
        2016-10-19  [Soybean].Harvest
        2016-10-20  [Soybean].EndCrop
      Soil Lima Lab Data Med: same as NY 2016.NY NT 2016 Med PD.Lima Lab Data Med
    Zone NY NT 2016 Med SR: Area=1; Slope=3; AspectAngle=0; Altitude=50
      SurfaceOrganicMatter: InitialResidueName=Wheat; InitialResidueType=wheat; InitialResidueMass=0; InitialStandingFraction=1; InitialCPR=0; InitialCNR=30
      Fertiliser
      Report: same as NY 2016.NY NT 2016 Med PD.Report
      MicroClimate: a_interception=0; b_interception=1; c_interception=0; d_interception=0; SoilHeatFluxFraction=0.4; MinimumHeightDiffForNewLayer=0; NightInterceptionFraction=0.5; ReferenceHeight=2
      Plant Wheat: same as NY 2015 Rye.NY NT 2015 Med SR.Wheat
      Plant Soybean: same as NY 2016.NY NT 2016 Med PD.Soybean
      Operations
        2015-09-09  [SurfaceOrganicMatter].Incorporate(fraction: 1, depth: 150)
        2015-10-05  [Fertiliser].Apply(amount: 122, type: UreaN)
        2015-10-07  [Wheat].Sow(cultivar: CerealRye, population: 547, depth: 25, rowSpacing: 190)
        2016-05-26  [Wheat].EndCrop()
        2016-05-31  [Soybean].Sow(cultivar: Generic_MG2, population: 76.7, depth: 50, rowSpacing: 760)
        2016-10-19  [Soybean].Harvest
        2016-10-20  [Soybean].EndCrop
      Soil Lima Lab Data Med: same as NY 2016.NY NT 2016 Med PD.Lima Lab Data Med
    Zone NY Till 2016 Med SR: Area=1; Slope=3; AspectAngle=0; Altitude=50
      SurfaceOrganicMatter: InitialResidueName=Wheat; InitialResidueType=wheat; InitialResidueMass=0; InitialStandingFraction=1; InitialCPR=0; InitialCNR=30
      Fertiliser
      Report: same as NY 2016.NY NT 2016 Med PD.Report
      MicroClimate: a_interception=0; b_interception=1; c_interception=0; d_interception=0; SoilHeatFluxFraction=0.4; MinimumHeightDiffForNewLayer=0; NightInterceptionFraction=0.5; ReferenceHeight=2
      Plant Wheat: same as NY 2015 Rye.NY NT 2015 Med SR.Wheat
      Plant Soybean: same as NY 2016.NY NT 2016 Med PD.Soybean
      Operations
        2016-04-22  [SurfaceOrganicMatter].Incorporate(fraction: 1, depth: 150)
        2016-05-31  [Soybean].Sow(cultivar: Generic_MG2, population: 76.7, depth: 50, rowSpacing: 760)
        2016-10-19  [Soybean].Harvest
        2016-10-20  [Soybean].EndCrop
      Soil Lima Lab Data Med: same as NY 2016.NY NT 2016 Med PD.Lima Lab Data Med
  Simulation NY 2023
    Weather: FileName=/Users/stw52/Downloads/mus_iem.met
    Clock: Start=2022-01-01; End=2023-11-19
    Summary
    SoilArbitrator
    Zone NY NT 2023 Med PD: Area=1; Slope=2; AspectAngle=0; Altitude=50
      SurfaceOrganicMatter: InitialResidueName=Wheat; InitialResidueType=wheat; InitialResidueMass=0; InitialStandingFraction=1; InitialCPR=0; InitialCNR=30
      Fertiliser
      Report: EventNames=[Clock].EndOfDay
        VariableNames:
          [Clock].Today
          //===== Daily Values
          [Wheat].AboveGround.Wt*10 as rye_bm_kg_ha
          [Soybean].Grain.Wt*10 as soy_kg_ha
          sum([Soil].Water.MM - [Soil].Physical.DULmm) as SoilWaterDeficit
          (sum([Soil].SoilWater.ESW[1:5])/(sum([Soil].Physical.DULmm[1:5]-[Soil].Physical.LL15mm[1:5]) as frac_water
          sum([SoilWater].PAWmm[1:3])/sum([Soil].Physical.PAWCmm[1:3]) as fasw_top30
      MicroClimate: a_interception=0; b_interception=1; c_interception=0; d_interception=0; SoilHeatFluxFraction=0.4; MinimumHeightDiffForNewLayer=0; NightInterceptionFraction=0.5; ReferenceHeight=2
      Plant Wheat: same as NY 2015 Rye.NY NT 2015 Med SR.Wheat
      Plant Soybean: same as NY 2015 Rye.NY NT 2015 Med SR.Soybean
      Operations
        2022-09-11  [SurfaceOrganicMatter].Incorporate(fraction: 1, depth: 150)
        2022-09-15  [Fertiliser].Apply(amount: 109, type: UreaN)
        2022-09-15  [Wheat].Sow(cultivar: CerealRye, population: 121, depth: 20, rowSpacing: 190)
        2023-06-04  [Wheat].EndCrop
        2023-06-05  [Soybean].Sow(cultivar: Generic_MG2, population: 50.7, depth: 50, rowSpacing: 760)
        2023-11-19  [Soybean].Harvest
        2023-11-20  [Soybean].EndCrop
      Soil Lima Lab Data Med: same as NY 2016.NY NT 2016 Med PD.Lima Lab Data Med
    Zone NY Till 2023 Med SR: Area=1; Slope=2; AspectAngle=0; Altitude=50
      SurfaceOrganicMatter: InitialResidueName=Wheat; InitialResidueType=wheat; InitialResidueMass=0; InitialStandingFraction=1; InitialCPR=0; InitialCNR=30
      Fertiliser
      Report: same as NY 2023.NY NT 2023 Med PD.Report
      MicroClimate: a_interception=0; b_interception=1; c_interception=0; d_interception=0; SoilHeatFluxFraction=0.4; MinimumHeightDiffForNewLayer=0; NightInterceptionFraction=0.5; ReferenceHeight=2
      Plant Wheat: same as NY 2015 Rye.NY NT 2015 Med SR.Wheat
      Plant Soybean: same as NY 2015 Rye.NY NT 2015 Med SR.Soybean
      Operations
        2022-09-11  [SurfaceOrganicMatter].Incorporate(fraction: 1, depth: 150)
        2022-09-14  [Fertiliser].Apply(amount: 109, type: UreaN)
        2022-09-15  [Wheat].Sow(cultivar: CerealRye, population: 121, depth: 50, rowSpacing: 190)
        2023-05-12  [Wheat].EndCrop
        2023-06-02  [SurfaceOrganicMatter].Incorporate(fraction: 0.2, depth: 100)
        2023-06-05  [Soybean].Sow(cultivar: Generic_MG2, population: 61.8, depth: 50, rowSpacing: 760)
        2023-11-19  [Soybean].Harvest
        2023-11-20  [Soybean].EndCrop
      Soil Lima Lab Data Med: same as NY 2016.NY NT 2016 Med PD.Lima Lab Data Med
    Zone NY NT 2023 Med SR: Area=1; Slope=2; AspectAngle=0; Altitude=50
      SurfaceOrganicMatter: InitialResidueName=Wheat; InitialResidueType=wheat; InitialResidueMass=0; InitialStandingFraction=1; InitialCPR=0; InitialCNR=30
      Fertiliser
      Report: same as NY 2023.NY NT 2023 Med PD.Report
      MicroClimate: a_interception=0; b_interception=1; c_interception=0; d_interception=0; SoilHeatFluxFraction=0.4; MinimumHeightDiffForNewLayer=0; NightInterceptionFraction=0.5; ReferenceHeight=2
      Plant Wheat: same as NY 2015 Rye.NY NT 2015 Med SR.Wheat
      Plant Soybean: same as NY 2015 Rye.NY NT 2015 Med SR.Soybean
      Operations
        2022-09-11  [SurfaceOrganicMatter].Incorporate(fraction: 1, depth: 150)
        2022-09-15  [Fertiliser].Apply(amount: 109, type: UreaN)
        2022-09-15  [Wheat].Sow(cultivar: CerealRye, population: 121, depth: 20, rowSpacing: 190)
        2023-06-04  [Wheat].EndCrop
        2023-06-05  [Soybean].Sow(cultivar: Generic_MG2, population: 61.8, depth: 50, rowSpacing: 760)
        2023-11-19  [Soybean].Harvest
        2023-11-20  [Soybean].EndCrop
      Soil Lima Lab Data Med: same as NY 2016.NY NT 2016 Med PD.Lima Lab Data Med
    Zone NY Till 2023 Med PD: Area=1; Slope=2; AspectAngle=0; Altitude=50
      SurfaceOrganicMatter: InitialResidueName=Wheat; InitialResidueType=wheat; InitialResidueMass=0; InitialStandingFraction=1; InitialCPR=0; InitialCNR=30
      Fertiliser
      Report: same as NY 2023.NY NT 2023 Med PD.Report
      MicroClimate: a_interception=0; b_interception=1; c_interception=0; d_interception=0; SoilHeatFluxFraction=0.4; MinimumHeightDiffForNewLayer=0; NightInterceptionFraction=0.5; ReferenceHeight=2
      Plant Wheat: same as NY 2015 Rye.NY NT 2015 Med SR.Wheat
      Plant Soybean: same as NY 2015 Rye.NY NT 2015 Med SR.Soybean
      Operations
        2022-09-11  [SurfaceOrganicMatter].Incorporate(fraction: 1, depth: 150)
        2022-09-14  [Fertiliser].Apply(amount: 109, type: UreaN)
        2022-09-15  [Wheat].Sow(cultivar: CerealRye, population: 121, depth: 50, rowSpacing: 190)
        2023-05-12  [Wheat].EndCrop
        2023-06-02  [SurfaceOrganicMatter].Incorporate(fraction: 0.2, depth: 100)
        2023-06-05  [Soybean].Sow(cultivar: Generic_MG2, population: 57.3, depth: 50, rowSpacing: 760)
        2023-11-19  [Soybean].Harvest
        2023-11-20  [Soybean].EndCrop
      Soil Lima Lab Data Med: same as NY 2016.NY NT 2016 Med PD.Lima Lab Data Med
  Simulation NY 2024
    Weather: FileName=/Users/stw52/Downloads/mus_iem.met
    Clock: Start=2023-01-01; End=2024-11-19
    Summary
    SoilArbitrator
    Zone NY Till 2024 Med PD: Area=1; Slope=2; AspectAngle=0; Altitude=50
      SurfaceOrganicMatter: InitialResidueName=Wheat; InitialResidueType=wheat; InitialResidueMass=0; InitialStandingFraction=1; InitialCPR=0; InitialCNR=30
      Fertiliser
      Report: EventNames=[Clock].EndOfDay
        VariableNames:
          [Clock].Today
          //===== Daily Values
          [Soybean].Grain.Wt*10 as soy_kg_ha
          sum([Soil].Water.MM - [Soil].Physical.DULmm) as SoilWaterDeficit
          [Wheat].Phenology.Zadok
          (sum([Soil].SoilWater.ESW[1:5])/(sum([Soil].Physical.DULmm[1:5]-[Soil].Physical.LL15mm[1:5]) as frac_water
          sum([SoilWater].PAWmm[1:3])/sum([Soil].Physical.PAWCmm[1:3]) as fasw_top30
      MicroClimate: a_interception=0; b_interception=1; c_interception=0; d_interception=0; SoilHeatFluxFraction=0.4; MinimumHeightDiffForNewLayer=0; NightInterceptionFraction=0.5; ReferenceHeight=2
      Plant Wheat: same as NY 2015 Rye.NY NT 2015 Med SR.Wheat
      Plant Soybean: same as NY 2015 Rye.NY NT 2015 Med SR.Soybean
      Operations
        2024-05-14  [SurfaceOrganicMatter].Incorporate(fraction: 1, depth: 150)
        2024-05-20  [SurfaceOrganicMatter].Incorporate(fraction: 0.2, depth: 100)
        2024-05-23  [Soybean].Sow(cultivar: Generic_MG2, population: 61.7, depth: 25, rowSpacing: 760)
        2024-10-26  [Soybean].Harvest
        2024-10-27  [Soybean].EndCrop
      Soil Lima Lab Data Med: same as NY 2016.NY NT 2016 Med PD.Lima Lab Data Med
    Zone NY NT 2024 Med SR: Area=1; Slope=2; AspectAngle=0; Altitude=50
      SurfaceOrganicMatter: InitialResidueName=Wheat; InitialResidueType=wheat; InitialResidueMass=0; InitialStandingFraction=1; InitialCPR=0; InitialCNR=30
      Fertiliser
      Report: same as NY 2023.NY NT 2023 Med PD.Report
      MicroClimate: a_interception=0; b_interception=1; c_interception=0; d_interception=0; SoilHeatFluxFraction=0.4; MinimumHeightDiffForNewLayer=0; NightInterceptionFraction=0.5; ReferenceHeight=2
      Plant Wheat: same as NY 2015 Rye.NY NT 2015 Med SR.Wheat
      Plant Soybean: same as NY 2015 Rye.NY NT 2015 Med SR.Soybean
      Operations
        2023-09-11  [SurfaceOrganicMatter].Incorporate(fraction: 1, depth: 150)
        2023-09-15  [Fertiliser].Apply(amount: 109, type: UreaN)
        2023-09-15  [Wheat].Sow(cultivar: CerealRye, population: 121, depth: 20, rowSpacing: 190)
        2024-05-22  [Wheat].EndCrop
        2024-05-23  [Soybean].Sow(cultivar: Generic_MG2, population: 61.8, depth: 25, rowSpacing: 760)
        2024-10-26  [Soybean].Harvest
        2024-10-27  [Soybean].EndCrop
      Soil Lima Lab Data Med: same as NY 2016.NY NT 2016 Med PD.Lima Lab Data Med
    Zone NY Till 2024 Med SR: Area=1; Slope=2; AspectAngle=0; Altitude=50
      SurfaceOrganicMatter: InitialResidueName=Wheat; InitialResidueType=wheat; InitialResidueMass=0; InitialStandingFraction=1; InitialCPR=0; InitialCNR=30
      Fertiliser
      Report: same as NY 2024.NY Till 2024 Med PD.Report
      MicroClimate: a_interception=0; b_interception=1; c_interception=0; d_interception=0; SoilHeatFluxFraction=0.4; MinimumHeightDiffForNewLayer=0; NightInterceptionFraction=0.5; ReferenceHeight=2
      Plant Wheat: same as NY 2015 Rye.NY NT 2015 Med SR.Wheat
      Plant Soybean: same as NY 2015 Rye.NY NT 2015 Med SR.Soybean
      Operations
        2024-05-14  [SurfaceOrganicMatter].Incorporate(fraction: 1, depth: 150)
        2024-05-20  [SurfaceOrganicMatter].Incorporate(fraction: 0.2, depth: 100)
        2024-05-23  [Soybean].Sow(cultivar: Generic_MG2, population: 61.8, depth: 25, rowSpacing: 760)
        2024-10-26  [Soybean].Harvest
        2024-10-27  [Soybean].EndCrop
      Soil Lima Lab Data Med: same as NY 2016.NY NT 2016 Med PD.Lima Lab Data Med
    Zone NY NT 2024 Med PD: Area=1; Slope=2; AspectAngle=0; Altitude=50
      SurfaceOrganicMatter: InitialResidueName=Wheat; InitialResidueType=wheat; InitialResidueMass=0; InitialStandingFraction=1; InitialCPR=0; InitialCNR=30
      Fertiliser
      Report: same as NY 2023.NY NT 2023 Med PD.Report
      MicroClimate: a_interception=0; b_interception=1; c_interception=0; d_interception=0; SoilHeatFluxFraction=0.4; MinimumHeightDiffForNewLayer=0; NightInterceptionFraction=0.5; ReferenceHeight=2
      Plant Wheat: same as NY 2015 Rye.NY NT 2015 Med SR.Wheat
      Plant Soybean: same as NY 2015 Rye.NY NT 2015 Med SR.Soybean
      Operations
        2023-09-11  [SurfaceOrganicMatter].Incorporate(fraction: 1, depth: 150)
        2023-09-15  [Fertiliser].Apply(amount: 109, type: UreaN)
        2023-09-15  [Wheat].Sow(cultivar: CerealRye, population: 121, depth: 20, rowSpacing: 190)
        2024-05-22  [Wheat].EndCrop
        2024-05-23  [Soybean].Sow(cultivar: Generic_MG2, population: 55.8, depth: 25, rowSpacing: 760)
        2024-10-26  [Soybean].Harvest
        2024-10-27  [Soybean].EndCrop
      Soil Lima Lab Data Med: same as NY 2016.NY NT 2016 Med PD.Lima Lab Data Med
  Simulation WI 2015
    Weather: FileName=/Users/stw52/Downloads/aars_iem.met
    Clock: Start=2014-01-01; End=2015-11-19
    Summary
    SoilArbitrator
    Zone WI NT 2015 Med PD: Area=1; Slope=2; AspectAngle=0; Altitude=50
      SurfaceOrganicMatter: InitialResidueName=Wheat; InitialResidueType=wheat; InitialResidueMass=0; InitialStandingFraction=1; InitialCPR=0; InitialCNR=30
      Fertiliser
      Report: EventNames=[Clock].EndOfDay
        VariableNames:
          [Clock].Today
          //===== Daily Values
          [Wheat].AboveGround.Wt*10 as rye_bm_kg_ha
          [Soybean].Grain.Wt*10 as soy_kg_ha
          sum([Soil].Water.MM - [Soil].Physical.DULmm) as SoilWaterDeficit
          [Soil].Water.Potential
          (sum([Soil].SoilWater.ESW)/(sum([Soil].Physical.DULmm-[Soil].Physical.LL15mm) as frac_water
          [Soybean].IsEmerged as emg_tf
      MicroClimate: a_interception=0; b_interception=1; c_interception=0; d_interception=0; SoilHeatFluxFraction=0.4; MinimumHeightDiffForNewLayer=0; NightInterceptionFraction=0.5; ReferenceHeight=2
      Plant Wheat: same as NY 2015 Rye.NY NT 2015 Med SR.Wheat
      Plant Soybean: same as NY 2015 Rye.NY NT 2015 Med SR.Soybean
      Operations
        2014-09-10  [SurfaceOrganicMatter].Incorporate(fraction: 1, depth: 150)
        2014-09-11  [Fertiliser].Apply(amount: 122, type: UreaN)
        2014-09-18  [Wheat].Sow(cultivar: CerealRye, population: 547, depth: 25, rowSpacing: 190)
        2015-06-02  [Wheat].EndCrop()
        2015-06-03  [Soybean].Sow(cultivar: Generic_MG1, population: 40, depth: 50, rowSpacing: 760)
        2015-10-17  [Soybean].Harvest
        2015-10-18  [Soybean].EndCrop
      Soil Plano Lab Data Med: SoilType=0; Region=Pierce; State=Wisconsin; Country=US; ApsoilNumber=221; Latitude=44.64; Longitude=-92.453; YearOfSampling=2015; Comments=0
        DataSource:
          Original data by http://websoilsurvey.sc.egov.usda.gov/App/HomePage.htm
          Profile developed by Integrated Cropping Systems Lab, Department of Agronomy, ISU
        Physical
          Thickness  ParticleSizeSand  ParticleSizeSilt  ParticleSizeClay  Rocks  BD    AirDry  LL15   DUL    SAT    KS
          150        3.9               71.7              24.4              0      1.34  0.0575  0.115  0.327  0.435  171
          50         3.9               71.7              24.4              0      1.34  0.0575  0.115  0.327  0.435  171
          180        3.4               73.6              23                0      1.42  0.112   0.14   0.354  0.44   126
          130        3.8               77                19.2              0      1.42  0.114   0.114  0.319  0.428  97.2
          150        3.6               70.6              25.8              0      1.42  0.148   0.148  0.344  0.413  124
          280        3.2               65.9              30.9              0      1.42  0.174   0.174  0.362  0.418  68.4
          180        3.5               68.4              28.1              0      1.45  0.2     0.2    0.391  0.452  197
          380        12.6              64.6              22.8              0      1.6   0.148   0.148  0.306  0.38   67.1
          130        50.4              35.1              14.5              0      1.5   0.113   0.113  0.236  0.354  83.5
          150        62.4              24.6              13                0      1.5   0.098   0.098  0.218  0.372  284
          120        72.4              20.7              6.9               0      1.5   0.074   0.074  0.168  0.371  685
          310        72.9              22.2              4.9               0      1.5   0.065   0.065  0.154  0.387  616
          300        72.4              23.1              4.5               0      1.5   0.072   0.072  0.162  0.364  578
          Rocks source: Calculated (layer 1, 2, 3, 4, 5, 6)
          SoilCrop maizeSoil
            LL=[0.115, 0.115, 0.14, 0.114, 0.148, 0.174, 0.2, 0.148, 0.113, 0.098, 0.074, 0.065, 0.072]
            KL=[0.08, 0.069, 0.064, 0.057, 0.049, 0.035, 0.06, 0.06, 0.06, 0.06, 0.06, 0.06, 0.06]
            XF=[1, 1, 1, 1, 1, 1, 1, 1, 1, 1, 1, 1, 1]
            KL, XF source: Calculated (layer 7, 8, 9, 10, 11, 12, 13)
          SoilCrop soybeanSoil
            LL=[0.115, 0.115, 0.14, 0.114, 0.148, 0.174, 0.2, 0.148, 0.113, 0.098, 0.074, 0.065, 0.072]
            KL=[0.06, 0.049, 0.04, 0.032, 0.026, 0.022, 0.01, 0.06, 0.06, 0.06, 0.06, 0.06, 0.06]
            XF=[1, 1, 1, 1, 1, 1, 1, 1, 1, 1, 1, 1, 1]
            KL source: Calculated (layer 8, 9, 10, 11, 12, 13)
            XF source: Calculated (layer 7, 8, 9, 10, 11, 12, 13)
          SoilCrop wheatSoil
            LL=[0.115, 0.115, 0.14, 0.114, 0.148, 0.174, 0.2, 0.148, 0.113, 0.098, 0.074, 0.065, 0.072]
            KL=[0.06, 0.049, 0.04, 0.032, 0.026, 0.022, 0.01, 0.06, 0.06, 0.06, 0.06, 0.06, 0.06]
            XF=[1, 1, 1, 1, 1, 1, 1, 1, 1, 1, 1, 1, 1]
            KL source: Calculated (layer 1, 8, 9, 10, 11, 12, 13)
            XF source: Calculated
        WaterBalance SoilWater: SummerDate=1-jun; SummerU=7; SummerCona=3; WinterDate=1-nov; WinterU=7.275; WinterCona=3.575; DiffusConst=84; DiffusSlope=35.4; Salb=0.17; CN2Bare=73; CNRed=20; CNCov=0.8; PSIDul=-100
          Thickness=[150, 50, 180, 130, 150, 280, 180, 380, 130, 150, 120, 310, 300]
          SWCON=[0.45, 0.45, 0.45, 0.45, 0.45, 0.45, 0.45, 0.45, 0.45, 0.45, 0.45, 0.45, 0.45]
        Organic: FOMCNRatio=40; CarbonUnits=Total
          Thickness  Carbon  SoilCNRatio  FBiom  FInert  FOM
          150        2.5     12           0.04   0.8     150
          50         2.5     12           0.032  0.81    122
          180        2.32    12           0.027  0.82    100.5
          130        0.36    12           0.022  0.82    82
          150        0.26    12           0.018  0.83    67.4
          280        0.26    12           0.015  0.84    55.2
          180        0.26    12           0.012  0.85    45.2
          380        0.26    12           0.009  0.86    37
          130        0.18    12           0.08   0.87    30
          150        0.18    12           0.08   0.87    25
          120        0.18    12           0.08   0.87    20
          310        0.18    12           0.08   0.87    15
          300        0.18    12           0.08   0.87    10
        Chemical: PHUnits=Water
          Thickness  PH   CEC
          150        6.6  9.502
          50         6.5  9.748
          180        6    9.825
          130        6    9.281
          150        6    9.032
          280        6    8.816
          180        7.6  8.17
          380        7.6  8.17
          130        7.6  8.17
          150        7.6  8.18
          120        7.6  8.17
          310        7.6  8.17
          300        7.6  8.17
          CEC source: Calculated (layer 1, 2, 3, 4, 5, 6, 7)
        Nutrient
        Solute NO3: InitialValues=[0, 0, 0, 0, 0, 0, 0, 0, 0, 0, 0, 0, 0]; InitialValuesUnits=ppm; WaterTableConcentration=0; D0=0; Exco=[1, 1, 1, 1, 1, 1]; FIP=[1, 1, 1, 1, 1, 1]; DepthConstant=0; MaxDepthSoluteAccessible=0; RunoffEffectivenessAtMovingSolute=0; MaxEffectiveRunoff=0
          Thickness=[150, 50, 180, 130, 150, 280, 180, 380, 130, 150, 120, 310, 300]
        Solute NH4: same as WI 2015.WI NT 2015 Med PD.Plano Lab Data Med.NO3
        Solute Urea: InitialValues=[0, 0, 0, 0, 0, 0, 0, 0, 0, 0, 0, 0, 0]; InitialValuesUnits=kg/ha; WaterTableConcentration=0; D0=0; Exco=[1, 1, 1, 1, 1, 1]; FIP=[1, 1, 1, 1, 1, 1]; DepthConstant=0; MaxDepthSoluteAccessible=0; RunoffEffectivenessAtMovingSolute=0; MaxEffectiveRunoff=0
          Thickness=[150, 50, 180, 130, 150, 280, 180, 380, 130, 150, 120, 310, 300]
        Water: FilledFromTop=true
          Thickness=[150, 50, 180, 130, 150, 280, 180, 380, 130, 150, 120, 310, 300]
          InitialValues=[0.327, 0.327, 0.354, 0.319, 0.344, 0.362, 0.391, 0.306, 0.236, 0.218, 0.168, 0.154, 0.162]
        SoilTemperature Temperature
    Zone WI Till 2015 Med SR: Area=1; Slope=2; AspectAngle=0; Altitude=50
      SurfaceOrganicMatter: InitialResidueName=Wheat; InitialResidueType=wheat; InitialResidueMass=0; InitialStandingFraction=1; InitialCPR=0; InitialCNR=30
      Fertiliser
      Report: EventNames=[Clock].EndOfDay
        VariableNames:
          [Clock].Today
          //===== Daily Values
          [Soybean].Grain.Wt*10 as soy_kg_ha
          sum([Soil].Water.MM - [Soil].Physical.DULmm) as SoilWaterDeficit
          [Soil].Water.Volumetric
          [Soil].Water.Potential
          (sum([Soil].SoilWater.ESW)/(sum([Soil].Physical.DULmm-[Soil].Physical.LL15mm) as frac_water
          [Soybean].IsEmerged as emg_tf
      MicroClimate: a_interception=0; b_interception=1; c_interception=0; d_interception=0; SoilHeatFluxFraction=0.4; MinimumHeightDiffForNewLayer=0; NightInterceptionFraction=0.5; ReferenceHeight=2
      Plant Wheat: same as NY 2015 Rye.NY NT 2015 Med SR.Wheat
      Plant Soybean: same as NY 2015 Rye.NY NT 2015 Med SR.Soybean
      Operations
        2015-06-01  [SurfaceOrganicMatter].Incorporate(fraction: 1, depth: 150)
        2015-06-03  [Soybean].Sow(cultivar: Generic_MG1, population: 57.8, depth: 50, rowSpacing: 760)
        2015-10-17  [Soybean].Harvest
        2015-10-18  [Soybean].EndCrop
      Soil Plano Lab Data Med: same as WI 2015.WI NT 2015 Med PD.Plano Lab Data Med
    Zone WI Till 2015 Med PD: Area=1; Slope=2; AspectAngle=0; Altitude=50
      SurfaceOrganicMatter: InitialResidueName=Wheat; InitialResidueType=wheat; InitialResidueMass=0; InitialStandingFraction=1; InitialCPR=0; InitialCNR=30
      Fertiliser
      Report: same as WI 2015.WI Till 2015 Med SR.Report
      MicroClimate: a_interception=0; b_interception=1; c_interception=0; d_interception=0; SoilHeatFluxFraction=0.4; MinimumHeightDiffForNewLayer=0; NightInterceptionFraction=0.5; ReferenceHeight=2
      Plant Wheat: same as NY 2015 Rye.NY NT 2015 Med SR.Wheat
      Plant Soybean: same as NY 2015 Rye.NY NT 2015 Med SR.Soybean
      Operations
        2015-06-01  [SurfaceOrganicMatter].Incorporate(fraction: 1, depth: 150)
        2015-06-03  [Soybean].Sow(cultivar: Generic_MG1, population: 41.3, depth: 50, rowSpacing: 760)
        2015-10-17  [Soybean].Harvest
        2015-10-18  [Soybean].EndCrop
      Soil Plano Lab Data Med: same as WI 2015.WI NT 2015 Med PD.Plano Lab Data Med
    Zone WI NT 2015 Med SR: Area=1; Slope=2; AspectAngle=0; Altitude=50
      SurfaceOrganicMatter: InitialResidueName=Wheat; InitialResidueType=wheat; InitialResidueMass=0; InitialStandingFraction=1; InitialCPR=0; InitialCNR=30
      Fertiliser
      Report: same as WI 2015.WI NT 2015 Med PD.Report
      MicroClimate: a_interception=0; b_interception=1; c_interception=0; d_interception=0; SoilHeatFluxFraction=0.4; MinimumHeightDiffForNewLayer=0; NightInterceptionFraction=0.5; ReferenceHeight=2
      Plant Wheat: same as NY 2015 Rye.NY NT 2015 Med SR.Wheat
      Plant Soybean: same as NY 2015 Rye.NY NT 2015 Med SR.Soybean
      Operations
        2014-09-10  [SurfaceOrganicMatter].Incorporate(fraction: 1, depth: 150)
        2014-09-11  [Fertiliser].Apply(amount: 122, type: UreaN)
        2014-09-18  [Wheat].Sow(cultivar: CerealRye, population: 547, depth: 25, rowSpacing: 190)
        2015-06-02  [Wheat].EndCrop()
        2015-06-03  [Soybean].Sow(cultivar: Generic_MG1, population: 57.8, depth: 50, rowSpacing: 760)
        2015-10-17  [Soybean].Harvest
        2015-10-18  [Soybean].EndCrop
      Soil Plano Lab Data Med: same as WI 2015.WI NT 2015 Med PD.Plano Lab Data Med
  Simulation WI 2017
    Weather: FileName=/Users/stw52/Downloads/aars_iem.met
    Clock: Start=2016-01-01; End=2017-11-19
    Summary
    SoilArbitrator
    Zone WI NT 2017 Med PD: Area=1; Slope=2; AspectAngle=0; Altitude=50
      SurfaceOrganicMatter: InitialResidueName=Wheat; InitialResidueType=wheat; InitialResidueMass=0; InitialStandingFraction=1; InitialCPR=0; InitialCNR=30
      Fertiliser
      Report: EventNames=[Clock].EndOfDay
        VariableNames:
          [Clock].Today
          //===== Daily Values
          [Wheat].AboveGround.Wt*10 as rye_bm_kg_ha
          [Soybean].Grain.Wt*10 as soy_kg_ha
          sum([Soil].Water.MM - [Soil].Physical.DULmm) as SoilWaterDeficit
          (sum([Soil].SoilWater.ESW)/(sum([Soil].Physical.DULmm-[Soil].Physical.LL15mm) as frac_water
      MicroClimate: a_interception=0; b_interception=1; c_interception=0; d_interception=0; SoilHeatFluxFraction=0.4; MinimumHeightDiffForNewLayer=0; NightInterceptionFraction=0.5; ReferenceHeight=2
      Plant Wheat: same as NY 2015 Rye.NY NT 2015 Med SR.Wheat
      Plant Soybean: same as NY 2015 Rye.NY NT 2015 Med SR.Soybean
      Operations
        2016-09-10  [SurfaceOrganicMatter].Incorporate(fraction: 1, depth: 150)
        2016-09-11  [Fertiliser].Apply(amount: 122, type: UreaN)
        2016-09-19  [Wheat].Sow(cultivar: CerealRye, population: 547, depth: 25, rowSpacing: 190)
        2017-05-31  [Wheat].EndCrop()
        2017-06-01  [Soybean].Sow(cultivar: Generic_MG1, population: 23.18, depth: 50, rowSpacing: 760)
        2017-10-19  [Soybean].Harvest
        2017-10-20  [Soybean].EndCrop
      Soil Plano Lab Data Med: same as WI 2015.WI NT 2015 Med PD.Plano Lab Data Med
    Zone WI Till 2017 Med SR: Area=1; Slope=2; AspectAngle=0; Altitude=50
      SurfaceOrganicMatter: InitialResidueName=Wheat; InitialResidueType=wheat; InitialResidueMass=0; InitialStandingFraction=1; InitialCPR=0; InitialCNR=30
      Fertiliser
      Report: EventNames=[Clock].EndOfDay
        VariableNames:
          [Clock].Today
          //===== Daily Values
          [Soybean].Grain.Wt*10 as soy_kg_ha
          sum([Soil].Water.MM - [Soil].Physical.DULmm) as SoilWaterDeficit
          [Soil].Water.Volumetric
          (sum([Soil].SoilWater.ESW)/(sum([Soil].Physical.DULmm-[Soil].Physical.LL15mm) as frac_water
      MicroClimate: a_interception=0; b_interception=1; c_interception=0; d_interception=0; SoilHeatFluxFraction=0.4; MinimumHeightDiffForNewLayer=0; NightInterceptionFraction=0.5; ReferenceHeight=2
      Plant Wheat: same as NY 2015 Rye.NY NT 2015 Med SR.Wheat
      Plant Soybean: same as NY 2015 Rye.NY NT 2015 Med SR.Soybean
      Operations
        2017-05-30  [SurfaceOrganicMatter].Incorporate(fraction: 1, depth: 150)
        2017-06-01  [Soybean].Sow(cultivar: Generic_MG1, population: 55.6, depth: 50, rowSpacing: 760)
        2017-10-19  [Soybean].Harvest
        2017-10-20  [Soybean].EndCrop
      Soil Plano Lab Data Med: same as WI 2015.WI NT 2015 Med PD.Plano Lab Data Med
    Zone WI NT 2017 Med SR: Area=1; Slope=2; AspectAngle=0; Altitude=50
      SurfaceOrganicMatter: InitialResidueName=Wheat; InitialResidueType=wheat; InitialResidueMass=0; InitialStandingFraction=1; InitialCPR=0; InitialCNR=30
      Fertiliser
      Report: same as WI 2017.WI NT 2017 Med PD.Report
      MicroClimate: a_interception=0; b_interception=1; c_interception=0; d_interception=0; SoilHeatFluxFraction=0.4; MinimumHeightDiffForNewLayer=0; NightInterceptionFraction=0.5; ReferenceHeight=2
      Plant Wheat: same as NY 2015 Rye.NY NT 2015 Med SR.Wheat
      Plant Soybean: same as NY 2015 Rye.NY NT 2015 Med SR.Soybean
      Operations
        2016-09-10  [SurfaceOrganicMatter].Incorporate(fraction: 1, depth: 150)
        2016-09-11  [Fertiliser].Apply(amount: 122, type: UreaN)
        2016-09-19  [Wheat].Sow(cultivar: CerealRye, population: 547, depth: 25, rowSpacing: 190)
        2017-05-31  [Wheat].EndCrop()
        2017-06-01  [Soybean].Sow(cultivar: Generic_MG1, population: 55.6, depth: 50, rowSpacing: 760)
        2017-10-19  [Soybean].Harvest
        2017-10-20  [Soybean].EndCrop
      Soil Plano Lab Data Med: same as WI 2015.WI NT 2015 Med PD.Plano Lab Data Med
    Zone WI Till 2017 Med PD: Area=1; Slope=2; AspectAngle=0; Altitude=50
      SurfaceOrganicMatter: InitialResidueName=Wheat; InitialResidueType=wheat; InitialResidueMass=0; InitialStandingFraction=1; InitialCPR=0; InitialCNR=30
      Fertiliser
      Report: same as WI 2017.WI Till 2017 Med SR.Report
      MicroClimate: a_interception=0; b_interception=1; c_interception=0; d_interception=0; SoilHeatFluxFraction=0.4; MinimumHeightDiffForNewLayer=0; NightInterceptionFraction=0.5; ReferenceHeight=2
      Plant Wheat: same as NY 2015 Rye.NY NT 2015 Med SR.Wheat
      Plant Soybean: same as NY 2015 Rye.NY NT 2015 Med SR.Soybean
      Operations
        2017-05-30  [SurfaceOrganicMatter].Incorporate(fraction: 1, depth: 150)
        2017-06-01  [Soybean].Sow(cultivar: Generic_MG1, population: 36.6, depth: 50, rowSpacing: 760)
        2017-10-19  [Soybean].Harvest
        2017-10-20  [Soybean].EndCrop
      Soil Plano Lab Data Med: same as WI 2015.WI NT 2015 Med PD.Plano Lab Data Med
  Simulation WI 2018
    Weather: FileName=/Users/stw52/Downloads/aars_iem.met
    Clock: Start=2017-01-01; End=2018-11-19
    Summary
    SoilArbitrator
    Zone WI NT 2018 Med PD: Area=1; Slope=2; AspectAngle=0; Altitude=50
      SurfaceOrganicMatter: InitialResidueName=Wheat; InitialResidueType=wheat; InitialResidueMass=0; InitialStandingFraction=1; InitialCPR=0; InitialCNR=30
      Fertiliser
      Report: same as WI 2017.WI NT 2017 Med PD.Report
      MicroClimate: a_interception=0; b_interception=1; c_interception=0; d_interception=0; SoilHeatFluxFraction=0.4; MinimumHeightDiffForNewLayer=0; NightInterceptionFraction=0.5; ReferenceHeight=2
      Plant Wheat: same as NY 2015 Rye.NY NT 2015 Med SR.Wheat
      Plant Soybean: same as NY 2015 Rye.NY NT 2015 Med SR.Soybean
      Operations
        2017-09-24  [SurfaceOrganicMatter].Incorporate(fraction: 1, depth: 150)
        2017-09-25  [Fertiliser].Apply(amount: 122, type: UreaN)
        2017-10-02  [Wheat].Sow(cultivar: CerealRye, population: 747, depth: 25, rowSpacing: 190)
        2018-06-05  [Wheat].EndCrop()
        2018-06-06  [Soybean].Sow(cultivar: Generic_MG1, population: 36.9, depth: 50, rowSpacing: 760)
        2018-11-19  [Soybean].Harvest
        2018-11-20  [Soybean].EndCrop
      Soil Plano Lab Data Med: same as WI 2015.WI NT 2015 Med PD.Plano Lab Data Med
    Zone WI Till 2018 Med PD: Area=1; Slope=2; AspectAngle=0; Altitude=50
      SurfaceOrganicMatter: InitialResidueName=Wheat; InitialResidueType=wheat; InitialResidueMass=0; InitialStandingFraction=1; InitialCPR=0; InitialCNR=30
      Fertiliser
      Report: same as WI 2017.WI Till 2017 Med SR.Report
      MicroClimate: a_interception=0; b_interception=1; c_interception=0; d_interception=0; SoilHeatFluxFraction=0.4; MinimumHeightDiffForNewLayer=0; NightInterceptionFraction=0.5; ReferenceHeight=2
      Plant Wheat: same as NY 2015 Rye.NY NT 2015 Med SR.Wheat
      Plant Soybean: same as NY 2015 Rye.NY NT 2015 Med SR.Soybean
      Operations
        2018-06-01  [SurfaceOrganicMatter].Incorporate(fraction: 1, depth: 150)
        2018-06-06  [Soybean].Sow(cultivar: Generic_MG1, population: 45.4, depth: 50, rowSpacing: 760)
        2018-11-19  [Soybean].Harvest
        2018-11-20  [Soybean].EndCrop
      Soil Plano Lab Data Med: same as WI 2015.WI NT 2015 Med PD.Plano Lab Data Med
    Zone WI NT 2018 Med SR: Area=1; Slope=2; AspectAngle=0; Altitude=50
      SurfaceOrganicMatter: InitialResidueName=Wheat; InitialResidueType=wheat; InitialResidueMass=0; InitialStandingFraction=1; InitialCPR=0; InitialCNR=30
      Fertiliser
      Report: same as WI 2017.WI NT 2017 Med PD.Report
      MicroClimate: a_interception=0; b_interception=1; c_interception=0; d_interception=0; SoilHeatFluxFraction=0.4; MinimumHeightDiffForNewLayer=0; NightInterceptionFraction=0.5; ReferenceHeight=2
      Plant Wheat: same as NY 2015 Rye.NY NT 2015 Med SR.Wheat
      Plant Soybean: same as NY 2015 Rye.NY NT 2015 Med SR.Soybean
      Operations
        2017-09-24  [SurfaceOrganicMatter].Incorporate(fraction: 1, depth: 150)
        2017-09-25  [Fertiliser].Apply(amount: 122, type: UreaN)
        2017-10-02  [Wheat].Sow(cultivar: CerealRye, population: 747, depth: 25, rowSpacing: 190)
        2018-06-05  [Wheat].EndCrop()
        2018-06-06  [Soybean].Sow(cultivar: Generic_MG1, population: 55.6, depth: 50, rowSpacing: 760)
        2018-11-19  [Soybean].Harvest
        2018-11-20  [Soybean].EndCrop
      Soil Plano Lab Data Med: same as WI 2015.WI NT 2015 Med PD.Plano Lab Data Med
    Zone WI Till 2018 Med SR: Area=1; Slope=2; AspectAngle=0; Altitude=50
      SurfaceOrganicMatter: InitialResidueName=Wheat; InitialResidueType=wheat; InitialResidueMass=0; InitialStandingFraction=1; InitialCPR=0; InitialCNR=30
      Fertiliser
      Report: same as WI 2017.WI Till 2017 Med SR.Report
      MicroClimate: a_interception=0; b_interception=1; c_interception=0; d_interception=0; SoilHeatFluxFraction=0.4; MinimumHeightDiffForNewLayer=0; NightInterceptionFraction=0.5; ReferenceHeight=2
      Plant Wheat: same as NY 2015 Rye.NY NT 2015 Med SR.Wheat
      Plant Soybean: same as NY 2015 Rye.NY NT 2015 Med SR.Soybean
      Operations
        2018-06-01  [SurfaceOrganicMatter].Incorporate(fraction: 1, depth: 150)
        2018-06-06  [Soybean].Sow(cultivar: Generic_MG1, population: 55.6, depth: 50, rowSpacing: 760)
        2018-11-19  [Soybean].Harvest
        2018-11-20  [Soybean].EndCrop
      Soil Plano Lab Data Med: same as WI 2015.WI NT 2015 Med PD.Plano Lab Data Med
  Simulation WI 2019
    Weather: FileName=/Users/stw52/Downloads/aars_apsim_daymet.met
    Clock: Start=2018-01-01; End=2019-11-19
    Summary
    SoilArbitrator
    Zone WI Till 2019 Med PD: Area=1; Slope=2; AspectAngle=0; Altitude=50
      SurfaceOrganicMatter: InitialResidueName=Wheat; InitialResidueType=wheat; InitialResidueMass=0; InitialStandingFraction=1; InitialCPR=0; InitialCNR=30
      Fertiliser
      Report: same as WI 2017.WI Till 2017 Med SR.Report
      MicroClimate: a_interception=0; b_interception=1; c_interception=0; d_interception=0; SoilHeatFluxFraction=0.4; MinimumHeightDiffForNewLayer=0; NightInterceptionFraction=0.5; ReferenceHeight=2
      Plant Wheat: same as NY 2015 Rye.NY NT 2015 Med SR.Wheat
      Plant Soybean: same as NY 2015 Rye.NY NT 2015 Med SR.Soybean
      Operations
        2019-06-01  [SurfaceOrganicMatter].Incorporate(fraction: 1, depth: 150)
        2018-09-11  [Fertiliser].Apply(amount: 122, type: UreaN)
        2019-06-05  [Soybean].Sow(cultivar: Generic_MG1, population: 39.6, depth: 50, rowSpacing: 760)
        2019-11-24  [Soybean].Harvest
        2019-11-25  [Soybean].EndCrop
      Soil Plano Lab Data Med: same as WI 2015.WI NT 2015 Med PD.Plano Lab Data Med
    Zone WI NT 2019 Med SR: Area=1; Slope=2; AspectAngle=0; Altitude=50
      SurfaceOrganicMatter: InitialResidueName=Wheat; InitialResidueType=wheat; InitialResidueMass=0; InitialStandingFraction=1; InitialCPR=0; InitialCNR=30
      Fertiliser
      Report: same as WI 2017.WI NT 2017 Med PD.Report
      MicroClimate: a_interception=0; b_interception=1; c_interception=0; d_interception=0; SoilHeatFluxFraction=0.4; MinimumHeightDiffForNewLayer=0; NightInterceptionFraction=0.5; ReferenceHeight=2
      Plant Wheat: same as NY 2015 Rye.NY NT 2015 Med SR.Wheat
      Plant Soybean: same as NY 2015 Rye.NY NT 2015 Med SR.Soybean
      Operations
        2018-09-10  [SurfaceOrganicMatter].Incorporate(fraction: 1, depth: 150)
        2018-09-11  [Fertiliser].Apply(amount: 122, type: UreaN)
        2018-09-17  [Wheat].Sow(cultivar: CerealRye, population: 649, depth: 25, rowSpacing: 190)
        2019-06-02  [Wheat].EndCrop()
        2019-06-05  [Soybean].Sow(cultivar: Generic_MG1, population: 53.1, depth: 50, rowSpacing: 760)
        2019-11-24  [Soybean].Harvest
        2019-11-25  [Soybean].EndCrop
      Soil Plano SL WSS (disabled): SoilType=0; Region=Pierce; State=Wisconsin; Country=US; ApsoilNumber=221; Latitude=44.64; Longitude=-92.453; YearOfSampling=2015; Comments=0
        DataSource:
          Original data by http://websoilsurvey.sc.egov.usda.gov/App/HomePage.htm
          Profile developed by Integrated Cropping Systems Lab, Department of Agronomy, ISU
        Physical
          Thickness  ParticleSizeSand  ParticleSizeSilt  ParticleSizeClay  Rocks  BD    AirDry  LL15   DUL    SAT    KS
          150        9.5               68                22.5              0      1.34  0.076   0.152  0.299  0.444  792
          150        9.2               67.3              23.5              0      1.35  0.138   0.153  0.3    0.441  792
          150        7                 63                30                0      1.42  0.163   0.163  0.306  0.414  792
          150        7                 63                30                0      1.42  0.163   0.163  0.306  0.414  792
          150        7                 63                30                0      1.42  0.163   0.163  0.306  0.414  792
          150        7                 63                30                0      1.42  0.163   0.163  0.306  0.414  792
          1100       53.5              30.9              15.6              0      1.5   0.138   0.138  0.233  0.384  1728
          BD source: Field measured and checked for sensibility (layer 5)
          SAT source: Calculated from measured, estimated or calculated BD (layer 5)
          Rocks source: Calculated (layer 1, 2, 3, 4, 5, 6)
          SoilCrop maizeSoil: LL=[0.152, 0.153, 0.163, 0.163, 0.163, 0.163, 0.138]; KL=[0.08, 0.069, 0.064, 0.057, 0.049, 0.035, 0.06]; XF=[1, 1, 1, 1, 1, 1, 1]
            LL, KL, XF source: Calculated (layer 7)
          SoilCrop soybeanSoil: LL=[0.152, 0.153, 0.163, 0.163, 0.163, 0.163, 0.138]; KL=[0.06, 0.049, 0.04, 0.032, 0.026, 0.022, 0.01]; XF=[1, 1, 1, 1, 1, 1, 1]
            LL, XF source: Calculated (layer 7)
          SoilCrop wheatSoil: LL=[0.152, 0.153, 0.163, 0.163, 0.163, 0.163, 0.138]; KL=[0.06, 0.049, 0.04, 0.032, 0.026, 0.022, 0.01]; XF=[1, 1, 1, 1, 1, 1, 1]
            LL source: Calculated (layer 7)
            KL source: Calculated (layer 1)
            XF source: Calculated
        WaterBalance SoilWater: SummerDate=1-jun; SummerU=7; SummerCona=3; WinterDate=1-nov; WinterU=7.275; WinterCona=3.575; DiffusConst=84; DiffusSlope=35.4; Salb=0.17; CN2Bare=73; CNRed=20; CNCov=0.8; PSIDul=-100; Thickness=[330, 80, 170, 140, 270, 710]; SWCON=[0.255, 0.293, 0.25, 0.246, 0.515, 0.226]
        Organic: FOMCNRatio=40; CarbonUnits=Total
          Thickness  Carbon  SoilCNRatio  FBiom   FInert  FOM
          200        2.32    12           0.04    0.8     150
          200        2.32    12           0.032   0.81    122
          200        2.32    12           0.0268  0.82    100.5
          200        0.36    12           0.022   0.82    82
          200        0.26    12           0.018   0.83    67.4
          200        0.26    12           0.015   0.84    55.2
          200        0.26    12           0.012   0.85    45.2
          200        0.26    12           0.009   0.86    37
          400        0.18    12           0.08    0.87    30
        Chemical: PHUnits=Water
          Thickness  PH    CEC
          150        6.58  9.5015
          150        6.48  9.7484
          150        6.05  9.8245
          150        6.05  9.2815
          150        6.05  9.0325
          150        6.05  8.8165
          1100       7.64  8.16984
          CEC source: Calculated
          PH source: Estimated based on local knowledge
        Nutrient
        Solute NO3: Thickness=[150, 150, 150, 150, 150, 150, 1100]; InitialValues=[0, 0, 0, 0, 0, 0, 0]; InitialValuesUnits=ppm; WaterTableConcentration=0; D0=0; Exco=[1, 1, 1, 1, 1, 1]; FIP=[1, 1, 1, 1, 1, 1]; DepthConstant=0; MaxDepthSoluteAccessible=0; RunoffEffectivenessAtMovingSolute=0; MaxEffectiveRunoff=0
        Solute NH4: same as WI 2019.WI NT 2019 Med SR.Plano SL WSS.NO3
        Solute Urea: Thickness=[150, 150, 150, 150, 150, 150, 1100]; InitialValues=[0, 0, 0, 0, 0, 0, 0]; InitialValuesUnits=kg/ha; WaterTableConcentration=0; D0=0; Exco=[1, 1, 1, 1, 1, 1]; FIP=[1, 1, 1, 1, 1, 1]; DepthConstant=0; MaxDepthSoluteAccessible=0; RunoffEffectivenessAtMovingSolute=0; MaxEffectiveRunoff=0
        Water: Thickness=[150, 150, 150, 150, 150, 150, 1100]; InitialValues=[0.299, 0.3, 0.306, 0.306, 0.306, 0.306, 0.233]; FilledFromTop=true
        SoilTemperature Temperature
      Soil Plano SoilDB (disabled): SoilType=0; Region=Pierce; State=Wisconsin; Country=US; ApsoilNumber=221; Latitude=44.64; Longitude=-92.453; YearOfSampling=2015; Comments=0
        DataSource:
          Original data by http://websoilsurvey.sc.egov.usda.gov/App/HomePage.htm
          Profile developed by Integrated Cropping Systems Lab, Department of Agronomy, ISU
        Physical
          Thickness  ParticleSizeSand  ParticleSizeSilt  ParticleSizeClay  Rocks  BD    AirDry  LL15   DUL    SAT    KS
          150        9.5               68                22.5              0      1.34  0.071   0.141  0.353  0.438  792
          130        9.5               68                2.5               0      1.34  0.113   0.141  0.353  0.438  792
          400        7                 63                30                0      1.42  0.162   0.162  0.35   0.431  792
          360        7                 63                30                0      1.42  0.162   0.162  0.35   0.431  792
          130        43                34                23                0      1.6   0.14    0.14   0.267  0.363  792
          400        63                25                12                0      1.5   0.095   0.095  0.213  0.377  1728
          430        63                25                12                0      1.5   0.095   0.095  0.213  0.377  1728
          Rocks source: Calculated (layer 1, 2, 3, 4, 5, 6)
          SoilCrop maizeSoil: same as WI 2019.WI NT 2019 Med SR.Plano SL WSS.Physical.maizeSoil
          SoilCrop soybeanSoil: same as WI 2019.WI NT 2019 Med SR.Plano SL WSS.Physical.soybeanSoil
          SoilCrop wheatSoil: same as WI 2019.WI NT 2019 Med SR.Plano SL WSS.Physical.wheatSoil
        WaterBalance SoilWater: SummerDate=1-jun; SummerU=7; SummerCona=3; WinterDate=1-nov; WinterU=7.275; WinterCona=3.575; DiffusConst=84; DiffusSlope=35.4; Salb=0.17; CN2Bare=73; CNRed=20; CNCov=0.8; PSIDul=-100; Thickness=[150, 130, 400, 360, 130, 400, 430]; SWCON=[0.45, 0.45, 0.45, 0.45, 0.45, 0.45, 0.45]
        Organic: FOMCNRatio=40; CarbonUnits=Total
          Thickness  Carbon  SoilCNRatio  FBiom   FInert  FOM
          150        2.32    12           0.04    0.8     150
          130        2.32    12           0.032   0.81    122
          400        2.32    12           0.0268  0.82    100.5
          360        0.36    12           0.022   0.82    82
          130        0.26    12           0.018   0.83    67.4
          400        0.26    12           0.015   0.84    55.2
          430        0.26    12           0.012   0.85    45.2
          200        0.26    12           0.009   0.86    37
          400        0.18    12           0.08    0.87    30
        Chemical: PHUnits=Water
          Thickness  PH    CEC
          150        6.58  9.5015
          130        6.48  9.7484
          400        6.05  9.8245
          360        6.05  9.2815
          130        6.05  9.0325
          400        6.05  8.8165
          430        7.64  8.16984
          CEC source: Calculated
          PH source: Estimated based on local knowledge
        Nutrient
        Solute NO3: Thickness=[150, 130, 400, 360, 130, 400, 430]; InitialValues=[0, 0, 0, 0, 0, 0, 0]; InitialValuesUnits=ppm; WaterTableConcentration=0; D0=0; Exco=[1, 1, 1, 1, 1, 1]; FIP=[1, 1, 1, 1, 1, 1]; DepthConstant=0; MaxDepthSoluteAccessible=0; RunoffEffectivenessAtMovingSolute=0; MaxEffectiveRunoff=0
        Solute NH4: same as WI 2019.WI NT 2019 Med SR.Plano SoilDB.NO3
        Solute Urea: Thickness=[150, 130, 400, 360, 130, 400, 430]; InitialValues=[0, 0, 0, 0, 0, 0, 0]; InitialValuesUnits=kg/ha; WaterTableConcentration=0; D0=0; Exco=[1, 1, 1, 1, 1, 1]; FIP=[1, 1, 1, 1, 1, 1]; DepthConstant=0; MaxDepthSoluteAccessible=0; RunoffEffectivenessAtMovingSolute=0; MaxEffectiveRunoff=0
        Water: Thickness=[150, 130, 400, 360, 130, 400, 430]; InitialValues=[0.353, 0.353, 0.35, 0.35, 0.267, 0.213, 0.213]; FilledFromTop=true
        SoilTemperature Temperature
      Soil Plano Lab Data: same as WI 2015.WI NT 2015 Med PD.Plano Lab Data Med
    Zone WI Till 2019 Med SR: Area=1; Slope=2; AspectAngle=0; Altitude=50
      SurfaceOrganicMatter: InitialResidueName=Wheat; InitialResidueType=wheat; InitialResidueMass=0; InitialStandingFraction=1; InitialCPR=0; InitialCNR=30
      Fertiliser
      Report: same as WI 2017.WI Till 2017 Med SR.Report
      MicroClimate: a_interception=0; b_interception=1; c_interception=0; d_interception=0; SoilHeatFluxFraction=0.4; MinimumHeightDiffForNewLayer=0; NightInterceptionFraction=0.5; ReferenceHeight=2
      Plant Wheat: same as NY 2015 Rye.NY NT 2015 Med SR.Wheat
      Plant Soybean: same as NY 2015 Rye.NY NT 2015 Med SR.Soybean
      Operations
        2019-06-01  [SurfaceOrganicMatter].Incorporate(fraction: 1, depth: 150)
        2018-09-11  [Fertiliser].Apply(amount: 122, type: UreaN)
        2019-06-05  [Soybean].Sow(cultivar: Generic_MG1, population: 53.1, depth: 50, rowSpacing: 760)
        2019-11-24  [Soybean].Harvest
        2019-11-25  [Soybean].EndCrop
      Soil Plano SL WSS (disabled): same as WI 2019.WI NT 2019 Med SR.Plano SL WSS
      Soil Plano SoilDB (disabled): same as WI 2019.WI NT 2019 Med SR.Plano SoilDB
      Soil Plano Lab Data Med: same as WI 2015.WI NT 2015 Med PD.Plano Lab Data Med
    Zone WI NT 2019 Med PD: Area=1; Slope=2; AspectAngle=0; Altitude=50
      SurfaceOrganicMatter: InitialResidueName=Wheat; InitialResidueType=wheat; InitialResidueMass=0; InitialStandingFraction=1; InitialCPR=0; InitialCNR=30
      Fertiliser
      Report: same as WI 2017.WI NT 2017 Med PD.Report
      MicroClimate: a_interception=0; b_interception=1; c_interception=0; d_interception=0; SoilHeatFluxFraction=0.4; MinimumHeightDiffForNewLayer=0; NightInterceptionFraction=0.5; ReferenceHeight=2
      Plant Wheat: same as NY 2015 Rye.NY NT 2015 Med SR.Wheat
      Plant Soybean: same as NY 2015 Rye.NY NT 2015 Med SR.Soybean
      Operations
        2018-09-10  [SurfaceOrganicMatter].Incorporate(fraction: 1, depth: 150)
        2018-09-11  [Fertiliser].Apply(amount: 122, type: UreaN)
        2018-09-17  [Wheat].Sow(cultivar: CerealRye, population: 649, depth: 25, rowSpacing: 190)
        2019-06-02  [Wheat].EndCrop()
        2019-06-05  [Soybean].Sow(cultivar: Generic_MG1, population: 38.8, depth: 50, rowSpacing: 760)
        2019-11-24  [Soybean].Harvest
        2019-11-25  [Soybean].EndCrop
      Soil Plano SL WSS (disabled): same as WI 2019.WI NT 2019 Med SR.Plano SL WSS
      Soil Plano SoilDB (disabled): same as WI 2019.WI NT 2019 Med SR.Plano SoilDB
      Soil Plano Lab Data: same as WI 2015.WI NT 2015 Med PD.Plano Lab Data Med
  Simulation WI 2023
    Weather: FileName=/Users/stw52/Downloads/aars_iem.met
    Clock: Start=2022-01-01; End=2023-11-19
    Summary
    SoilArbitrator
    Zone WI Till 2023 Med PD: Area=1; Slope=2; AspectAngle=0; Altitude=50
      SurfaceOrganicMatter: InitialResidueName=Wheat; InitialResidueType=wheat; InitialResidueMass=0; InitialStandingFraction=1; InitialCPR=0; InitialCNR=30
      Fertiliser
      Report: same as WI 2017.WI Till 2017 Med SR.Report
      MicroClimate: a_interception=0; b_interception=1; c_interception=0; d_interception=0; SoilHeatFluxFraction=0.4; MinimumHeightDiffForNewLayer=0; NightInterceptionFraction=0.5; ReferenceHeight=2
      Plant Wheat: same as NY 2015 Rye.NY NT 2015 Med SR.Wheat
      Plant Soybean: same as NY 2015 Rye.NY NT 2015 Med SR.Soybean
      Operations
        2022-06-01  [SurfaceOrganicMatter].Incorporate(fraction: 1, depth: 150)
        2022-09-18  [Fertiliser].Apply(amount: 122, type: UreaN)
        2023-06-07  [Soybean].Sow(cultivar: Generic_MG1, population: 31.8, depth: 50, rowSpacing: 760)
        2023-11-07  [Soybean].Harvest
        2023-11-08  [Soybean].EndCrop
      Soil Plano Lab Data Med: SoilType=0; Region=Pierce; State=Wisconsin; Country=US; ApsoilNumber=221; Latitude=44.64; Longitude=-92.453; YearOfSampling=2015; Comments=0
        DataSource:
          Original data by http://websoilsurvey.sc.egov.usda.gov/App/HomePage.htm
          Profile developed by Integrated Cropping Systems Lab, Department of Agronomy, ISU
        Physical
          Thickness  ParticleSizeSand  ParticleSizeSilt  ParticleSizeClay  Rocks  BD    AirDry  LL15   DUL    SAT    KS
          150        3.9               71.7              24.4              0      1.34  0.058   0.115  0.327  0.435  171
          50         3.9               71.7              24.4              0      1.34  0.058   0.115  0.327  0.435  171
          100        3.4               73.6              23                0      1.42  0.112   0.14   0.354  0.44   126
          80         3.8               77                19.2              0      1.42  0.114   0.114  0.319  0.428  97.2
          130        3.6               70.6              25.8              0      1.42  0.148   0.148  0.344  0.413  124
          150        3.2               65.9              30.9              0      1.42  0.174   0.174  0.362  0.418  68.4
          280        3.5               68.4              28.1              0      1.45  0.2     0.2    0.391  0.452  197
          180        12.6              64.6              22.8              0      1.6   0.148   0.148  0.306  0.38   67.1
          380        50.4              35.1              14.5              0      1.5   0.113   0.113  0.236  0.354  83.5
          130        62.4              24.6              13                0      1.5   0.098   0.098  0.218  0.372  284
          150        72.4              20.7              6.9               0      1.5   0.074   0.074  0.168  0.371  685
          120        72.9              22.2              4.9               0      1.5   0.065   0.065  0.154  0.387  616
          310        72.4              23.1              4.5               0      1.5   0.072   0.072  0.162  0.364  578
          300        72.4              23.1              4.5               0      1.5   0.072   0.072  0.162  0.364  578
          Rocks source: Calculated (layer 1, 2, 3, 4, 5, 6)
          SoilCrop maizeSoil
            LL=[0.115, 0.115, 0.14, 0.114, 0.148, 0.174, 0.2, 0.148, 0.113, 0.098, 0.074, 0.065, 0.072, 0.072]
            KL=[0.08, 0.069, 0.064, 0.057, 0.049, 0.035, 0.06, 0.06, 0.06, 0.06, 0.06, 0.06, 0.06, 0.06]
            XF=[1, 1, 1, 1, 1, 1, 1, 1, 1, 1, 1, 1, 1, 1]
            KL, XF source: Calculated (layer 7, 8, 9, 10, 11, 12, 13)
          SoilCrop soybeanSoil
            LL=[0.115, 0.115, 0.14, 0.114, 0.148, 0.174, 0.2, 0.148, 0.113, 0.098, 0.074, 0.065, 0.072, 0.072]
            KL=[0.06, 0.049, 0.04, 0.032, 0.026, 0.022, 0.01, 0.06, 0.06, 0.06, 0.06, 0.06, 0.06, 0.06]
            XF=[1, 1, 1, 1, 1, 1, 1, 1, 1, 1, 1, 1, 1, 1]
            KL source: Calculated (layer 8, 9, 10, 11, 12, 13)
            XF source: Calculated (layer 7, 8, 9, 10, 11, 12, 13)
          SoilCrop wheatSoil
            LL=[0.115, 0.115, 0.14, 0.114, 0.148, 0.174, 0.2, 0.148, 0.113, 0.098, 0.074, 0.065, 0.072, 0.072]
            KL=[0.06, 0.049, 0.04, 0.032, 0.026, 0.022, 0.01, 0.06, 0.06, 0.06, 0.06, 0.06, 0.06, 0.06]
            XF=[1, 1, 1, 1, 1, 1, 1, 1, 1, 1, 1, 1, 1, 1]
            KL source: Calculated (layer 1, 8, 9, 10, 11, 12, 13)
            XF source: Calculated (layer 1, 2, 3, 4, 5, 6, 7, 8, 9, 10, 11, 12, 13)
        WaterBalance SoilWater: same as WI 2015.WI NT 2015 Med PD.Plano Lab Data Med.SoilWater
        Organic: same as WI 2015.WI NT 2015 Med PD.Plano Lab Data Med.Organic
        Chemical: same as WI 2015.WI NT 2015 Med PD.Plano Lab Data Med.Chemical
        Nutrient
        Solute NO3: same as WI 2015.WI NT 2015 Med PD.Plano Lab Data Med.NO3
        Solute NH4: same as WI 2015.WI NT 2015 Med PD.Plano Lab Data Med.NO3
        Solute Urea: same as WI 2015.WI NT 2015 Med PD.Plano Lab Data Med.Urea
        Water: FilledFromTop=true
          Thickness=[150, 50, 180, 130, 150, 280, 180, 380, 130, 150, 120, 310, 300]
          InitialValues=[0.327, 0.327, 0.354, 0.319, 0.344, 0.362, 0.391, 0.306, 0.236, 0.218, 0.168, 0.154, 0.162]
        SoilTemperature Temperature
    Zone WI NT 2023 Med PD: Area=1; Slope=2; AspectAngle=0; Altitude=50
      SurfaceOrganicMatter: InitialResidueName=Wheat; InitialResidueType=wheat; InitialResidueMass=0; InitialStandingFraction=1; InitialCPR=0; InitialCNR=30
      Fertiliser
      Report: same as WI 2017.WI NT 2017 Med PD.Report
      MicroClimate: a_interception=0; b_interception=1; c_interception=0; d_interception=0; SoilHeatFluxFraction=0.4; MinimumHeightDiffForNewLayer=0; NightInterceptionFraction=0.5; ReferenceHeight=2
      Plant Wheat: same as NY 2015 Rye.NY NT 2015 Med SR.Wheat
      Plant Soybean: same as NY 2015 Rye.NY NT 2015 Med SR.Soybean
      Operations
        2022-09-17  [SurfaceOrganicMatter].Incorporate(fraction: 1, depth: 150)
        2022-09-18  [Fertiliser].Apply(amount: 122, type: UreaN)
        2022-09-23  [Wheat].Sow(cultivar: CerealRye, population: 741, depth: 25, rowSpacing: 190)
        2023-06-06  [Wheat].EndCrop()
        2023-06-07  [Soybean].Sow(cultivar: Generic_MG1, population: 17.8, depth: 50, rowSpacing: 760)
        2023-11-07  [Soybean].Harvest
        2023-11-08  [Soybean].EndCrop
      Soil Plano SL WSS (disabled): same as WI 2019.WI NT 2019 Med SR.Plano SL WSS
      Soil Plano Lab Data: same as WI 2015.WI NT 2015 Med PD.Plano Lab Data Med
      Soil Plano SoilDB (disabled): same as WI 2019.WI NT 2019 Med SR.Plano SoilDB
    Zone WI Till 2023 Med SR: Area=1; Slope=2; AspectAngle=0; Altitude=50
      SurfaceOrganicMatter: InitialResidueName=Wheat; InitialResidueType=wheat; InitialResidueMass=0; InitialStandingFraction=1; InitialCPR=0; InitialCNR=30
      Fertiliser
      Report: same as WI 2017.WI Till 2017 Med SR.Report
      MicroClimate: a_interception=0; b_interception=1; c_interception=0; d_interception=0; SoilHeatFluxFraction=0.4; MinimumHeightDiffForNewLayer=0; NightInterceptionFraction=0.5; ReferenceHeight=2
      Plant Wheat: same as NY 2015 Rye.NY NT 2015 Med SR.Wheat
      Plant Soybean: same as NY 2015 Rye.NY NT 2015 Med SR.Soybean
      Operations
        2022-06-01  [SurfaceOrganicMatter].Incorporate(fraction: 1, depth: 150)
        2022-09-18  [Fertiliser].Apply(amount: 122, type: UreaN)
        2023-06-07  [Soybean].Sow(cultivar: Generic_MG1, population: 55.6, depth: 50, rowSpacing: 760)
        2023-11-07  [Soybean].Harvest
        2023-11-08  [Soybean].EndCrop
      Soil Plano SL WSS (disabled): same as WI 2019.WI NT 2019 Med SR.Plano SL WSS
      Soil Plano SoilDB (disabled): same as WI 2019.WI NT 2019 Med SR.Plano SoilDB
      Soil Plano Lab Data Med: same as WI 2015.WI NT 2015 Med PD.Plano Lab Data Med
    Zone WI NT 2023 Med SR: Area=1; Slope=2; AspectAngle=0; Altitude=50
      SurfaceOrganicMatter: InitialResidueName=Wheat; InitialResidueType=wheat; InitialResidueMass=0; InitialStandingFraction=1; InitialCPR=0; InitialCNR=30
      Fertiliser
      Report: same as WI 2017.WI NT 2017 Med PD.Report
      MicroClimate: a_interception=0; b_interception=1; c_interception=0; d_interception=0; SoilHeatFluxFraction=0.4; MinimumHeightDiffForNewLayer=0; NightInterceptionFraction=0.5; ReferenceHeight=2
      Plant Wheat: same as NY 2015 Rye.NY NT 2015 Med SR.Wheat
      Plant Soybean: same as NY 2015 Rye.NY NT 2015 Med SR.Soybean
      Operations
        2022-09-17  [SurfaceOrganicMatter].Incorporate(fraction: 1, depth: 150)
        2022-09-18  [Fertiliser].Apply(amount: 122, type: UreaN)
        2022-09-23  [Wheat].Sow(cultivar: CerealRye, population: 741, depth: 25, rowSpacing: 190)
        2023-06-06  [Wheat].EndCrop()
        2023-06-07  [Soybean].Sow(cultivar: Generic_MG1, population: 55.6, depth: 50, rowSpacing: 760)
        2023-11-07  [Soybean].Harvest
        2023-11-08  [Soybean].EndCrop
      Soil Plano SL WSS (disabled): same as WI 2019.WI NT 2019 Med SR.Plano SL WSS
      Soil Plano Lab Data: same as WI 2015.WI NT 2015 Med PD.Plano Lab Data Med
      Soil Plano SoilDB (disabled): same as WI 2019.WI NT 2019 Med SR.Plano SoilDB
  Simulation NY 2015 Soybean
    Weather: FileName=/Users/stw52/Downloads/mus_iem.met
    Clock: Start=2015-01-01; End=2015-11-19
    Summary
    SoilArbitrator
    Zone NY NT 2015 Med SR: Area=1; Slope=2; AspectAngle=0; Altitude=50
      SurfaceOrganicMatter: InitialResidueName=Wheat; InitialResidueType=wheat; InitialResidueMass=5964.502; InitialStandingFraction=0; InitialCPR=0; InitialCNR=27.525
      Fertiliser
      Report: EventNames=[Soybean].Harvesting
        VariableNames:
          [Clock].Today.Year
          [Clock].Today
          [Wheat].AboveGround.Wt*10 as rye_bm_kg_ha
          [Soybean].Grain.Wt*10 as soy_kg_ha
          [Soil].Temperature.Value
      MicroClimate: a_interception=0; b_interception=1; c_interception=0; d_interception=0; SoilHeatFluxFraction=0.4; MinimumHeightDiffForNewLayer=0; NightInterceptionFraction=0.5; ReferenceHeight=2
      Plant Wheat: same as NY 2015 Rye.NY NT 2015 Med SR.Wheat
      Plant Soybean: same as NY 2015 Rye.NY NT 2015 Med SR.Soybean
      Operations
        2015-06-04  [Soybean].Sow(cultivar: Generic_MG2, population: 62.5, depth: 50, rowSpacing: 760)
        2015-10-12  [Soybean].Harvest
        2015-10-12  [Soybean].EndCrop
      Soil Lima Lab Data Med: ASCOrder=NA; ASCSubOrder=NA; SoilType=Lima Silt Loam; Site=Musgrave; NearestTown=Aurora; Region=Northeast United States; State=New York; Country=United States of America; NaturalVegetation=NA; ApsoilNumber=9999; Latitude=42.625; Longitude=-76.625; LocationAccuracy=+- 250 m; YearOfSampling=1985; DataSource=Soil Lab Data; Comments=Data filled from Soil Lab Data from USDA soil survey
        Water: Thickness=[150, 100, 50, 160, 400, 180, 960]; InitialValues=[0.312, 0.299, 0.246, 0.246, 0.228, 0.268, 0.31]; FilledFromTop=true
        Physical: same as NY 2015 Rye.NY NT 2015 Med SR.Lima Lab Data Med.Physical
        WaterBalance SoilWater: same as NY 2015 Rye.NY NT 2015 Med SR.Lima Lab Data Med.SoilWater
        Organic: same as NY 2015 Rye.NY NT 2015 Med SR.Lima Lab Data Med.Organic
        Chemical: same as NY 2015 Rye.NY NT 2015 Med SR.Lima Lab Data Med.Chemical
        Nutrient
        Solute NO3: Thickness=[150, 100, 50, 160, 400, 180, 960]; InitialValues=[1.474, 1.792, 1.337, 1.21, 1.729, 5.331, 1.909]; InitialValuesUnits=ppm; WaterTableConcentration=0; D0=0; DepthConstant=0; MaxDepthSoluteAccessible=0; RunoffEffectivenessAtMovingSolute=0; MaxEffectiveRunoff=0
        Solute NH4: Thickness=[150, 100, 50, 160, 400, 180, 960]; InitialValues=[0.692, 0.386, 0.111, 0.03, 0, 0.014, 0.016]; InitialValuesUnits=ppm; WaterTableConcentration=0; D0=0; DepthConstant=0; MaxDepthSoluteAccessible=0; RunoffEffectivenessAtMovingSolute=0; MaxEffectiveRunoff=0
        Solute Urea: same as NY 2015 Rye.NY NT 2015 Med SR.Lima Lab Data Med.Urea
        SoilTemperature CERESSoilTemperature: Thickness=[150, 100, 50, 160, 400, 180, 960]; InitialValues=[19.184, 18.61, 18.33, 17.464, 15.496, 14.7, 11.307]
        CERESSoilTemperature Temperature
      Manager Reset on sowing
        ResetWater = True
        ResetNutrients = True
        ResetSOM = True
```csharp
using Models.Soils.Nutrients;
using APSIM.Shared.Utilities;
using Models.Surface;
using Models.Utilities;
using Models.Soils.Nutrients;
using Models.Soils;
using Models.PMF;
using Models.Core;
using System;
using System.Linq;
using Models.Interfaces;

namespace Models
{
    [Serializable]
    public class Script : Model
    {
        [Link] private Plant Wheat;
        [Link] private ISoilWater SoilWater;
        [Link] private Nutrient nutrient;
        [Link] private SurfaceOrganicMatter SOM;
        [Link] private Summary Summary;

        [Description("Reset Water?")]
        public bool ResetWater {get;set;}

        [Description("Reset Soil Nutrients?")]
        public bool ResetNutrients {get;set;}

        [Description("Reset Surface Organic Matter?")]
        public bool ResetSOM {get;set;}

        [EventSubscribe("Sowing")]
        private void OnSowing(object sender, EventArgs e)
        {
            if (ResetWater)
            {
                Summary.WriteMessage(this, "Reset Water", MessageType.Diagnostic);
                SoilWater.Reset();
            }
            if (ResetNutrients)
            {
                Summary.WriteMessage(this, "Reset Nutrients", MessageType.Diagnostic);
                nutrient.Reset();
            }
            if (ResetSOM)
            {
                Summary.WriteMessage(this, "Reset Surface OM", MessageType.Diagnostic);
                SOM.Reset();
            }
        }
    }
}
```
    Zone NY Till 2015 Med SR (disabled): same as NY 2015 Rye.NY Till 2015 Med SR
    Zone NY NT 2015 Med PD (disabled): same as NY 2015 Rye.NY NT 2015 Med PD
    Zone NY Till 2015 Med PD (disabled): same as NY 2015 Rye.NY Till 2015 Med PD
  Simulation NY 2015 Corn Check
    Weather: FileName=/Users/stw52/Downloads/mus_iem.met
    Clock: Start=2014-01-01; End=2014-11-19
    Summary
    SoilArbitrator
    Zone NY NT 2015 Med SR: Area=1; Slope=2; AspectAngle=0; Altitude=50
      SurfaceOrganicMatter: InitialResidueName=Wheat; InitialResidueType=wheat; InitialResidueMass=0; InitialStandingFraction=1; InitialCPR=0; InitialCNR=30
      Fertiliser
      Report: EventNames=[Wheat].Sowing
        VariableNames:
          [Clock].Today.Year
          [Clock].Today
          [Soil].NO3.ppm
          [Soil].NH4.ppm
      MicroClimate: a_interception=0; b_interception=1; c_interception=0; d_interception=0; SoilHeatFluxFraction=0.4; MinimumHeightDiffForNewLayer=0; NightInterceptionFraction=0.5; ReferenceHeight=2
      Plant Wheat: same as NY 2015 Rye.NY NT 2015 Med SR.Wheat
      Plant Soybean: same as NY 2015 Rye.NY NT 2015 Med SR.Soybean
      Operations
        2014-10-07  [Wheat].Sow(cultivar: CerealRye, population: 547, depth: 25, rowSpacing: 190)
      Soil Lima Lab Data Med: same as NY 2015 Rye.NY NT 2015 Med SR.Lima Lab Data Med
      Plant Maize
    Zone NY Till 2015 Med SR (disabled): same as NY 2015 Rye.NY Till 2015 Med SR
    Zone NY NT 2015 Med PD (disabled): same as NY 2015 Rye.NY NT 2015 Med PD
    Zone NY Till 2015 Med PD (disabled): same as NY 2015 Rye.NY Till 2015 Med PD
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