Simulations: Version=197
  DataStore
  Simulation NY 2015
    Weather: FileName=/Users/stw52/Downloads/mus_iem.met
    Summary
    SoilArbitrator
    Zone NY Till 2015 Med PD: Area=1; Slope=3; AspectAngle=0; Altitude=50
      SurfaceOrganicMatter: InitialResidueName=Wheat; InitialResidueType=wheat; InitialResidueMass=0; InitialStandingFraction=1; InitialCPR=0; InitialCNR=30
      Fertiliser
      Report: EventNames=[Clock].EndOfDay
        VariableNames:
          [Clock].Today
          //===== Daily Values
          [Wheat].AboveGround.Wt*10 as rye_bm_kg_ha
          [Soybean].Grain.Wt*10 as soy_kg_ha
          [Soybean].Phenology.Stage
      MicroClimate: a_interception=0; b_interception=1; c_interception=0; d_interception=0; SoilHeatFluxFraction=0.4; MinimumHeightDiffForNewLayer=0; NightInterceptionFraction=0.5; ReferenceHeight=2
      Plant Wheat
        Cultivar CerealRye
          Command:
            [Phenology].Phyllochron.BasePhyllochron.FixedValue = 90
            [Leaf].CohortParameters.MaxArea.AreaLargestLeaves.FixedValue = 4000
            [Phenology].CAMP.FLNparams.MinLN = 7
            [Phenology].CAMP.FLNparams.PpLN = 2
            [Phenology].CAMP.FLNparams.VrnLN = 5
            [Phenology].CAMP.FLNparams.VxPLN = 2
            [Phenology].HeadEmergenceLongDayBase.FixedValue = 110
            [Phenology].HeadEmergencePpSensitivity.FixedValue = 0
            [Phenology].CAMP.EnvData.VrnTreatTemp = 4.4
            [Phenology].CAMP.EnvData.VrnTreatDuration = 60
            [Leaf].Photosynthesis.RUE.FixedValue = 1.24
            [Phenology].Vernalising.Target = 26
      Plant Soybean
        Cultivar Musgrave 1
          Command:
            [Phenology].Vegetative.Target.FixedValue = 348
            [Phenology].EarlyFlowering.Target.FixedValue = 120
            [Phenology].EarlyGrainFilling.Target.FractionofGrainfilling.FixedValue = 0.2
            [Phenology].LateGrainFilling.Target.EntireGrainfillPeriod.FixedValue = 300
            [Phenology].VegetativePhotoperiodModifier.XYPairs.X = 13.59, 17.61
            [Phenology].ReproductivePhotoperiodModifier.XYPairs.X = 13.59, 17.61
            [Leaf].Photosynthesis.RUE.FixedValue = 2
        Cultivar V2399
          Command:
            [Phenology].Vegetative.Target.FixedValue = 320
            [Phenology].EarlyFlowering.Target.FixedValue = 110
            [Phenology].EarlyGrainFilling.Target.FractionofGrainfilling.FixedValue = 0.3
            [Phenology].LateGrainFilling.Target.EntireGrainfillPeriod.FixedValue = 535
            [Phenology].VegetativePhotoperiodModifier.XYPairs.X = 13.59, 17.61
            [Phenology].ReproductivePhotoperiodModifier.XYPairs.X = 13.59, 17.61
      Soil Lima Lab Data Med: ASCOrder=NA; ASCSubOrder=NA; SoilType=Lima Silt Loam; Site=Musgrave; NearestTown=Aurora; Region=Northeast United States; State=New York; Country=United States of America; NaturalVegetation=NA; ApsoilNumber=9999; Latitude=42.625; Longitude=-76.625; LocationAccuracy=+- 250 m; YearOfSampling=1985; DataSource=Soil Lab Data; Comments=Data filled from Soil Lab Data from USDA soil survey
        Water: Thickness=[150, 100, 50, 160, 400, 180, 960]; InitialValues=[0.28, 0.28, 0.279, 0.29, 0.252, 0.272, 0.272]; FilledFromTop=true
        Physical
          Thickness  ParticleSizeSand  ParticleSizeSilt  ParticleSizeClay  Rocks  BD    AirDry  LL15   DUL    SAT    KS
          150        41.4              41.2              17.4              10     1.38  0.06    0.12   0.28   0.408  864
          100        41.4              41.2              17.4              10     1.38  0.096   0.12   0.28   0.408  864
          50         41.8              38.7              19.5              10     1.46  0.132   0.132  0.279  0.372  864
          160        42.1              34                23.9              10     1.55  0.157   0.157  0.29   0.38   864
          400        38.8              47.6              13.6              15     1.55  0.11    0.11   0.252  0.369  432
          180        38.6              48                13.4              0      1.73  0.155   0.155  0.272  0.325  432
          960        38.6              48                13.4              0      1.73  0.155   0.155  0.272  0.325  432
          SoilCrop WheatSoil: LL=[0.12, 0.12, 0.132, 0.157, 0.11, 0.155, 0.155]; KL=[0.06, 0.06, 0.055, 0.048, 0.039, 0.029, 0.029]; XF=[1, 1, 1, 1, 0.959, 0, 0]
          SoilCrop MaizeSoil: same as NY 2015.NY Till 2015 Med PD.Lima Lab Data Med.Physical.WheatSoil
          SoilCrop SoybeanSoil: LL=[0.12, 0.12, 0.132, 0.157, 0.11, 0.155, 0.155]; KL=[0.06, 0.06, 0.055, 0.048, 0.039, 0.029, 0.029]; XF=[1, 1, 1, 1, 1, 0, 0]
        WaterBalance SoilWater: SummerDate=1-jun; SummerU=6; SummerCona=4; WinterDate=1-nov; WinterU=6; WinterCona=4; DiffusConst=88; DiffusSlope=35.4; Salb=0.13; CN2Bare=73; CNRed=20; CNCov=0.8; DischargeWidth=5; CatchmentArea=10; PSIDul=-336.6; Thickness=[150, 80, 70, 110, 230, 220, 960]; SWCON=[0.4, 0.4, 0.4, 0.4, 0.4, 0.4, 0.4]
        Organic: FOMCNRatio=40; CarbonUnits=Total
          Thickness  Carbon  SoilCNRatio  FBiom  FInert  FOM
          150        1.78    8            0.04   0.193   100
          80         1.78    8            0.031  0.395   70
          70         0.87    8            0.014  0.667   60
          110        0.87    8            0.01   0.832   0
          230        0.87    8            0.01   0.99    0
          220        0.87    8            0.01   0.99    0
        Chemical: PHUnits=Water
          Thickness  PH    CEC
          150        6.23  16.7285
          150        6.3   11.66375
          150        6.33  10.6885
          150        6.38  10.1688
          200        6.45  8.95183
          200        6.55  8.52125
          200        6.61  8.3885
          200        6.63  8.3345
          300        6.66  8.26925
          300        6.68  8.1905
          CEC source: Calculated
        Nutrient
        Solute NH4: Thickness=[150, 150, 150, 150, 200, 200, 200, 200, 300, 300]; InitialValues=[0, 0, 0, 0, 0, 0, 0, 0, 0, 0]; InitialValuesUnits=ppm; WaterTableConcentration=0; D0=0; DepthConstant=0; MaxDepthSoluteAccessible=0; RunoffEffectivenessAtMovingSolute=0; MaxEffectiveRunoff=0
        Solute Urea: Thickness=[150, 150, 150, 150, 200, 200, 200, 200, 300, 300]; InitialValues=[0, 0, 0, 0, 0, 0, 0, 0, 0, 0]; InitialValuesUnits=kg/ha; WaterTableConcentration=0; D0=0; DepthConstant=0; MaxDepthSoluteAccessible=0; RunoffEffectivenessAtMovingSolute=0; MaxEffectiveRunoff=0
        SoilTemperature CERESSoilTemperature
        CERESSoilTemperature Temperature
        Solute NO3: Thickness=[150, 100, 50, 160, 400, 180, 960]; InitialValues=[17, 14, 12, 9, 6.5, 5, 3.5]; InitialValuesUnits=ppm; WaterTableConcentration=0; D0=0; DepthConstant=0; MaxDepthSoluteAccessible=0; RunoffEffectivenessAtMovingSolute=0; MaxEffectiveRunoff=0
      Manager Sow on a fixed Soy (disabled)
        Crop = [Soybean]
        SowDate = 4-jun
        CultivarName = V2399
        SowingDepth = 44.45
        RowSpacing = 760
        Population = 48.2
```csharp
using APSIM.Shared.Utilities;
using Models.Utilities;
using Models.Soils;
using Models.PMF;
using Models.Core;
using System;
using System.Linq;

namespace Models
{
    [Serializable]
    public class Script : Model
    {
        [Link] Clock Clock;
        [Link] Fertiliser Fertiliser;
        [Link] Summary Summary;
        [Link] Soil Soil;
        
        [Description("Crop")]
        public IPlant Crop { get; set; }

        [Description("Sowing date (d-mmm)")]
        public string SowDate { get; set; }

        [Display(Type = DisplayType.CultivarName)]
        [Description("Cultivar to be sown")]
        public string CultivarName { get; set; }

        [Description("Sowing depth (mm)")]
        public double SowingDepth { get; set; }

        [Description("Row spacing (mm)")]
        public double RowSpacing { get; set; }

        [Description("Plant population (/m2)")]
        public double Population { get; set; }

        [EventSubscribe("DoManagement")]
        private void OnDoManagement(object sender, EventArgs e)
        {
            if (DateUtilities.WithinDates(SowDate, Clock.Today, SowDate))
            {
                Crop.Sow(population: Population, cultivar: CultivarName, depth: SowingDepth, rowSpacing: RowSpacing);    
            }
        }
    }
}
```
      Operations
        2014-09-01  [SurfaceOrganicMatter].Add(mass: 6720, N:134, P:47,type: manure, name: dairy)
        2014-09-24  [SurfaceOrganicMatter].Incorporate(fraction: 1, depth: 150)
        2015-05-07  [SurfaceOrganicMatter].Incorporate(fraction: 1, depth: 150)
        2015-05-22  [SurfaceOrganicMatter].Incorporate(fraction: 1, depth: 150)
        2015-06-04  [Soybean].Sow(cultivar: V2399, population: 48.2, depth: 44.45, rowSpacing: 760)
        2015-10-12  [Soybean].Harvest()
      Soil Lima Lab Data Med1 (disabled): ASCOrder=NA; ASCSubOrder=NA; SoilType=Lima Silt Loam; Site=Musgrave; NearestTown=Aurora; Region=Northeast United States; State=New York; Country=United States of America; NaturalVegetation=NA; ApsoilNumber=9999; Latitude=42.625; Longitude=-76.625; LocationAccuracy=+- 250 m; YearOfSampling=1985; DataSource=Soil Lab Data; Comments=Data filled from Soil Lab Data from USDA soil survey
        Water: Thickness=[150, 100, 50, 160, 400, 180, 960]; InitialValues=[0.28, 0.28, 0.279, 0.29, 0.252, 0.272, 0.272]; FilledFromTop=true
        Physical
          Thickness  ParticleSizeSand  ParticleSizeSilt  ParticleSizeClay  Rocks  BD    AirDry  LL15   DUL    SAT    KS
          150        41.4              41.2              17.4              10     1.38  0.06    0.12   0.28   0.408  864
          100        41.4              41.2              17.4              10     1.38  0.096   0.12   0.28   0.408  864
          50         41.8              38.7              19.5              10     1.46  0.132   0.132  0.279  0.372  864
          160        42.1              34                23.9              10     1.55  0.157   0.157  0.29   0.38   864
          400        38.8              47.6              13.6              15     1.55  0.11    0.11   0.252  0.369  432
          180        38.6              48                13.4              0      1.73  0.155   0.155  0.272  0.325  432
          960        38.6              48                13.4              0      1.73  0.155   0.155  0.272  0.325  432
          SoilCrop WheatSoil: LL=[0.12, 0.12, 0.132, 0.157, 0.11, 0.155, 0.155]; KL=[0.06, 0.06, 0.055, 0.048, 0.039, 0.029, 0.029]; XF=[1, 1, 1, 1, 1, 1, 1]
          SoilCrop MaizeSoil: LL=[0.12, 0.12, 0.132, 0.157, 0.11, 0.155, 0.155]; KL=[0.06, 0.06, 0.055, 0.048, 0.039, 0.029, 0.029]; XF=[1, 1, 1, 1, 0.959, 0, 0]
          SoilCrop SoybeanSoil: same as NY 2015.NY Till 2015 Med PD.Lima Lab Data Med1.Physical.WheatSoil
        WaterBalance SoilWater: SummerDate=1-jun; SummerU=6; SummerCona=4; WinterDate=1-nov; WinterU=6; WinterCona=4; DiffusConst=88; DiffusSlope=35.4; Salb=0.13; CN2Bare=73; CNRed=20; CNCov=0; DischargeWidth=5; CatchmentArea=10; PSIDul=-336.6; Thickness=[150, 80, 70, 110, 230, 220, 960]; SWCON=[0.457, 0.464, 0.47, 0.481, 0.451, 0.469, 0.469]
        Organic: FOMCNRatio=40; CarbonUnits=Total
          Thickness  Carbon  SoilCNRatio  FBiom  FInert  FOM
          150        1.78    8            0.04   0.193   100
          80         1.78    8            0.031  0.395   70
          70         0.87    8            0.014  0.667   60
          110        0.87    8            0.01   0.832   0
          230        0.87    8            0.01   0.99    0
          220        0.87    8            0.01   0.99    0
        Chemical: PHUnits=Water
          Thickness  PH    CEC
          150        6.23  16.7285
          150        6.3   11.66375
          150        6.33  10.6885
          150        6.38  10.1688
          200        6.45  8.95183
          200        6.55  8.52125
          200        6.61  8.3885
          200        6.63  8.3345
          300        6.66  8.26925
          300        6.68  8.1905
          CEC source: Calculated
        Nutrient
        Solute NO3: Thickness=[150, 100, 50, 160, 400, 180, 960]; InitialValues=[17, 14, 12, 9, 6.5, 5, 3.5]; InitialValuesUnits=ppm; WaterTableConcentration=0; D0=0; DepthConstant=0; MaxDepthSoluteAccessible=0; RunoffEffectivenessAtMovingSolute=0; MaxEffectiveRunoff=0
        Solute NH4: Thickness=[150, 100, 50, 160, 400, 180, 960]; InitialValues=[0, 0, 0, 0, 0, 0, 0]; InitialValuesUnits=ppm; WaterTableConcentration=0; D0=0; DepthConstant=0; MaxDepthSoluteAccessible=0; RunoffEffectivenessAtMovingSolute=0; MaxEffectiveRunoff=0
        Solute Urea: Thickness=[150, 150, 150, 150, 200, 200, 200, 200, 300, 300]; InitialValues=[0, 0, 0, 0, 0, 0, 0, 0, 0, 0]; InitialValuesUnits=kg/ha; WaterTableConcentration=0; D0=0; DepthConstant=0; MaxDepthSoluteAccessible=0; RunoffEffectivenessAtMovingSolute=0; MaxEffectiveRunoff=0
        SoilTemperature CERESSoilTemperature
        CERESSoilTemperature Temperature
    Clock: Start=2014-01-01; End=2015-10-12
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