Simulations: Version=197
  DataStore
  Simulation WI 2015
    Weather: FileName=/Users/stw52/Downloads/aars_iem.met
    Clock: Start=2014-01-01; End=2015-11-19
    Summary
    SoilArbitrator
    Zone WI NT 2015 Med PD: Area=1; Slope=2; AspectAngle=0; Altitude=50
      SurfaceOrganicMatter: InitialResidueName=Wheat; InitialResidueType=wheat; InitialResidueMass=0; InitialStandingFraction=1; InitialCPR=0; InitialCNR=30
      Fertiliser
      Report: EventNames=[Clock].EndOfDay
        VariableNames:
          [Clock].Today
          //===== Daily Values
          [Wheat].AboveGround.Wt*10 as rye_bm_kg_ha
          [Soybean].Grain.Wt*10 as soy_kg_ha
          sum([Soil].Water.MM - [Soil].Physical.DULmm) as SoilWaterDeficit
          [Soil].Water.Potential
          (sum([Soil].SoilWater.ESW)/(sum([Soil].Physical.DULmm-[Soil].Physical.LL15mm) as frac_water
          [Soybean].IsEmerged as emg_tf
      MicroClimate: a_interception=0; b_interception=1; c_interception=0; d_interception=0; SoilHeatFluxFraction=0.4; MinimumHeightDiffForNewLayer=0; NightInterceptionFraction=0.5; ReferenceHeight=2
      Plant Wheat
        Cultivar CerealRye
          Command:
            [Phenology].Phyllochron.BasePhyllochron.FixedValue = 90
            [Leaf].CohortParameters.MaxArea.AreaLargestLeaves.FixedValue = 4000
            [Phenology].CAMP.FLNparams.MinLN = 7
            [Phenology].CAMP.FLNparams.PpLN = 2
            [Phenology].CAMP.FLNparams.VrnLN = 5
            [Phenology].CAMP.FLNparams.VxPLN = 2
            [Phenology].HeadEmergenceLongDayBase.FixedValue = 110
            [Phenology].HeadEmergencePpSensitivity.FixedValue = 0
            [Phenology].CAMP.EnvData.VrnTreatTemp = 4.4
            [Phenology].CAMP.EnvData.VrnTreatDuration = 60
            [Phenology].Vernalising.Target = 26
      Plant Soybean
        Cultivar Musgrave 1
          Command:
            [Phenology].Vegetative.Target.FixedValue = 340
            [Phenology].EarlyFlowering.Target.FixedValue = 120
            [Phenology].EarlyGrainFilling.Target.FractionofGrainfilling.FixedValue = 0.3
            [Phenology].LateGrainFilling.Target.EntireGrainfillPeriod.FixedValue = 632
            [Phenology].VegetativePhotoperiodModifier.XYPairs.X = 13.84, 18.77
            [Phenology].ReproductivePhotoperiodModifier.XYPairs.X = 13.84, 18.77
        Cultivar V1718
          Command:
            [Phenology].Vegetative.Target.FixedValue = 370
            [Phenology].EarlyFlowering.Target.FixedValue = 105
            [Phenology].EarlyGrainFilling.Target.FractionofGrainfilling.FixedValue = 0.3
            [Phenology].LateGrainFilling.Target.EntireGrainfillPeriod.FixedValue = 540
            [Phenology].VegetativePhotoperiodModifier.XYPairs.X = 13.84, 18.77
            [Phenology].ReproductivePhotoperiodModifier.XYPairs.X = 13.84, 18.77
      Operations
        2014-09-10  [SurfaceOrganicMatter].Incorporate(fraction: 1, depth: 150)
        2014-09-18  [Soil].NO3.Reset()
        2014-09-18  [Wheat].Sow(cultivar: CerealRye, population: 547, depth: 25, rowSpacing: 190)
        2015-06-03  [Wheat].EndCrop()
        2015-06-03  [Soybean].Sow(cultivar: V1718, population: 40, depth: 50, rowSpacing: 760)
      Soil Plano:423332: SoilType=Plano:423332; State=WI; Country=USA; ApsoilNumber=0; Latitude=43.3064; Longitude=-89.34221
        DataSource=SSURGO (https://sdmdataaccess.nrcs.usda.gov/) through R package soilDB, R package apsimx function ssurgo2sp. Timestamp 2025-10-15 11:48:53.389725
        Comments=cokey = 27524243 - acres percent = 90 - component percent = 90 - taxonomic classification name = Fine-silty, mixed, superactive, mesic Typic Argiudolls - drainage class = Well drained - elevation = 260 - slope = 1 - geomdesc = Rise
        Physical: Rocks=[0, 0, 0, 0, 0, 0, 0, 0, 0, 0, 0, 0, 0]
          Thickness  ParticleSizeSand  ParticleSizeSilt  ParticleSizeClay  BD       AirDry      LL15        DUL       SAT       KS
          200        9.5               68                22.5              1.20573  0.0777506   0.15550129  0.362292  0.545007  713.0592
          200        9.5               68                22.5              1.20573  0.0777506   0.15550129  0.362292  0.545007  713.0592
          200        9.5               68                22.5              1.20573  0.0777506   0.15550129  0.362292  0.545007  713.0592
          200        7                 63                30                1.42806  0.18328252  0.18328252  0.363425  0.46111   713.0592
          200        7                 63                30                1.42806  0.18328252  0.18328252  0.363425  0.46111   713.0592
          200        43                34                23                1.58139  0.140404    0.140404    0.26419   0.40325   1811.0304
          200        43                34                23                1.58139  0.140404    0.140404    0.26419   0.40325   1811.0304
          200        43                34                23                1.58139  0.140404    0.140404    0.26419   0.40325   1811.0304
          200        63                25                12                1.61772  0.0727485   0.0727485   0.163033  0.38954   1811.0304
          200        63                25                12                1.61772  0.0727485   0.0727485   0.163033  0.38954   1811.0304
          Rocks source: Calculated (layer 1, 2, 3, 4, 5, 6)
          SoilCrop maizeSoil
            LL=[0.15550129, 0.15550129, 0.15550129, 0.18328252, 0.18328252, 0.140404, 0.140404, 0.140404, 0.0727485, 0.0727485]
            KL=[0.06, 0.0491238, 0.0402192, 0.0329287, 0.0269597, 0.0220728, 0.0180717, 0.0147958, 0.0121138, 0.00991793]
            XF=[1, 1, 1, 1, 1, 1, 1, 1, 1, 1]
            KL, XF source: Calculated (layer 7, 8, 9, 10, 11, 12, 13)
          SoilCrop soybeanSoil
            LL=[0.15550129, 0.15550129, 0.15550129, 0.18328252, 0.18328252, 0.140404, 0.140404, 0.140404, 0.0727485, 0.0727485]
            KL=[0.06, 0.0491238, 0.0402192, 0.0329287, 0.0269597, 0.0220728, 0.0180717, 0.0147958, 0.0121138, 0.00991793]
            XF=[1, 1, 1, 1, 1, 1, 1, 1, 1, 1]
            XF source: Calculated (layer 7, 8, 9, 10, 11, 12, 13)
          SoilCrop wheatSoil
            LL=[0.15550129, 0.15550129, 0.15550129, 0.18328252, 0.18328252, 0.140404, 0.140404, 0.140404, 0.0727485, 0.0727485]
            KL=[0.06, 0.0491238, 0.0402192, 0.0329287, 0.0269597, 0.0220728, 0.0180717, 0.0147958, 0.0121138, 0.00991793]
            XF=[1, 1, 1, 1, 1, 1, 1, 1, 1, 1]
            KL source: Calculated (layer 1)
            XF source: Calculated
        WaterBalance SoilWater: SummerDate=1-jun; SummerU=7; SummerCona=3; WinterDate=1-nov; WinterU=7.275; WinterCona=3.575; DiffusConst=84; DiffusSlope=35.4; Salb=0.17; CN2Bare=73; CNRed=20; CNCov=0.8; PSIDul=-100
          Thickness=[150, 50, 180, 130, 150, 280, 180, 380, 130, 150, 120, 310, 300]
          SWCON=[0.45, 0.45, 0.45, 0.45, 0.45, 0.45, 0.45, 0.45, 0.45, 0.45, 0.45, 0.45, 0.45]
        Organic: FOMCNRatio=40; CarbonUnits=Total
          Thickness  Carbon    SoilCNRatio  FBiom       FInert    FOM
          200        2.32558   12           0.04        0.8       150
          200        2.32558   12           0.0327492   0.80804   122.81
          200        2.32558   12           0.0268128   0.816161  100.548
          200        0.348837  12           0.0219525   0.824364  82.3217
          200        0.348837  12           0.0179732   0.832649  67.3993
          200        0.145349  12           0.0147152   0.841017  55.1819
          200        0.145349  12           0.0120478   0.849469  45.1791
          200        0.145349  12           0.00986388  0.858007  36.9895
          200        0.145349  12           0.00807586  0.86663   30.2845
          200        0.145349  12           0.00661196  0.875339  24.7948
        Chemical: Thickness=[200, 200, 200, 200, 200, 200, 200, 200, 200, 200]; PH=[6.5, 6.5, 6.5, 6.5, 6.5, 6.5, 6.5, 6.5, 6.5, 6.5]; PHUnits=Water
          CEC=[9.502, 9.748, 9.825, 9.281, 9.032, 8.816, 8.17, 8.17, 8.17, 8.18, 8.17, 8.17, 8.17]
          CEC source: Calculated (layer 1, 2, 3, 4, 5, 6, 7)
        Nutrient
        Solute NO3: Thickness=[200, 200, 200, 200, 200, 200, 200, 200, 200, 200]; InitialValues=[2, 2, 2, 2, 0, 0, 0, 0, 0, 0]; InitialValuesUnits=ppm; WaterTableConcentration=0; D0=0; Exco=[1, 1, 1, 1, 1, 1]; FIP=[1, 1, 1, 1, 1, 1]; DepthConstant=0; MaxDepthSoluteAccessible=0; RunoffEffectivenessAtMovingSolute=0; MaxEffectiveRunoff=0
        Solute NH4: Thickness=[200, 200, 200, 200, 200, 200, 200, 200, 200, 200]; InitialValuesUnits=ppm; WaterTableConcentration=0; D0=0; Exco=[1, 1, 1, 1, 1, 1]; FIP=[1, 1, 1, 1, 1, 1]; DepthConstant=0; MaxDepthSoluteAccessible=0; RunoffEffectivenessAtMovingSolute=0; MaxEffectiveRunoff=0
          InitialValues=[0.05, 0.0495025, 0.0490099, 0.0485223, 0.0480395, 0.0475615, 0.0470882, 0.0466197, 0.0461558, 0.0456966]
        Solute Urea: InitialValues=[0, 0, 0, 0, 0, 0, 0, 0, 0, 0, 0, 0, 0]; InitialValuesUnits=kg/ha; WaterTableConcentration=0; D0=0; Exco=[1, 1, 1, 1, 1, 1]; FIP=[1, 1, 1, 1, 1, 1]; DepthConstant=0; MaxDepthSoluteAccessible=0; RunoffEffectivenessAtMovingSolute=0; MaxEffectiveRunoff=0
          Thickness=[150, 50, 180, 130, 150, 280, 180, 380, 130, 150, 120, 310, 300]
        Water: FilledFromTop=true
          Thickness=[150, 50, 180, 130, 150, 280, 180, 380, 130, 150, 120, 310, 300]
          InitialValues=[0.327, 0.327, 0.354, 0.319, 0.344, 0.362, 0.391, 0.306, 0.236, 0.218, 0.168, 0.154, 0.162]
        SoilTemperature Temperature
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