Simulations: Version=197
  DataStore
  Simulation WI 2017
    Weather: FileName=/Users/stw52/Downloads/aars_iem.met
    Clock: Start=2016-01-01; End=2017-10-19
    Summary
    SoilArbitrator
    Zone WI Till 2017 Med PD: Area=1; Slope=2; AspectAngle=0; Altitude=50
      SurfaceOrganicMatter: InitialResidueName=Wheat; InitialResidueType=wheat; InitialResidueMass=0; InitialStandingFraction=1; InitialCPR=0; InitialCNR=30
      Fertiliser
      Report: EventNames=[Clock].EndOfDay
        VariableNames:
          [Clock].Today
          //===== Daily Values
          [Wheat].AboveGround.Wt*10 as rye_bm_kg_ha
          [Soybean].Grain.Wt*10 as soy_kg_ha
          (sum([Soil].SoilWater.ESW)/(sum([Soil].Physical.DULmm-[Soil].Physical.LL15mm) as frac_water
      MicroClimate: a_interception=0; b_interception=1; c_interception=0; d_interception=0; SoilHeatFluxFraction=0.4; MinimumHeightDiffForNewLayer=0; NightInterceptionFraction=0.5; ReferenceHeight=2
      Plant Wheat
        Cultivar CerealRye
          Command:
            [Phenology].Phyllochron.BasePhyllochron.FixedValue = 90
            [Leaf].CohortParameters.MaxArea.AreaLargestLeaves.FixedValue = 4000
            [Phenology].CAMP.FLNparams.MinLN = 7
            [Phenology].CAMP.FLNparams.PpLN = 2
            [Phenology].CAMP.FLNparams.VrnLN = 5
            [Phenology].CAMP.FLNparams.VxPLN = 2
            [Phenology].HeadEmergenceLongDayBase.FixedValue = 110
            [Phenology].HeadEmergencePpSensitivity.FixedValue = 0
            [Phenology].CAMP.EnvData.VrnTreatTemp = 4.4
            [Phenology].CAMP.EnvData.VrnTreatDuration = 60
            [Phenology].Vernalising.Target = 26
      Plant Soybean
        Cultivar Musgrave 1
          Command:
            [Phenology].Vegetative.Target.FixedValue = 340
            [Phenology].EarlyFlowering.Target.FixedValue = 120
            [Phenology].EarlyGrainFilling.Target.FractionofGrainfilling.FixedValue = 0.3
            [Phenology].LateGrainFilling.Target.EntireGrainfillPeriod.FixedValue = 632
            [Phenology].VegetativePhotoperiodModifier.XYPairs.X = 13.84, 18.77
            [Phenology].ReproductivePhotoperiodModifier.XYPairs.X = 13.84, 18.77
        Cultivar V1718
          Command:
            [Phenology].Vegetative.Target.FixedValue = 370
            [Phenology].EarlyFlowering.Target.FixedValue = 105
            [Phenology].EarlyGrainFilling.Target.FractionofGrainfilling.FixedValue = 0.3
            [Phenology].LateGrainFilling.Target.EntireGrainfillPeriod.FixedValue = 540
            [Phenology].VegetativePhotoperiodModifier.XYPairs.X = 13.84, 18.77
            [Phenology].ReproductivePhotoperiodModifier.XYPairs.X = 13.84, 18.77
      Soil Plano Lab Data Med: SoilType=0; Region=Pierce; State=Wisconsin; Country=US; ApsoilNumber=221; Latitude=44.64; Longitude=-92.453; YearOfSampling=2015; Comments=0
        DataSource:
          Original data by http://websoilsurvey.sc.egov.usda.gov/App/HomePage.htm
          Profile developed by Integrated Cropping Systems Lab, Department of Agronomy, ISU
        Physical
          Thickness  ParticleSizeSand  ParticleSizeSilt  ParticleSizeClay  Rocks  BD    AirDry  LL15   DUL    SAT    KS
          150        3.9               71.7              24.4              0      1.34  0.0575  0.115  0.327  0.435  171
          50         3.9               71.7              24.4              0      1.34  0.0575  0.115  0.327  0.435  171
          180        3.4               73.6              23                0      1.42  0.112   0.14   0.354  0.44   126
          130        3.8               77                19.2              0      1.42  0.114   0.114  0.319  0.428  97.2
          150        3.6               70.6              25.8              0      1.42  0.148   0.148  0.344  0.413  124
          280        3.2               65.9              30.9              0      1.42  0.174   0.174  0.362  0.418  68.4
          180        3.5               68.4              28.1              0      1.45  0.2     0.2    0.391  0.452  197
          380        12.6              64.6              22.8              0      1.6   0.148   0.148  0.306  0.38   67.1
          130        50.4              35.1              14.5              0      1.5   0.113   0.113  0.236  0.354  83.5
          150        62.4              24.6              13                0      1.5   0.098   0.098  0.218  0.372  284
          120        72.4              20.7              6.9               0      1.5   0.074   0.074  0.168  0.371  685
          310        72.9              22.2              4.9               0      1.5   0.065   0.065  0.154  0.387  616
          300        72.4              23.1              4.5               0      1.5   0.072   0.072  0.162  0.364  578
          Rocks source: Calculated (layer 1, 2, 3, 4, 5, 6)
          SoilCrop maizeSoil
            LL=[0.115, 0.115, 0.14, 0.114, 0.148, 0.174, 0.2, 0.148, 0.113, 0.098, 0.074, 0.065, 0.072]
            KL=[0.08, 0.069, 0.064, 0.057, 0.049, 0.035, 0.06, 0.06, 0.06, 0.06, 0.06, 0.06, 0.06]
            XF=[1, 1, 1, 1, 1, 1, 1, 1, 1, 1, 1, 1, 1]
            KL, XF source: Calculated (layer 7, 8, 9, 10, 11, 12, 13)
          SoilCrop soybeanSoil
            LL=[0.115, 0.115, 0.14, 0.114, 0.148, 0.174, 0.2, 0.148, 0.113, 0.098, 0.074, 0.065, 0.072]
            KL=[0.06, 0.049, 0.04, 0.032, 0.026, 0.022, 0.01, 0.01, 0.01, 0.01, 0.01, 0.01, 0.01]
            XF=[1, 1, 1, 1, 1, 1, 1, 1, 1, 1, 1, 1, 1]
            XF source: Calculated (layer 7, 8, 9, 10, 11, 12, 13)
          SoilCrop wheatSoil
            LL=[0.115, 0.115, 0.14, 0.114, 0.148, 0.174, 0.2, 0.148, 0.113, 0.098, 0.074, 0.065, 0.072]
            KL=[0.06, 0.049, 0.04, 0.032, 0.026, 0.022, 0.01, 0.01, 0.01, 0.01, 0.01, 0.01, 0.01]
            XF=[1, 1, 1, 1, 1, 1, 1, 1, 1, 1, 1, 1, 1]
            KL source: Calculated (layer 1)
            XF source: Calculated
        WaterBalance SoilWater: SummerDate=1-jun; SummerU=7; SummerCona=3; WinterDate=1-nov; WinterU=7.275; WinterCona=3.575; DiffusConst=84; DiffusSlope=35.4; Salb=0.17; CN2Bare=73; CNRed=20; CNCov=0.8; PSIDul=-100
          Thickness=[150, 50, 180, 130, 150, 280, 180, 380, 130, 150, 120, 310, 300]
          SWCON=[0.45, 0.45, 0.45, 0.45, 0.45, 0.45, 0.45, 0.45, 0.45, 0.45, 0.45, 0.45, 0.45]
        Organic: FOMCNRatio=40; CarbonUnits=Total
          Thickness  Carbon  SoilCNRatio  FBiom  FInert  FOM
          150        2.5     12           0.04   0.8     150
          50         2.5     12           0.032  0.81    122
          180        2.32    12           0.027  0.82    100.5
          130        0.36    12           0.022  0.82    82
          150        0.26    12           0.018  0.83    67.4
          280        0.26    12           0.015  0.84    55.2
          180        0.26    12           0.012  0.85    45.2
          380        0.26    12           0.009  0.86    37
          130        0.18    12           0.08   0.87    30
          150        0.18    12           0.08   0.87    25
          120        0.18    12           0.08   0.87    20
          310        0.18    12           0.08   0.87    15
          300        0.18    12           0.08   0.87    10
        Chemical: PHUnits=Water
          Thickness  PH   CEC
          150        6.6  9.502
          50         6.5  9.748
          180        6    9.825
          130        6    9.281
          150        6    9.032
          280        6    8.816
          180        7.6  8.17
          380        7.6  8.17
          130        7.6  8.17
          150        7.6  8.18
          120        7.6  8.17
          310        7.6  8.17
          300        7.6  8.17
          CEC source: Calculated (layer 1, 2, 3, 4, 5, 6, 7)
        Nutrient
        Solute NO3: InitialValues=[15, 10, 10, 5, 5, 5, 0, 0, 0, 0, 0, 0, 0]; InitialValuesUnits=ppm; WaterTableConcentration=0; D0=0; Exco=[1, 1, 1, 1, 1, 1]; FIP=[1, 1, 1, 1, 1, 1]; DepthConstant=0; MaxDepthSoluteAccessible=0; RunoffEffectivenessAtMovingSolute=0; MaxEffectiveRunoff=0
          Thickness=[150, 50, 180, 130, 150, 280, 180, 380, 130, 150, 120, 310, 300]
        Solute NH4: InitialValues=[0, 0, 0, 0, 0, 0, 0, 0, 0, 0, 0, 0, 0]; InitialValuesUnits=ppm; WaterTableConcentration=0; D0=0; Exco=[1, 1, 1, 1, 1, 1]; FIP=[1, 1, 1, 1, 1, 1]; DepthConstant=0; MaxDepthSoluteAccessible=0; RunoffEffectivenessAtMovingSolute=0; MaxEffectiveRunoff=0
          Thickness=[150, 50, 180, 130, 150, 280, 180, 380, 130, 150, 120, 310, 300]
        Solute Urea: InitialValues=[0, 0, 0, 0, 0, 0, 0, 0, 0, 0, 0, 0, 0]; InitialValuesUnits=kg/ha; WaterTableConcentration=0; D0=0; Exco=[1, 1, 1, 1, 1, 1]; FIP=[1, 1, 1, 1, 1, 1]; DepthConstant=0; MaxDepthSoluteAccessible=0; RunoffEffectivenessAtMovingSolute=0; MaxEffectiveRunoff=0
          Thickness=[150, 50, 180, 130, 150, 280, 180, 380, 130, 150, 120, 310, 300]
        Water: FilledFromTop=true
          Thickness=[150, 50, 180, 130, 150, 280, 180, 380, 130, 150, 120, 310, 300]
          InitialValues=[0.327, 0.327, 0.354, 0.319, 0.344, 0.362, 0.391, 0.306, 0.236, 0.218, 0.168, 0.154, 0.162]
        SoilTemperature Temperature
      Manager Sow on a fixed soy (disabled)
        Crop = [Soybean]
        SowDate = 1-jun
        CultivarName = V1718
        SowingDepth = 25.4
        RowSpacing = 760
        Population = 36.6
```csharp
using APSIM.Shared.Utilities;
using Models.Utilities;
using Models.Soils;
using Models.PMF;
using Models.Core;
using System;
using System.Linq;

namespace Models
{
    [Serializable]
    public class Script : Model
    {
        [Link] Clock Clock;
        [Link] Fertiliser Fertiliser;
        [Link] Summary Summary;
        [Link] Soil Soil;
        
        [Description("Crop")]
        public IPlant Crop { get; set; }

        [Description("Sowing date (d-mmm)")]
        public string SowDate { get; set; }

        [Display(Type = DisplayType.CultivarName)]
        [Description("Cultivar to be sown")]
        public string CultivarName { get; set; }

        [Description("Sowing depth (mm)")]
        public double SowingDepth { get; set; }

        [Description("Row spacing (mm)")]
        public double RowSpacing { get; set; }

        [Description("Plant population (/m2)")]
        public double Population { get; set; }

        [EventSubscribe("DoManagement")]
        private void OnDoManagement(object sender, EventArgs e)
        {
            if (DateUtilities.WithinDates(SowDate, Clock.Today, SowDate))
            {
                Crop.Sow(population: Population, cultivar: CultivarName, depth: SowingDepth, rowSpacing: RowSpacing);    
            }
        }
    }
}
```
      Operations
        2016-08-14  [Soil].NO3.Reset()
        2016-08-15  [SurfaceOrganicMatter].Add(mass: 5600, N: 150, P: 0, type: manure, name: crop_rotation)
        2017-05-20  [SurfaceOrganicMatter].Incorporate(fraction: 1, depth: 150)
        2017-06-01  [Soybean].Sow(cultivar: V1718, population: 36.6, depth: 25.4, rowSpacing: 760)
        2017-10-19  [Soybean].Harvest()
