Simulations: Version=197
  DataStore
  Simulation NY 2015
    Weather: FileName=/Users/stw52/Downloads/mus_iem.met
    Clock: Start=2014-01-01; End=2015-11-19
    Summary
    SoilArbitrator
    Zone NY NT 2015 Med SR: Area=1; Slope=2; AspectAngle=0; Altitude=50
      SurfaceOrganicMatter: InitialResidueName=Wheat; InitialResidueType=wheat; InitialResidueMass=0; InitialStandingFraction=1; InitialCPR=0; InitialCNR=30
      Fertiliser
      Report: EventNames=[Clock].EndOfDay
        VariableNames:
          [Clock].Today.Year
          [Clock].Today
          [Wheat].AboveGround.Wt*10 as rye_bm_kg_ha
          [Soybean].Grain.Wt*10 as soy_kg_ha
          sum([Soil].Water.MM - [Soil].Physical.DULmm) as SoilWaterDeficit
          sum([Soil].SoilWater.ESW[1:5]) as esw
          (sum([Soil].SoilWater.ESW[1:5])/(sum([Soil].Physical.DULmm[1:5]-[Soil].Physical.LL15mm[1:5]) as frac_water
          sum([SoilWater].PAWmm[1:3])/sum([Soil].Physical.PAWCmm[1:3]) as fasw_top30
      MicroClimate: a_interception=0; b_interception=1; c_interception=0; d_interception=0; SoilHeatFluxFraction=0.4; MinimumHeightDiffForNewLayer=0; NightInterceptionFraction=0.5; ReferenceHeight=2
      Plant Wheat
        Cultivar CerealRye
          Command:
            [Phenology].Phyllochron.BasePhyllochron.FixedValue = 90
            [Leaf].CohortParameters.MaxArea.AreaLargestLeaves.FixedValue = 4000
            [Phenology].CAMP.FLNparams.MinLN = 7
            [Phenology].CAMP.FLNparams.PpLN = 2
            [Phenology].CAMP.FLNparams.VrnLN = 5
            [Phenology].CAMP.FLNparams.VxPLN = 2
            [Phenology].HeadEmergenceLongDayBase.FixedValue = 110
            [Phenology].HeadEmergencePpSensitivity.FixedValue = 0
            [Phenology].CAMP.EnvData.VrnTreatTemp = 4.4
            [Phenology].CAMP.EnvData.VrnTreatDuration = 60
            [Leaf].Photosynthesis.RUE.FixedValue = 1.24
            [Phenology].Vernalising.Target = 26
      Plant Soybean
        Cultivar Musgrave 1
          Command:
            [Phenology].Vegetative.Target.FixedValue = 340
            [Phenology].EarlyFlowering.Target.FixedValue = 120
            [Phenology].EarlyGrainFilling.Target.FractionofGrainfilling.FixedValue = 0.3
            [Phenology].LateGrainFilling.Target.EntireGrainfillPeriod.FixedValue = 632
            [Phenology].VegetativePhotoperiodModifier.XYPairs.X = 13.84, 18.77
            [Phenology].ReproductivePhotoperiodModifier.XYPairs.X = 13.84, 18.77
      Operations
        2014-09-24  [SurfaceOrganicMatter].Incorporate(fraction: 1, depth: 150)
        2014-09-29  [Fertiliser].Apply(amount: 122, type: UreaN)
        2014-10-07  [Wheat].Sow(cultivar: CerealRye, population: 547, depth: 25, rowSpacing: 190)
        2015-06-03  [Wheat].EndCrop()
        2015-06-04  [Soybean].Sow(cultivar: Generic_MG2, population: 62.5, depth: 50, rowSpacing: 760)
        2015-10-12  [Soybean].Harvest
        2015-10-12  [Soybean].EndCrop
      Soil Lima Lab Data Med: ApsoilNumber=0
        Water: Thickness=[150, 100, 50, 160, 400, 180]; InitialValues=[0.28, 0.28, 0.279, 0.29, 0.252, 0.272]; FilledFromTop=true
        Physical
          Thickness  ParticleSizeSand  ParticleSizeSilt  ParticleSizeClay  Rocks  BD    AirDry  LL15   DUL     SAT    KS
          150        41.4              41.2              17.4              10     1.38  0.06    0.12   0.224   0.408  864
          100        41.4              41.2              17.4              10     1.38  0.096   0.12   0.224   0.408  864
          50         41.8              38.7              19.5              10     1.46  0.132   0.132  0.2232  0.372  864
          160        42.1              34                23.9              10     1.55  0.157   0.157  0.232   0.38   864
          400        38.8              47.6              13.6              15     1.55  0.11    0.11   0.2016  0.369  432
          180        38.6              48                13.4              0      1.73  0.155   0.155  0.2176  0.325  432
          960        38.6              48                13.4              0      1.73  0.155   0.155  0.2176  0.325  432
          SoilCrop WheatSoil
            LL=[0.12, 0.12, 0.132, 0.157, 0.11, 0.155, 0.155]
            KL=[0.06, 0.0491238, 0.0402192, 0.0329287, 0.0269597, 0.0220728, 0.0180717]
            XF=[1, 1, 1, 1, 1, 0, 0]
          SoilCrop MaizeSoil: same as NY 2015.NY NT 2015 Med SR.Lima Lab Data Med.Physical.WheatSoil
          SoilCrop SoybeanSoil: same as NY 2015.NY NT 2015 Med SR.Lima Lab Data Med.Physical.WheatSoil
        WaterBalance SoilWater: SummerDate=1-jun; SummerU=6; SummerCona=4; WinterDate=1-nov; WinterU=6; WinterCona=4; DiffusConst=88; DiffusSlope=35.4; Salb=0.13; CN2Bare=73; CNRed=20; CNCov=0; DischargeWidth=5; CatchmentArea=10; PSIDul=-336.6; Thickness=[150, 80, 70, 110, 230, 220]; SWCON=[0.457, 0.464, 0.47, 0.481, 0.451, 0.469]
        Organic: FOMCNRatio=40; CarbonUnits=Total
          Thickness  Carbon  SoilCNRatio  FBiom  FInert  FOM
          150        1.78    8            0.04   0.193   100
          100        1.78    8            0.031  0.395   70
          50         0.87    8            0.014  0.667   60
          160        0.87    8            0.01   0.832   0
          400        0.87    8            0.01   0.99    0
          180        0.87    8            0.01   0.99    0
          960        0.87    8            0.01   0.99    0
        Chemical: Thickness=[150, 100, 50, 160, 400, 180, 960]; PH=[6.5, 6.5, 6.5, 7, 7, 7, 7]; PHUnits=Water
          CEC=[16.7285, 11.66375, 10.6885, 10.16875, 8.951825, 8.52125, 8.3885, 8.3345, 8.26925, 8.1905]
          CEC source: Calculated
        Nutrient
        Solute NO3: Thickness=[150, 100, 50, 160, 400, 180, 960]; InitialValues=[0, 0, 0, 0, 0, 0, 0]; InitialValuesUnits=ppm; WaterTableConcentration=0; D0=0; DepthConstant=0; MaxDepthSoluteAccessible=0; RunoffEffectivenessAtMovingSolute=0; MaxEffectiveRunoff=0
        Solute NH4: same as NY 2015.NY NT 2015 Med SR.Lima Lab Data Med.NO3
        Solute Urea: Thickness=[150, 150, 150, 150, 200, 200, 200, 200, 300, 300]; InitialValues=[0, 0, 0, 0, 0, 0, 0, 0, 0, 0]; InitialValuesUnits=kg/ha; WaterTableConcentration=0; D0=0; DepthConstant=0; MaxDepthSoluteAccessible=0; RunoffEffectivenessAtMovingSolute=0; MaxEffectiveRunoff=0
        SoilTemperature CERESSoilTemperature
        CERESSoilTemperature Temperature
    Zone NY Till 2015 Med SR: Area=1; Slope=2; AspectAngle=0; Altitude=50
      SurfaceOrganicMatter: InitialResidueName=Wheat; InitialResidueType=wheat; InitialResidueMass=0; InitialStandingFraction=1; InitialCPR=0; InitialCNR=30
      Fertiliser
      Report: EventNames=[Clock].EndOfDay
        VariableNames:
          [Clock].Today.Year
          [Clock].Today
          [Wheat].AboveGround.Wt*10 as rye_bm_kg_ha
          [Soybean].Grain.Wt*10 as soy_kg_ha
          sum([Soil].Water.MM - [Soil].Physical.DULmm) as SoilWaterDeficit
          sum([Soil].SoilWater.ESW[1:5]) as esw
          [Soybean].Phenology.CurrentStageName
          sum([SoilWater].Water[1:5]) as sum_soilwater
          (sum([Soil].SoilWater.ESW[1:5])/(sum([Soil].Physical.DULmm[1:5]-[Soil].Physical.LL15mm[1:5]) as frac_water
          sum([SoilWater].PAWmm[1:3])/sum([Soil].Physical.PAWCmm[1:3]) as fasw_top30
      MicroClimate: a_interception=0; b_interception=1; c_interception=0; d_interception=0; SoilHeatFluxFraction=0.4; MinimumHeightDiffForNewLayer=0; NightInterceptionFraction=0.5; ReferenceHeight=2
      Plant Wheat: same as NY 2015.NY NT 2015 Med SR.Wheat
      Plant Soybean: same as NY 2015.NY NT 2015 Med SR.Soybean
      Operations
        2015-06-04  [Soybean].Sow(cultivar: Generic_MG2, population: 62.5, depth: 50, rowSpacing: 760)
        2015-10-12  [Soybean].Harvest
        2015-10-13  [Soybean].EndCrop
      Soil Lima Lab Data Med: ASCOrder=NA; ASCSubOrder=NA; SoilType=Lima Silt Loam; Site=Musgrave; NearestTown=Aurora; Region=Northeast United States; State=New York; Country=United States of America; NaturalVegetation=NA; ApsoilNumber=9999; Latitude=42.625; Longitude=-76.625; LocationAccuracy=+- 250 m; YearOfSampling=1985; DataSource=Soil Lab Data; Comments=Data filled from Soil Lab Data from USDA soil survey
        Water: Thickness=[150, 100, 50, 160, 400, 180]; InitialValues=[0.28, 0.28, 0.279, 0.29, 0.252, 0.272]; FilledFromTop=true
        Physical
          Thickness  ParticleSizeSand  ParticleSizeSilt  ParticleSizeClay  Rocks  BD    AirDry  LL15   DUL    SAT    KS
          150        41.4              41.2              17.4              10     1.38  0.06    0.12   0.28   0.408  864
          100        41.4              41.2              17.4              10     1.38  0.096   0.12   0.28   0.408  864
          50         41.8              38.7              19.5              10     1.46  0.132   0.132  0.279  0.372  864
          160        42.1              34                23.9              10     1.55  0.157   0.157  0.29   0.38   864
          400        38.8              47.6              13.6              15     1.55  0.11    0.11   0.252  0.369  432
          180        38.6              48                13.4              0      1.73  0.155   0.155  0.272  0.325  432
          960        38.6              48                13.4              0      1.73  0.155   0.155  0.272  0.325  432
          SoilCrop WheatSoil: LL=[0.12, 0.12, 0.132, 0.157, 0.11, 0.155, 0.155]; KL=[0.06, 0.06, 0.055, 0.048, 0.039, 0.029, 0.029]; XF=[1, 1, 1, 1, 0.959, 0, 0]
          SoilCrop MaizeSoil: LL=[0.12, 0.12, 0.132, 0.157, 0.11, 0.155, 0.155]; KL=[0.06, 0.06, 0.055, 0.048, 0.039, 0.029, 0.029]; XF=[1, 1, 1, 1, 0.959, 0, 0]
          SoilCrop SoybeanSoil: LL=[0.12, 0.12, 0.132, 0.157, 0.11, 0.155, 0.155]; KL=[0.06, 0.06, 0.055, 0.048, 0.039, 0.029, 0.029]; XF=[1, 1, 1, 1, 1, 0, 0]
        WaterBalance SoilWater: same as NY 2015.NY NT 2015 Med SR.Lima Lab Data Med.SoilWater
        Organic: FOMCNRatio=40; CarbonUnits=Total
          Thickness  Carbon  SoilCNRatio  FBiom  FInert  FOM
          150        1.78    8            0.04   0.193   100
          80         1.78    8            0.031  0.395   70
          70         0.87    8            0.014  0.667   60
          110        0.87    8            0.01   0.832   0
          230        0.87    8            0.01   0.99    0
          220        0.87    8            0.01   0.99    0
        Chemical: PHUnits=Water
          Thickness  PH    CEC
          150        6.23  16.7285
          150        6.3   11.66375
          150        6.33  10.6885
          150        6.38  10.16875
          200        6.45  8.951825
          200        6.55  8.52125
          200        6.61  8.3885
          200        6.63  8.3345
          300        6.66  8.26925
          300        6.68  8.1905
          CEC source: Calculated
        Nutrient
        Solute NO3: Thickness=[150, 150, 150, 150, 200, 200, 200, 200, 300, 300]; InitialValues=[0, 0, 0, 0, 0, 0, 0, 0, 0, 0]; InitialValuesUnits=ppm; WaterTableConcentration=0; D0=0; DepthConstant=0; MaxDepthSoluteAccessible=0; RunoffEffectivenessAtMovingSolute=0; MaxEffectiveRunoff=0
        Solute NH4: same as NY 2015.NY Till 2015 Med SR.Lima Lab Data Med.NO3
        Solute Urea: same as NY 2015.NY NT 2015 Med SR.Lima Lab Data Med.Urea
        SoilTemperature CERESSoilTemperature
        CERESSoilTemperature Temperature
    Zone NY NT 2015 Med PD: Area=1; Slope=2; AspectAngle=0; Altitude=50
      SurfaceOrganicMatter: InitialResidueName=Wheat; InitialResidueType=wheat; InitialResidueMass=0; InitialStandingFraction=1; InitialCPR=0; InitialCNR=30
      Fertiliser
      Report: EventNames=[Clock].EndOfDay
        VariableNames:
          [Clock].Today.Year
          [Clock].Today
          [Wheat].AboveGround.Wt*10 as rye_bm_kg_ha
          [Soybean].Grain.Wt*10 as soy_kg_ha
          sum([Soil].Water.MM - [Soil].Physical.DULmm) as SoilWaterDeficit
          sum([Soil].SoilWater.ESW[1:5]) as esw
          sum([SoilWater].Water[1:5]) as sum_soilwater
          (sum([Soil].SoilWater.ESW[1:5])/(sum([Soil].Physical.DULmm[1:5]-[Soil].Physical.LL15mm[1:5]) as frac_water
      MicroClimate: a_interception=0; b_interception=1; c_interception=0; d_interception=0; SoilHeatFluxFraction=0.4; MinimumHeightDiffForNewLayer=0; NightInterceptionFraction=0.5; ReferenceHeight=2
      Plant Wheat: same as NY 2015.NY NT 2015 Med SR.Wheat
      Plant Soybean: same as NY 2015.NY NT 2015 Med SR.Soybean
      Operations
        2014-09-24  [SurfaceOrganicMatter].Incorporate(fraction: 1, depth: 150)
        2014-09-29  [Fertiliser].Apply(amount: 122, type: UreaN)
        2014-10-07  [Wheat].Sow(cultivar: CerealRye, population: 547, depth: 25, rowSpacing: 190)
        2015-06-03  [Wheat].EndCrop()
        2015-06-04  [Soybean].Sow(cultivar: Generic_MG2, population: 47.6, depth: 50, rowSpacing: 760)
        2015-10-12  [Soybean].Harvest
        2015-10-12  [Soybean].EndCrop
      Soil Lima Lab Data Med: same as NY 2015.NY Till 2015 Med SR.Lima Lab Data Med
    Zone NY Till 2015 Med PD: Area=1; Slope=2; AspectAngle=0; Altitude=50
      SurfaceOrganicMatter: InitialResidueName=Wheat; InitialResidueType=wheat; InitialResidueMass=0; InitialStandingFraction=1; InitialCPR=0; InitialCNR=30
      Fertiliser
      Report: same as NY 2015.NY Till 2015 Med SR.Report
      MicroClimate: a_interception=0; b_interception=1; c_interception=0; d_interception=0; SoilHeatFluxFraction=0.4; MinimumHeightDiffForNewLayer=0; NightInterceptionFraction=0.5; ReferenceHeight=2
      Plant Wheat: same as NY 2015.NY NT 2015 Med SR.Wheat
      Plant Soybean: same as NY 2015.NY NT 2015 Med SR.Soybean
      Operations
        2014-09-24  [SurfaceOrganicMatter].Incorporate(fraction: 1, depth: 150)
        2014-09-29  [Fertiliser].Apply(amount: 122, type: UreaN)
        2015-05-07  [SurfaceOrganicMatter].Incorporate(fraction: 1, depth: 150)
        2015-06-04  [Soybean].Sow(cultivar: Generic_MG2, population: 48.2, depth: 50, rowSpacing: 760)
        2015-10-12  [Soybean].Harvest
        2015-10-13  [Soybean].EndCrop
      Soil Lima Lab Data Med: same as NY 2015.NY Till 2015 Med SR.Lima Lab Data Med
  Simulation NY 2016
    Weather: FileName=/Users/stw52/Downloads/mus_iem.met
    Clock: Start=2015-01-01; End=2016-11-19
    Summary
    SoilArbitrator
    Zone NY NT 2016 Med PD: Area=1; Slope=3; AspectAngle=0; Altitude=50
      SurfaceOrganicMatter: InitialResidueName=Wheat; InitialResidueType=wheat; InitialResidueMass=0; InitialStandingFraction=1; InitialCPR=0; InitialCNR=30
      Fertiliser
      Report: EventNames=[Clock].EndOfDay
        VariableNames:
          [Clock].Today
          //===== Daily Values
          [Wheat].AboveGround.Wt*10 as rye_bm_kg_ha
          [Soybean].Grain.Wt*10 as soy_kg_ha
          sum([Soil].Water.MM - [Soil].Physical.DULmm) as SoilWaterDeficit
          sum([Soil].Water.MM[1:3] - [Soil].Physical.DULmm[1:3]) as swd
          [Soil].Water.Potential as pot
          [Soil].Water.Volumetric as vwc
          [Soybean].LAI as lai_soy
          [Soybean].CoverTotal as soy_cover
          [Soybean].AboveGround.Wt as soy_biomass
          [Soybean].Leaf.Transpiration as soy_transpiration
          [SoilWater].Es as soil_evap
          sum([SoilWater].ESW) as esw
          (sum([Soil].SoilWater.ESW[1:5])/(sum([Soil].Physical.DULmm[1:5]-[Soil].Physical.LL15mm[1:5]) as frac_water
          sum([SoilWater].PAWmm[1:3])/sum([Soil].Physical.PAWCmm[1:3]) as fasw_top30
      MicroClimate: a_interception=0; b_interception=1; c_interception=0; d_interception=0; SoilHeatFluxFraction=0.4; MinimumHeightDiffForNewLayer=0; NightInterceptionFraction=0.5; ReferenceHeight=2
      Plant Wheat: same as NY 2015.NY NT 2015 Med SR.Wheat
      Plant Soybean
        Cultivar Musgrave 1
          Command:
            [Phenology].Vegetative.Target.FixedValue = 348
            [Phenology].EarlyFlowering.Target.FixedValue = 120
            [Phenology].EarlyGrainFilling.Target.FractionofGrainfilling.FixedValue = 0.2
            [Phenology].LateGrainFilling.Target.EntireGrainfillPeriod.FixedValue = 300
            [Phenology].VegetativePhotoperiodModifier.XYPairs.X = 13.59, 17.61
            [Phenology].ReproductivePhotoperiodModifier.XYPairs.X = 13.59, 17.61
            [Leaf].Photosynthesis.RUE.FixedValue = 2
      Operations
        2015-09-09  [SurfaceOrganicMatter].Incorporate(fraction: 1, depth: 150)
        2015-10-05  [Fertiliser].Apply(amount: 122, type: UreaN)
        2015-10-07  [Wheat].Sow(cultivar: CerealRye, population: 547, depth: 25, rowSpacing: 190)
        2016-05-26  [Wheat].EndCrop()
        2016-05-31  [Soybean].Sow(cultivar: Generic_MG2, population: 41.4, depth: 50, rowSpacing: 760)
        2016-10-19  [Soybean].Harvest
        2016-10-20  [Soybean].EndCrop
      Soil Lima Lab Data Med: same as NY 2015.NY NT 2015 Med SR.Lima Lab Data Med
    Zone NY Till 2016 Med PD: Area=1; Slope=3; AspectAngle=0; Altitude=50
      SurfaceOrganicMatter: InitialResidueName=Wheat; InitialResidueType=wheat; InitialResidueMass=0; InitialStandingFraction=1; InitialCPR=0; InitialCNR=30
      Fertiliser
      Report: same as NY 2016.NY NT 2016 Med PD.Report
      MicroClimate: a_interception=0; b_interception=1; c_interception=0; d_interception=0; SoilHeatFluxFraction=0.4; MinimumHeightDiffForNewLayer=0; NightInterceptionFraction=0.5; ReferenceHeight=2
      Plant Wheat: same as NY 2015.NY NT 2015 Med SR.Wheat
      Plant Soybean: same as NY 2016.NY NT 2016 Med PD.Soybean
      Operations
        2016-04-22  [SurfaceOrganicMatter].Incorporate(fraction: 1, depth: 150)
        2016-05-31  [Soybean].Sow(cultivar: Generic_MG2, population: 73.4, depth: 50, rowSpacing: 760)
        2016-10-19  [Soybean].Harvest
        2016-10-20  [Soybean].EndCrop
      Soil Lima Lab Data Med: same as NY 2015.NY Till 2015 Med SR.Lima Lab Data Med
    Zone NY NT 2016 Med SR: Area=1; Slope=3; AspectAngle=0; Altitude=50
      SurfaceOrganicMatter: InitialResidueName=Wheat; InitialResidueType=wheat; InitialResidueMass=0; InitialStandingFraction=1; InitialCPR=0; InitialCNR=30
      Fertiliser
      Report: same as NY 2016.NY NT 2016 Med PD.Report
      MicroClimate: a_interception=0; b_interception=1; c_interception=0; d_interception=0; SoilHeatFluxFraction=0.4; MinimumHeightDiffForNewLayer=0; NightInterceptionFraction=0.5; ReferenceHeight=2
      Plant Wheat: same as NY 2015.NY NT 2015 Med SR.Wheat
      Plant Soybean: same as NY 2016.NY NT 2016 Med PD.Soybean
      Operations
        2015-09-09  [SurfaceOrganicMatter].Incorporate(fraction: 1, depth: 150)
        2015-10-05  [Fertiliser].Apply(amount: 122, type: UreaN)
        2015-10-07  [Wheat].Sow(cultivar: CerealRye, population: 547, depth: 25, rowSpacing: 190)
        2016-05-26  [Wheat].EndCrop()
        2016-05-31  [Soybean].Sow(cultivar: Generic_MG2, population: 76.7, depth: 50, rowSpacing: 760)
        2016-10-19  [Soybean].Harvest
        2016-10-20  [Soybean].EndCrop
      Soil Lima Lab Data Med: same as NY 2015.NY Till 2015 Med SR.Lima Lab Data Med
    Zone NY Till 2016 Med SR: Area=1; Slope=3; AspectAngle=0; Altitude=50
      SurfaceOrganicMatter: InitialResidueName=Wheat; InitialResidueType=wheat; InitialResidueMass=0; InitialStandingFraction=1; InitialCPR=0; InitialCNR=30
      Fertiliser
      Report: same as NY 2016.NY NT 2016 Med PD.Report
      MicroClimate: a_interception=0; b_interception=1; c_interception=0; d_interception=0; SoilHeatFluxFraction=0.4; MinimumHeightDiffForNewLayer=0; NightInterceptionFraction=0.5; ReferenceHeight=2
      Plant Wheat: same as NY 2015.NY NT 2015 Med SR.Wheat
      Plant Soybean: same as NY 2016.NY NT 2016 Med PD.Soybean
      Operations
        2016-04-22  [SurfaceOrganicMatter].Incorporate(fraction: 1, depth: 150)
        2016-05-31  [Soybean].Sow(cultivar: Generic_MG2, population: 76.7, depth: 50, rowSpacing: 760)
        2016-10-19  [Soybean].Harvest
        2016-10-20  [Soybean].EndCrop
      Soil Lima Lab Data Med: same as NY 2015.NY Till 2015 Med SR.Lima Lab Data Med
  Simulation NY 2023
    Weather: FileName=/Users/stw52/Downloads/mus_iem.met
    Clock: Start=2022-01-01; End=2023-11-19
    Summary
    SoilArbitrator
    Zone NY NT 2023 Med PD: Area=1; Slope=2; AspectAngle=0; Altitude=50
      SurfaceOrganicMatter: InitialResidueName=Wheat; InitialResidueType=wheat; InitialResidueMass=0; InitialStandingFraction=1; InitialCPR=0; InitialCNR=30
      Fertiliser
      Report: EventNames=[Clock].EndOfDay
        VariableNames:
          [Clock].Today
          //===== Daily Values
          [Wheat].AboveGround.Wt*10 as rye_bm_kg_ha
          [Soybean].Grain.Wt*10 as soy_kg_ha
          sum([Soil].Water.MM - [Soil].Physical.DULmm) as SoilWaterDeficit
          (sum([Soil].SoilWater.ESW[1:5])/(sum([Soil].Physical.DULmm[1:5]-[Soil].Physical.LL15mm[1:5]) as frac_water
          sum([SoilWater].PAWmm[1:3])/sum([Soil].Physical.PAWCmm[1:3]) as fasw_top30
      MicroClimate: a_interception=0; b_interception=1; c_interception=0; d_interception=0; SoilHeatFluxFraction=0.4; MinimumHeightDiffForNewLayer=0; NightInterceptionFraction=0.5; ReferenceHeight=2
      Plant Wheat: same as NY 2015.NY NT 2015 Med SR.Wheat
      Plant Soybean: same as NY 2015.NY NT 2015 Med SR.Soybean
      Operations
        2022-09-11  [SurfaceOrganicMatter].Incorporate(fraction: 1, depth: 150)
        2022-09-15  [Fertiliser].Apply(amount: 109, type: UreaN)
        2022-09-15  [Wheat].Sow(cultivar: CerealRye, population: 121, depth: 20, rowSpacing: 190)
        2023-06-04  [Wheat].EndCrop
        2023-06-05  [Soybean].Sow(cultivar: Generic_MG2, population: 50.7, depth: 50, rowSpacing: 760)
        2023-11-19  [Soybean].Harvest
        2023-11-20  [Soybean].EndCrop
      Soil Lima Lab Data Med: same as NY 2015.NY Till 2015 Med SR.Lima Lab Data Med
    Zone NY Till 2023 Med SR: Area=1; Slope=2; AspectAngle=0; Altitude=50
      SurfaceOrganicMatter: InitialResidueName=Wheat; InitialResidueType=wheat; InitialResidueMass=0; InitialStandingFraction=1; InitialCPR=0; InitialCNR=30
      Fertiliser
      Report: same as NY 2023.NY NT 2023 Med PD.Report
      MicroClimate: a_interception=0; b_interception=1; c_interception=0; d_interception=0; SoilHeatFluxFraction=0.4; MinimumHeightDiffForNewLayer=0; NightInterceptionFraction=0.5; ReferenceHeight=2
      Plant Wheat: same as NY 2015.NY NT 2015 Med SR.Wheat
      Plant Soybean: same as NY 2015.NY NT 2015 Med SR.Soybean
      Operations
        2022-09-11  [SurfaceOrganicMatter].Incorporate(fraction: 1, depth: 150)
        2022-09-14  [Fertiliser].Apply(amount: 109, type: UreaN)
        2022-09-15  [Wheat].Sow(cultivar: CerealRye, population: 121, depth: 50, rowSpacing: 190)
        2023-05-12  [Wheat].EndCrop
        2023-06-02  [SurfaceOrganicMatter].Incorporate(fraction: 0.2, depth: 100)
        2023-06-05  [Soybean].Sow(cultivar: Generic_MG2, population: 61.8, depth: 50, rowSpacing: 760)
        2023-11-19  [Soybean].Harvest
        2023-11-20  [Soybean].EndCrop
      Soil Lima Lab Data Med: same as NY 2015.NY Till 2015 Med SR.Lima Lab Data Med
    Zone NY NT 2023 Med SR: Area=1; Slope=2; AspectAngle=0; Altitude=50
      SurfaceOrganicMatter: InitialResidueName=Wheat; InitialResidueType=wheat; InitialResidueMass=0; InitialStandingFraction=1; InitialCPR=0; InitialCNR=30
      Fertiliser
      Report: same as NY 2023.NY NT 2023 Med PD.Report
      MicroClimate: a_interception=0; b_interception=1; c_interception=0; d_interception=0; SoilHeatFluxFraction=0.4; MinimumHeightDiffForNewLayer=0; NightInterceptionFraction=0.5; ReferenceHeight=2
      Plant Wheat: same as NY 2015.NY NT 2015 Med SR.Wheat
      Plant Soybean: same as NY 2015.NY NT 2015 Med SR.Soybean
      Operations
        2022-09-11  [SurfaceOrganicMatter].Incorporate(fraction: 1, depth: 150)
        2022-09-15  [Fertiliser].Apply(amount: 109, type: UreaN)
        2022-09-15  [Wheat].Sow(cultivar: CerealRye, population: 121, depth: 20, rowSpacing: 190)
        2023-06-04  [Wheat].EndCrop
        2023-06-05  [Soybean].Sow(cultivar: Generic_MG2, population: 61.8, depth: 50, rowSpacing: 760)
        2023-11-19  [Soybean].Harvest
        2023-11-20  [Soybean].EndCrop
      Soil Lima Lab Data Med: same as NY 2015.NY Till 2015 Med SR.Lima Lab Data Med
    Zone NY Till 2023 Med PD: Area=1; Slope=2; AspectAngle=0; Altitude=50
      SurfaceOrganicMatter: InitialResidueName=Wheat; InitialResidueType=wheat; InitialResidueMass=0; InitialStandingFraction=1; InitialCPR=0; InitialCNR=30
      Fertiliser
      Report: same as NY 2023.NY NT 2023 Med PD.Report
      MicroClimate: a_interception=0; b_interception=1; c_interception=0; d_interception=0; SoilHeatFluxFraction=0.4; MinimumHeightDiffForNewLayer=0; NightInterceptionFraction=0.5; ReferenceHeight=2
      Plant Wheat: same as NY 2015.NY NT 2015 Med SR.Wheat
      Plant Soybean: same as NY 2015.NY NT 2015 Med SR.Soybean
      Operations
        2022-09-11  [SurfaceOrganicMatter].Incorporate(fraction: 1, depth: 150)
        2022-09-14  [Fertiliser].Apply(amount: 109, type: UreaN)
        2022-09-15  [Wheat].Sow(cultivar: CerealRye, population: 121, depth: 50, rowSpacing: 190)
        2023-05-12  [Wheat].EndCrop
        2023-06-02  [SurfaceOrganicMatter].Incorporate(fraction: 0.2, depth: 100)
        2023-06-05  [Soybean].Sow(cultivar: Generic_MG2, population: 57.3, depth: 50, rowSpacing: 760)
        2023-11-19  [Soybean].Harvest
        2023-11-20  [Soybean].EndCrop
      Soil Lima Lab Data Med: same as NY 2015.NY Till 2015 Med SR.Lima Lab Data Med
  Simulation NY 2024
    Weather: FileName=/Users/stw52/Downloads/mus_iem.met
    Clock: Start=2023-01-01; End=2024-11-19
    Summary
    SoilArbitrator
    Zone NY Till 2024 Med PD: Area=1; Slope=2; AspectAngle=0; Altitude=50
      SurfaceOrganicMatter: InitialResidueName=Wheat; InitialResidueType=wheat; InitialResidueMass=0; InitialStandingFraction=1; InitialCPR=0; InitialCNR=30
      Fertiliser
      Report: EventNames=[Clock].EndOfDay
        VariableNames:
          [Clock].Today
          //===== Daily Values
          [Soybean].Grain.Wt*10 as soy_kg_ha
          sum([Soil].Water.MM - [Soil].Physical.DULmm) as SoilWaterDeficit
          [Wheat].Phenology.Zadok
          (sum([Soil].SoilWater.ESW[1:5])/(sum([Soil].Physical.DULmm[1:5]-[Soil].Physical.LL15mm[1:5]) as frac_water
          sum([SoilWater].PAWmm[1:3])/sum([Soil].Physical.PAWCmm[1:3]) as fasw_top30
      MicroClimate: a_interception=0; b_interception=1; c_interception=0; d_interception=0; SoilHeatFluxFraction=0.4; MinimumHeightDiffForNewLayer=0; NightInterceptionFraction=0.5; ReferenceHeight=2
      Plant Wheat: same as NY 2015.NY NT 2015 Med SR.Wheat
      Plant Soybean: same as NY 2015.NY NT 2015 Med SR.Soybean
      Operations
        2024-05-14  [SurfaceOrganicMatter].Incorporate(fraction: 1, depth: 150)
        2024-05-20  [SurfaceOrganicMatter].Incorporate(fraction: 0.2, depth: 100)
        2024-05-23  [Soybean].Sow(cultivar: Generic_MG2, population: 61.7, depth: 25, rowSpacing: 760)
        2024-10-26  [Soybean].Harvest
        2024-10-27  [Soybean].EndCrop
      Soil Lima Lab Data Med: same as NY 2015.NY Till 2015 Med SR.Lima Lab Data Med
    Zone NY NT 2024 Med SR: Area=1; Slope=2; AspectAngle=0; Altitude=50
      SurfaceOrganicMatter: InitialResidueName=Wheat; InitialResidueType=wheat; InitialResidueMass=0; InitialStandingFraction=1; InitialCPR=0; InitialCNR=30
      Fertiliser
      Report: same as NY 2023.NY NT 2023 Med PD.Report
      MicroClimate: a_interception=0; b_interception=1; c_interception=0; d_interception=0; SoilHeatFluxFraction=0.4; MinimumHeightDiffForNewLayer=0; NightInterceptionFraction=0.5; ReferenceHeight=2
      Plant Wheat: same as NY 2015.NY NT 2015 Med SR.Wheat
      Plant Soybean: same as NY 2015.NY NT 2015 Med SR.Soybean
      Operations
        2023-09-11  [SurfaceOrganicMatter].Incorporate(fraction: 1, depth: 150)
        2023-09-15  [Fertiliser].Apply(amount: 109, type: UreaN)
        2023-09-15  [Wheat].Sow(cultivar: CerealRye, population: 121, depth: 20, rowSpacing: 190)
        2024-05-22  [Wheat].EndCrop
        2024-05-23  [Soybean].Sow(cultivar: Generic_MG2, population: 61.8, depth: 25, rowSpacing: 760)
        2024-10-26  [Soybean].Harvest
        2024-10-27  [Soybean].EndCrop
      Soil Lima Lab Data Med: same as NY 2015.NY Till 2015 Med SR.Lima Lab Data Med
    Zone NY Till 2024 Med SR: Area=1; Slope=2; AspectAngle=0; Altitude=50
      SurfaceOrganicMatter: InitialResidueName=Wheat; InitialResidueType=wheat; InitialResidueMass=0; InitialStandingFraction=1; InitialCPR=0; InitialCNR=30
      Fertiliser
      Report: same as NY 2024.NY Till 2024 Med PD.Report
      MicroClimate: a_interception=0; b_interception=1; c_interception=0; d_interception=0; SoilHeatFluxFraction=0.4; MinimumHeightDiffForNewLayer=0; NightInterceptionFraction=0.5; ReferenceHeight=2
      Plant Wheat: same as NY 2015.NY NT 2015 Med SR.Wheat
      Plant Soybean: same as NY 2015.NY NT 2015 Med SR.Soybean
      Operations
        2024-05-14  [SurfaceOrganicMatter].Incorporate(fraction: 1, depth: 150)
        2024-05-20  [SurfaceOrganicMatter].Incorporate(fraction: 0.2, depth: 100)
        2024-05-23  [Soybean].Sow(cultivar: Generic_MG2, population: 61.8, depth: 25, rowSpacing: 760)
        2024-10-26  [Soybean].Harvest
        2024-10-27  [Soybean].EndCrop
      Soil Lima Lab Data Med: same as NY 2015.NY Till 2015 Med SR.Lima Lab Data Med
    Zone NY NT 2024 Med PD: Area=1; Slope=2; AspectAngle=0; Altitude=50
      SurfaceOrganicMatter: InitialResidueName=Wheat; InitialResidueType=wheat; InitialResidueMass=0; InitialStandingFraction=1; InitialCPR=0; InitialCNR=30
      Fertiliser
      Report: same as NY 2023.NY NT 2023 Med PD.Report
      MicroClimate: a_interception=0; b_interception=1; c_interception=0; d_interception=0; SoilHeatFluxFraction=0.4; MinimumHeightDiffForNewLayer=0; NightInterceptionFraction=0.5; ReferenceHeight=2
      Plant Wheat: same as NY 2015.NY NT 2015 Med SR.Wheat
      Plant Soybean: same as NY 2015.NY NT 2015 Med SR.Soybean
      Operations
        2023-09-11  [SurfaceOrganicMatter].Incorporate(fraction: 1, depth: 150)
        2023-09-15  [Fertiliser].Apply(amount: 109, type: UreaN)
        2023-09-15  [Wheat].Sow(cultivar: CerealRye, population: 121, depth: 20, rowSpacing: 190)
        2024-05-22  [Wheat].EndCrop
        2024-05-23  [Soybean].Sow(cultivar: Generic_MG2, population: 55.8, depth: 25, rowSpacing: 760)
        2024-10-26  [Soybean].Harvest
        2024-10-27  [Soybean].EndCrop
      Soil Lima Lab Data Med: same as NY 2015.NY Till 2015 Med SR.Lima Lab Data Med
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